Simulations: Version=201
  DataStore
    ExcelInput: FileNames=[Obs.xlsx]
      SheetNames=[canola, Harvest, LAI.at.end.treatment, RUE.at.end.treatment, TimeSeries]
  Folder Replacements
    Plant Canola: PlantType=Canola
      OrganArbitrator Arbitrator
        BiomassTypeArbitrator DMArbitration
          Folder PotentialPartitioningMethods
            ReallocationMethod
            AllocateFixationMethod
            RetranslocationMethod
            SendPotentialDMAllocationsMethod
          Folder AllocationMethods
            NutrientConstrainedAllocationMethod
            DryMatterAllocationsMethod
          RelativeAllocation ArbitrationMethod
        BiomassTypeArbitrator NArbitration
          Folder PotentialPartitioningMethods
            ReallocationMethod
          Folder ActualPartitioningMethods
            AllocateFixationMethod
            RetranslocationMethod
          Folder AllocationMethods
            NitrogenAllocationsMethod
          RelativeAllocation ArbitrationMethod
          AllocateUptakesMethod
        WaterUptakeMethod
        NitrogenUptakeMethod
      Phenology
        SubDailyInterpolation ThermalTime: agregationMethod=0
          XYPairs Response: X=[2, 30, 35]; Y=[0, 28, 0]
          ThreeHourAirTemperature InterpolationMethod
        AccumulateFunction CumulativeThermalTime: StartStageName=Germination; EndStageName=FloralInitiation; FractionRemovedOnCut=0; FractionRemovedOnHarvest=0; FractionRemovedOnGraze=0; FractionRemovedOnPrune=0
          VariableReference DailyValue: VariableName=[Phenology].ThermalTime
        SubDailyInterpolation VernalTime: agregationMethod=0
          XYPairs Response: X=[0, 2, 8, 15]; Y=[0, 1, 0.5, 0]
          ThreeHourAirTemperature InterpolationMethod
        AccumulateFunction CumulativeVernalTime: StartStageName=Germination; EndStageName=FloralInitiation; FractionRemovedOnCut=0; FractionRemovedOnHarvest=0; FractionRemovedOnGraze=0; FractionRemovedOnPrune=0
          VariableReference DailyValue: VariableName=[Phenology].VernalTime
        PhotoperiodFunction Photoperiod: Twilight=-6; DayLength=0
        GerminatingPhase Germinating: Start=Sowing; End=Germination; IsEmerged=false
          Constant MinSoilTemperature: FixedValue=0
        EmergingPhase Emerging: Start=Germination; End=Emergence; IsEmerged=false; TTForTimeStep=0
          VariableReference ThermalTime: VariableName=[Phenology].ThermalTime
          AddFunction Target
            Constant ShootLag: FixedValue=15
            MultiplyFunction DepthxRate
              VariableReference SowingDepth: VariableName=[Plant].SowingData.Depth
              Constant ShootRate: FixedValue=5
        GenericPhase Vegetative: Start=Emergence; End=FloralInitiation; IsEmerged=true
          VariableReference Progression: VariableName=[Phenology].ThermalTime
          LinearInterpolationFunction Target
            XYPairs: X=[0, 25]; Y=[290, 1]
            VariableReference XValue: VariableName=[Phenology].CumulativeVernalTime
        SimpleLeafAppearancePhase BudDevelopment: Start=FloralInitiation; End=GreenBud; IsEmerged=true
          VariableReference TargetLeafNumber: VariableName=[Leaf].FinalLeafNumber
          VariableReference CurrentLeafNumber: VariableName=[Leaf].NodeNumber
        GenericPhase StemElongation: Start=GreenBud; End=StartFlowering; IsEmerged=true
          VariableReference Progression: VariableName=[Phenology].ThermalTime
          AddFunction Target
            Constant Base: FixedValue=250
            MultiplyFunction PPResponse
              Constant Amount: FixedValue=0
              LinearInterpolationFunction Shape
                XYPairs: X=[13, 14]; Y=[1, 0]
                VariableReference XValue: VariableName=[Phenology].Photoperiod
        GenericPhase EarlyFlowering: Start=StartFlowering; End=StartPodDevelopment; IsEmerged=true
          Memo
            The duration of the grain filling phase has been taken from the model of Robertson et al (2002).
          Constant Target: FixedValue=100
          VariableReference Progression: VariableName=[Phenology].ThermalTime
        GenericPhase EarlyPodDevelopment: Start=StartPodDevelopment; End=StartGrainFilling; IsEmerged=true
          Memo
            The duration of the grain filling phase has been taken from the model of Robertson et al (2002).
          Constant Target: FixedValue=140
          VariableReference Progression: VariableName=[Phenology].ThermalTime
          VariableReference Stress: VariableName=[Phenology].Vegetative.PhotoperiodEffect
        GenericPhase EarlyGrainFilling: Start=StartGrainFilling; End=EndFlowering; IsEmerged=true
          VariableReference Progression: VariableName=[Phenology].ThermalTime
          VariableReference Stress: VariableName=[Phenology].Vegetative.PhotoperiodEffect
          MultiplyFunction Target
            Constant FractionofGrainfilling: FixedValue=0.05
            VariableReference EntireGrainfilling
              VariableName=[Phenology].LateGrainFilling.Target.EntireGrainfillPeriod.FixedValue
        GenericPhase MidGrainFilling: Start=EndFlowering; End=EndPodDevelopment; IsEmerged=true
          VariableReference Progression: VariableName=[Phenology].ThermalTime
          VariableReference Stress: VariableName=[Phenology].Vegetative.PhotoperiodEffect
          MultiplyFunction Target
            Constant FractionofMidToLateGrainfilling: FixedValue=0.5
            SubtractFunction
              VariableReference EntireGrainfilling
                VariableName=[Phenology].LateGrainFilling.Target.EntireGrainfillPeriod.FixedValue
              VariableReference EarlyGrainfilling: VariableName=[Phenology].EarlyGrainFilling.Target
        GenericPhase LateGrainFilling: Start=EndPodDevelopment; End=EndGrainFill; IsEmerged=true
          SubtractFunction Target
            Constant EntireGrainfillPeriod: FixedValue=700
            VariableReference EarlyGrainFillingTarget: VariableName=[Phenology].EarlyGrainFilling.Target
            VariableReference MidGrainFillingTarget: VariableName=[Phenology].MidGrainFilling.Target
          VariableReference Progression: VariableName=[Phenology].ThermalTime
          VariableReference Stress: VariableName=[Phenology].Vegetative.PhotoperiodEffect
        GenericPhase Maturing: Start=EndGrainFill; End=Maturity; IsEmerged=true
          Constant Target: FixedValue=5
          VariableReference Progression: VariableName=[Phenology].ThermalTime
        GenericPhase Ripening: Start=Maturity; End=HarvestRipe; IsEmerged=true
          Constant Target: FixedValue=1
          VariableReference Progression: VariableName=[Phenology].ThermalTime
        EndPhase ReadyForHarvesting: Start=HarvestRipe; End=Unused; IsEmerged=true
          VariableReference ThermalTime: VariableName=[Phenology].ThermalTime
        OnEventFunction EmergenceDAS: SetEvent=Emergence; ReSetEvent=never
          Memo
            A function is used to provide maturity date as days after sowing(DAS).
          Constant PreEventValue: FixedValue=0
          VariableReference PostEventValue: VariableName=[Plant].DaysAfterSowing
        OnEventFunction FloralInitiationDAS: SetEvent=FloralInitiation; ReSetEvent=never
          Memo
            A function is used to provide flowering date as days after sowing(DAS).
          Constant PreEventValue: FixedValue=0
          VariableReference PostEventValue: VariableName=[Plant].DaysAfterSowing
        OnEventFunction GreenBudDAS: SetEvent=GreenBud; ReSetEvent=never
          Memo
            A function is used to provide flowering date as days after sowing(DAS).
          Constant PreEventValue: FixedValue=0
          VariableReference PostEventValue: VariableName=[Plant].DaysAfterSowing
        OnEventFunction StartFloweringDAS: SetEvent=StartFlowering; ReSetEvent=never
          Memo
            A function is used to provide flowering date as days after sowing(DAS).
          Constant PreEventValue: FixedValue=0
          VariableReference PostEventValue: VariableName=[Plant].DaysAfterSowing
        OnEventFunction MaturityDAS: SetEvent=Maturity; ReSetEvent=never
          Memo
            A function is used to provide maturity date as days after sowing(DAS).
          Constant PreEventValue: FixedValue=0
          VariableReference PostEventValue: VariableName=[Plant].DaysAfterSowing
      Root: GrowthRespiration=0; MaintenanceRespiration=0
        RootShapeCylinder RootShape
        LinearInterpolationFunction KLModifier
          XYPairs: X=[0, 3]; Y=[1, 1]
          VariableReference XValue: VariableName=[Leaf].LAI
        SubDailyInterpolation TemperatureEffect: agregationMethod=0
          XYPairs Response: X=[0, 20, 32]; Y=[0, 1, 0]
          ThreeHourAirTemperature InterpolationMethod
        Constant MaxDailyNUptake: FixedValue=6
        Constant SenescenceRate: FixedValue=0.005
        Constant MaximumRootDepth: FixedValue=1000000
        MultiplyFunction RootFrontVelocity
          PhaseLookup PotentialRootFrontVelocity
            PhaseLookupValue PreEmergence: Start=Germination; End=Emergence
              Constant Function: FixedValue=5; Units=mm/d
            PhaseLookupValue early: Start=Emergence; End=StartGrainFilling
              Constant Function: FixedValue=44; Units=mm/d
            PhaseLookupValue late: Start=StartGrainFilling; End=Maturity
              Constant Function: FixedValue=0; Units=mm/d
          LinearInterpolationFunction AFPSFactor
            XYPairs: X=[0, 0.03, 1]; Y=[1, 1, 1]
            VariableReference XValue: VariableName=[Root].AirFilledPoreSpace
        Constant MaximumNConc: FixedValue=0.01
        Constant MinimumNConc: FixedValue=0.005
        PhaseLookupValue NitrogenDemandSwitch: Start=Emergence; End=EndGrainFill
          Constant: FixedValue=1
        LinearInterpolationFunction KNO3
          XYPairs: X=[0, 0.003]; Y=[0.01, 0.01]
          VariableReference XValue: VariableName=[Root].LengthDensity
        LinearInterpolationFunction KNH4
          XYPairs: X=[0, 0.003]; Y=[0, 0]
          VariableReference XValue: VariableName=[Root].LengthDensity
        BiomassRemoval BiomassRemovalDefaults: HarvestFractionLiveToRemove=0; HarvestFractionDeadToRemove=0; HarvestFractionLiveToResidue=0.2; HarvestFractionDeadToResidue=0
        LinearInterpolationFunction NUptakeSWFactor
          XYPairs: X=[0, 1]; Y=[0, 1]
          VariableReference XValue: VariableName=[Root].RWC
        Constant SpecificRootLength: FixedValue=40; Units=m/g
        Constant DMConversionEfficiency: FixedValue=1
        Constant MaintenanceRespirationFunction: FixedValue=1
        Constant RemobilisationCost: FixedValue=0
        Constant CarbonConcentration: FixedValue=0.4
        NutrientDemandFunctions DMDemands
          MultiplyFunction Structural
            PartitionFractionDemandFunction DMDemandFunction
              PhaseLookup PartitionFraction
                PhaseLookupValue Early: Start=Emergence; End=StartFlowering
                  Constant Function: FixedValue=0.2
                PhaseLookupValue Middle: Start=StartFlowering; End=StartGrainFilling
                  Constant Function: FixedValue=0.1
                PhaseLookupValue Late: Start=StartGrainFilling; End=Maturity
                  Constant Function: FixedValue=0
            Constant StructuralFraction: FixedValue=1
          Constant Metabolic: FixedValue=0
          StorageDMDemandFunction Storage
            SubtractFunction StorageFraction
              Constant One: FixedValue=1
              VariableReference StructuralFraction: VariableName=[Root].DMDemands.Structural.StructuralFraction
          Constant QStructuralPriority: FixedValue=1
          Constant QMetabolicPriority: FixedValue=1
          Constant QStoragePriority: FixedValue=1
        NutrientDemandFunctions NDemands
          MultiplyFunction Structural
            VariableReference MinNconc: VariableName=[Root].minimumNconc
            VariableReference PotentialDMAllocation: VariableName=[Root].potentialDMAllocation.Structural
          MultiplyFunction Metabolic
            SubtractFunction MetabolicNconc
              VariableReference CritNconc: VariableName=[Root].criticalNConc
              VariableReference MinNconc: VariableName=[Root].minimumNconc
            VariableReference PotentialDMAllocation: VariableName=[Root].potentialDMAllocation.Structural
          StorageNDemandFunction Storage
            VariableReference NitrogenDemandSwitch: VariableName=[Root].nitrogenDemandSwitch
            VariableReference MaxNconc: VariableName=[Root].maximumNconc
          Constant QStructuralPriority: FixedValue=1
          Constant QMetabolicPriority: FixedValue=1
          Constant QStoragePriority: FixedValue=1
        VariableReference CriticalNConc: VariableName=[Root].MinimumNConc
        NutrientPoolFunctions InitialWt
          Constant Structural: FixedValue=0.2; Units=g/plant
          Constant Metabolic: FixedValue=0
          Constant Storage: FixedValue=0
        Constant RootDepthStressFactor: FixedValue=1
      SimpleLeaf Leaf: Albedo=0.25; Gsmax350=0.015; R50=150; LeafInitialisationStage=Emergence; Height=0; BaseHeight=0; Width=0; FRGR=0; PotentialEP=0; WaterDemand=0; KDead=0.3; LAIDead=0
        RUEModel Photosynthesis
          MultiplyFunction RUE
            Constant Potential: FixedValue=1.69
              Memo
                This approach is based upon the value used in [robertson_simulation_2002] increased to account for partitioning to roots.
            Constant TriazineToleranceModifier: FixedValue=1
          WeightedTemperatureFunction FT: MaximumTemperatureWeighting=0.75
            Memo
              This approach is based upon that used in Bell, WRight and Hammer (1992) Crop Sci
            XYPairs: X=[0, 10, 22, 30]; Y=[0, 1, 1, 0]
          LinearInterpolationFunction FVPD
            XYPairs: X=[0, 10, 50]; Y=[1, 1, 1]
            VariableReference XValue: VariableName=[Leaf].Photosynthesis.VPD
          LinearInterpolationFunction FN
            XYPairs: X=[0, 1, 1.5]; Y=[0, 1, 1]
            VariableReference XValue: VariableName=[Leaf].Fn
          RUECO2Function FCO2: PhotosyntheticPathway=C3
          VariableReference RadnInt: VariableName=[Leaf].RadiationIntercepted
          MinimumFunction FW
            MinimumFunction Excess
              ExponentialFunction PersistentReduction: A=0; B=1; C=-0.04
                MovingSumFunction: NumberOfDays=25
                  ExpressionFunction: Expression=1 - [Leaf].Photosynthesis.FW.Excess.Today
              PhaseLookup Today
                PhaseLookupValue SowingToStartFlowering: Start=Sowing; End=GreenBud
                  LinearInterpolationFunction EarlySeason
                    XYPairs: X=[0, 0.9, 1]; Y=[1, 1, 1]
                    VariableReference XValue: VariableName=[Root].WetRootFraction
                PhaseLookupValue StartFloweringToStartGrainFill: Start=GreenBud; End=StartGrainFilling
                  LinearInterpolationFunction MidSeason
                    XYPairs: X=[0, 0.9, 1]; Y=[1, 1, 1]
                    VariableReference XValue: VariableName=[Root].WetRootFraction
                PhaseLookupValue StartGrainFillToEndCrop: Start=StartGrainFilling; End=Unused
                  LinearInterpolationFunction LateSeason
                    XYPairs: X=[0, 0.9, 1]; Y=[1, 1, 1]
                    VariableReference XValue: VariableName=[Root].WetRootFraction
            LinearInterpolationFunction Deficient
              XYPairs: X=[0, 1]; Y=[0, 1]
              VariableReference XValue: VariableName=[Leaf].Fw
        StomatalConductanceCO2Modifier
          VariableReference PhotosynthesisCO2Modifier: VariableName=[Leaf].Photosynthesis.FCO2
        MaximumFunction Area
          AddFunction Calculation
            MultiplyFunction Initial
              Constant AreaPerPlant: FixedValue=0.0005
              VariableReference Population: VariableName=[Plant].SowingData.Population
            SubtractFunction Change
              AccumulateAtEvent AreaGrowth: StartStageName=Emergence; EndStageName=StartFlowering; AccumulateEventName=[Clock].DoActualPlantGrowth
                MultiplyFunction DeltaArea
                  VariableReference DeltaMass: VariableName=[Leaf].Allocated.StructuralWt
                  VariableReference SLA: VariableName=[Leaf].SpecificArea
              AccumulateAtEvent AreaSenesced: StartStageName=Emergence; EndStageName=HarvestRipe; AccumulateEventName=[Clock].DoActualPlantGrowth
                MultiplyFunction DeltaArea
                  VariableReference DeltaSenesced: VariableName=[Leaf].Senesced.StructuralWt
                  VariableReference SLA: VariableName=[Leaf].SpecificAreaCanopy
              AccumulateAtEvent AreaRemoved: StartStageName=Emergence; EndStageName=HarvestRipe; AccumulateEventName=[Clock].DoReportCalculations
                MultiplyFunction DeltaArea
                  VariableReference DeltaRemoved: VariableName=[Leaf].Removed.StructuralWt
                  VariableReference SLA: VariableName=[Leaf].SpecificAreaCanopy
          Constant Zero: FixedValue=0
        MinimumFunction FRGR
          VariableReference RUE_FT: VariableName=[Leaf].Photosynthesis.FT
          MinimumFunction Others
            VariableReference RUE_FN: VariableName=[Leaf].Photosynthesis.FN
            VariableReference RUE_FVPD: VariableName=[Leaf].Photosynthesis.FVPD
        MultiplyFunction ExtinctionCoefficient
          Constant PotentialExtinctionCoefficient: FixedValue=0.6
          LinearInterpolationFunction FOXk
            XYPairs: X=[0, 5, 10]; Y=[1, 1, 1]
            VariableReference XValue: VariableName=[CumulativeExcessWaterStress]
        LinearInterpolationFunction HeightFunction
          XYPairs: X=[1, 2, 3, 4, 5, 6, 9]; Y=[0, 0, 50, 400, 700, 900, 1000]
          VariableReference XValue: VariableName=[Phenology].Stage
        AddFunction NodeNumber
          Constant Initial: FixedValue=0
          AccumulateFunction Change: StartStageName=Emergence; EndStageName=GreenBud; FractionRemovedOnCut=1; FractionRemovedOnHarvest=1; FractionRemovedOnGraze=1; FractionRemovedOnPrune=0
            DivideFunction DeltaNode
              VariableReference ThermalTime: VariableName=[Phenology].ThermalTime
              VariableReference Phyllochron: VariableName=[Leaf].Phyllochron
        AddFunction BranchNumber
          Constant One: FixedValue=1
          AccumulateFunction CumulativeBranching: StartStageName=Emergence; EndStageName=GreenBud; FractionRemovedOnCut=1; FractionRemovedOnHarvest=1; FractionRemovedOnGraze=1; FractionRemovedOnPrune=0
            MultiplyFunction DeltaBranch
              VariableReference DeltaNode: VariableName=[Leaf].NodeNumber.Change.DeltaNode
              VariableReference BranchingRate: VariableName=[Leaf].BranchingRate
              MaximumFunction CoverFactor
                LinearInterpolationFunction Factor
                  XYPairs: X=[0, 0.3, 0.35, 1]; Y=[1, 1, 0, 0]
                  VariableReference XValue: VariableName=[Leaf].CoverTotal
                Constant Zero: FixedValue=0
              LinearInterpolationFunction WaterFactor
                XYPairs: X=[0.8, 1]; Y=[0, 1]
                VariableReference XValue: VariableName=[Leaf].Fw
              WeightedTemperatureFunction TemperatureFactor: MaximumTemperatureWeighting=0.5
                Memo
                  This approach is based upon that used in Bell, WRight and Hammer (1992) Crop Sci
                XYPairs: X=[0, 12, 22, 30]; Y=[0, 1, 1, 0]
        AccumulateFunction Number: StartStageName=Emergence; EndStageName=GreenBud; FractionRemovedOnCut=1; FractionRemovedOnHarvest=1; FractionRemovedOnGraze=1; FractionRemovedOnPrune=0
          MultiplyFunction DailyNumberIncrease
            VariableReference DeltaNode: VariableName=[Leaf].NodeNumber.Change.DeltaNode
            VariableReference BranchNumber: VariableName=[Leaf].BranchNumber
            VariableReference PlantNumber: VariableName=[Plant].SowingData.Population
        Constant NReallocationFactor: FixedValue=0.5
          Memo
            This model assumes that all metabolic and storage N is available for reallocation from senescing leaves.
        PhaseLookup SenescenceRate
          PhaseLookupValue Vegetative: Start=Emergence; End=StartFlowering
            MaximumFunction Rate
              MultiplyFunction AgeSenescence
                LinearInterpolationFunction Multiplier
                  XYPairs: X=[9, 10]; Y=[0, 1]
                  VariableReference XValue: VariableName=[Leaf].NodeNumber
                DivideFunction LeavesPerDay
                  VariableReference ThermalTime: VariableName=[Phenology].ThermalTime
                  VariableReference Phyllochron: VariableName=[Leaf].Phyllochron
                  VariableReference NodeNumber: VariableName=[Leaf].NodeNumber
                Constant: FixedValue=0
              LinearInterpolationFunction ShadeSenescence
                XYPairs: X=[1, 5, 8]; Y=[0, 0, 0.03]
                VariableReference XValue: VariableName=[Leaf].LAI
              LinearInterpolationFunction FOXSenescence
                XYPairs: X=[0, 5, 10]; Y=[0, 0, 0]
                VariableReference XValue: VariableName=[CumulativeExcessWaterStress]
          PhaseLookupValue Reproductive: Start=StartFlowering; End=EndPodDevelopment
            Memo
              Leaf senescence rate is calculated to ensure that all leaves are senesced by crop maturity.
            BoundFunction Rate
              MaximumFunction
                DivideFunction Fraction
                  VariableReference TT: VariableName=[Phenology].ThermalTime
                  SubtractFunction TTRemaining
                    ExpressionFunction TTRequired
                      Expression=[Phenology].EarlyFlowering.Target + [Phenology].EarlyPodDevelopment.Target + [Phenology].EarlyGrainFilling.Target+[Phenology].MidGrainFilling.Target
                    ExpressionFunction TTComplete
                      Expression=[Phenology].EarlyFlowering.ProgressThroughPhase + [Phenology].EarlyPodDevelopment.ProgressThroughPhase + [Phenology].EarlyGrainFilling.ProgressThroughPhase+[Phenology].MidGrainFilling.ProgressThroughPhase
                  Constant Modifier: FixedValue=1
                LinearInterpolationFunction FOXSenescence
                  XYPairs: X=[0, 5, 10]; Y=[0, 0, 0]
                  VariableReference XValue: VariableName=[CumulativeExcessWaterStress]
              Constant Lower: FixedValue=0
              Constant Upper: FixedValue=1
          PhaseLookupValue Senescent: Start=EndPodDevelopment; End=HarvestRipe
            Memo
              Leaf senescence rate is calculated to ensure that all leaves are senesced by crop maturity.
            Constant Rate: FixedValue=0.1
        Constant DetachmentRate: FixedValue=0.05; Units=/d
        DivideFunction InitialWt
          VariableReference InitialArea: VariableName=[Leaf].Area.Calculation.Initial
          VariableReference SLA: VariableName=[Leaf].SpecificArea
        MultiplyFunction LAIDead
          VariableReference SLA: VariableName=[Leaf].SpecificAreaCanopy
          VariableReference LeafDeadWt: VariableName=[Leaf].Dead.Wt
        LinearInterpolationFunction MaximumNConc
          XYPairs: X=[1, 3, 8]; Y=[0.06, 0.035, 0.03]
          VariableReference XValue: VariableName=[Leaf].NodeNumber
        VariableReference CriticalNConc: VariableName=[Leaf].MaximumNConc
        Constant MinimumNConc: FixedValue=0.02
        Constant MaintenanceRespiration: FixedValue=0; Units=0-1
        Constant DMConversionEfficiency: FixedValue=1; Units=0-1
        BiomassRemoval BiomassRemovalDefaults: HarvestFractionLiveToRemove=0; HarvestFractionDeadToRemove=0; HarvestFractionLiveToResidue=1; HarvestFractionDeadToResidue=1
        Constant NRetranslocationFactor: FixedValue=0.5
        Constant DMReallocationFactor: FixedValue=0
        Constant DMRetranslocationFactor: FixedValue=0.5
        Constant RemobilisationCost: FixedValue=0
        Constant CarbonConcentration: FixedValue=0.4
        NutrientDemandFunctions DMDemands
          DivideFunction Structural
            PhaseLookup DeltaLAIPotential
              PhaseLookupValue Vegetative: Start=Emergence; End=StartFlowering
                MultiplyFunction Delta
                  VariableReference AreaLargestLeaf: VariableName=[Leaf].AreaLargestLeaf
                  LinearInterpolationFunction RelativeArea
                    Memo
                      This approach is based upon that used in [robertson_simulation_2002].
                    XYPairs: X=[1, 2, 3, 4, 8]; Y=[0.03, 0.06, 0.12, 0.25, 1]
                    VariableReference XValue: VariableName=[Leaf].NodeNumber
                  LinearInterpolationFunction StageFactor
                    Memo
                      This approach is based upon that used in [robertson_simulation_2002].
                    XYPairs: X=[3, 4, 5, 5.2]; Y=[1, 1, 1, 0.1]
                    VariableReference XValue: VariableName=[Phenology].Stage
                  VariableReference PlantNumber: VariableName=[Plant].SowingData.Population
                  VariableReference BranchNumber: VariableName=[Leaf].BranchNumber
                  DivideFunction LAR
                    VariableReference TT: VariableName=[Phenology].ThermalTime
                    VariableReference Phyllochron: VariableName=[Leaf].Phyllochron
                  VariableReference NitrogenFactor: VariableName=[Leaf].FNmetabolic
                  WeightedTemperatureFunction TemperatureFactor: same as Replacements.Canola.Leaf.BranchNumber.CumulativeBranching.DeltaBranch.TemperatureFactor
              PhaseLookupValue Reproductive: Start=StartFlowering; End=Maturity
                Constant: FixedValue=0
            VariableReference SLA: VariableName=[Leaf].SpecificArea
            Memo
              Growth in leaf area is used to calculate the leaf dry matter demand.  Note that leaf biomass is assumed to consist of entirely structural dry matter.
          Constant Storage: FixedValue=0
          Constant Metabolic: FixedValue=0
          Constant QStructuralPriority: FixedValue=1
          Constant QMetabolicPriority: FixedValue=1
          Constant QStoragePriority: FixedValue=1
        NutrientDemandFunctions NDemands
          MultiplyFunction Structural
            VariableReference MinNconc: VariableName=[Leaf].minimumNconc
            VariableReference PotentialDMAllocation: VariableName=[Leaf].potentialDMAllocation.Structural
          MultiplyFunction Metabolic
            SubtractFunction MetabolicNconc
              VariableReference CritNconc: VariableName=[Leaf].criticalNConc
              VariableReference MinNconc: VariableName=[Leaf].minimumNconc
            VariableReference PotentialDMAllocation: VariableName=[Leaf].potentialDMAllocation.Structural
          StorageNDemandFunction Storage
            Constant NitrogenDemandSwitch: FixedValue=1
            VariableReference MaxNconc: VariableName=[Leaf].maximumNconc
          Constant QStructuralPriority: FixedValue=1
          Constant QMetabolicPriority: FixedValue=1
          Constant QStoragePriority: FixedValue=1
        LinearInterpolationFunction FrostFraction
          XYPairs: X=[-4, 4]; Y=[1, 1]
          VariableReference XValue: VariableName=[Weather].MinT
        Constant SpecificArea: FixedValue=0.025; Units=m^2/g
        Constant AreaLargestLeaf: FixedValue=0.015
        DivideFunction SpecificAreaCanopy
          VariableReference LAI: VariableName=[Leaf].Area
          VariableReference LeafWt: VariableName=[Leaf].Live.Wt
        LinearInterpolationFunction BranchingRate
          XYPairs: X=[0, 6.9, 7, 8, 9]; Y=[0, 0, 1, 1, 0]
          VariableReference XValue: VariableName=[Leaf].NodeNumber
        HoldFunction FinalLeafNumber: WhenToHold=FloralInitiation
          AddFunction FLN
            Constant PrimordiaAtEmergence: FixedValue=3
            AccumulateFunction InitiatedPrimordia: StartStageName=Germination; EndStageName=FloralInitiation; FractionRemovedOnCut=1; FractionRemovedOnHarvest=1; FractionRemovedOnGraze=1; FractionRemovedOnPrune=0
              DivideFunction DailyPrimordiaAppearance
                VariableReference TT: VariableName=[Phenology].ThermalTime
                VariableReference Plastochron: VariableName=[Leaf].Plastochron
        ExpressionFunction Plastochron: Expression=[Leaf].Phyllochron * [Leaf].Plastochron.Multiplier
          Constant Multiplier: FixedValue=0.8
        MultiplyFunction Phyllochron
          Constant Base: FixedValue=56
          LinearInterpolationFunction Multiplier
            XYPairs: X=[1, 7, 8, 9]; Y=[1, 1, 0.45, 0.45]
            VariableReference XValue: VariableName=[Leaf].NodeNumber
          LinearInterpolationFunction FOXphyllo
            XYPairs: X=[0, 5, 10]; Y=[1, 1, 1]
            VariableReference XValue: VariableName=[CumulativeExcessWaterStress]
        ExpressionFunction TrueLeafNumber: Expression=[Leaf].NodeNumber - 1
      ReproductiveOrgan Grain: GrowthRespiration=0; MaintenanceRespiration=0
        Biomass Live
        Biomass Dead
        AddFunction FillingDuration
          VariableReference EarlyGrainFillingDuration: VariableName=[Phenology].EarlyGrainFilling.Target
          VariableReference MidGrainFillingDuration: VariableName=[Phenology].MidGrainFilling.Target
          VariableReference LateGrainFillingDuration: VariableName=[Phenology].LateGrainFilling.Target
        PhaseLookup DMDemandFunction
          PhaseLookupValue GrainFilling: Start=StartGrainFilling; End=EndGrainFill
            MultiplyFunction HIGrainDemand
              VariableReference AboveGroundWt: VariableName=[AboveGround].Wt
              DivideFunction HarvestIndexIncrease
                MaximumFunction OutstandingHarvestIndexIncrease
                  ExpressionFunction Increase: Expression=[Grain].PotentialHarvestIndex - [Grain].HarvestIndex
                  Constant Zero: FixedValue=0
                SubtractFunction TTRemaining
                  ExpressionFunction ReproductiveTT
                    Expression=[Phenology].EarlyGrainFilling.Target+[Phenology].MidGrainFilling.Target+[Phenology].LateGrainFilling.Target
                  ExpressionFunction ReproductiveTTComplete
                    Expression=[Phenology].EarlyGrainFilling.ProgressThroughPhase+[Phenology].MidGrainFilling.ProgressThroughPhase+[Phenology].LateGrainFilling.ProgressThroughPhase
              VariableReference ThermalTime: VariableName=[Phenology].ThermalTime
        Constant MinimumNConc: FixedValue=0.02
        Constant MaximumNConc: FixedValue=0.058
        Constant WaterContent: FixedValue=0.13
        MultiplyFunction NFillingRate
          VariableReference NConc: VariableName=[Grain].MaximumNConc
          VariableReference DMDemand: VariableName=[Grain].DMDemandFunction
          VariableReference DMConversionEfficiency: VariableName=[Grain].DMConversionEfficiency
        BiomassRemoval BiomassRemovalDefaults: HarvestFractionLiveToRemove=1; HarvestFractionDeadToRemove=1; HarvestFractionLiveToResidue=0; HarvestFractionDeadToResidue=0
        Constant DMConversionEfficiency: FixedValue=0.89
        Constant RemobilisationCost: FixedValue=0
        Constant CarbonConcentration: FixedValue=0.4
        DivideFunction HarvestIndex
          VariableReference GrainWt: VariableName=[Grain].Wt
          VariableReference AboveGroundWt: VariableName=[AboveGround].Wt
        MultiplyFunction MaximumPotentialGrainSize
          Constant GrainSize: FixedValue=0.0038
            Memo
              This parameter is only used to provide a very approximate estimate of final grain number.  Grain growth is calculated from harvest index increase.
          LinearInterpolationFunction FOXgs
            XYPairs: X=[0, 5, 10]; Y=[1, 1, 1]
            VariableReference XValue: VariableName=[CumulativeExcessWaterStress]
        MultiplyFunction PotentialHarvestIndex
          VariableReference PodHarvestIndex: VariableName=[Pod].PotentialHarvestIndex
          Constant GrainFraction: FixedValue=0.72; Units=0-1
          LinearInterpolationFunction FOXhi
            XYPairs: X=[0, 5, 10]; Y=[1, 1, 1]
            VariableReference XValue: VariableName=[CumulativeExcessWaterStress]
        NutrientPoolFunctions DMDemandPriorityFactors
          Constant Structural: FixedValue=1
          Constant Metabolic: FixedValue=1
          Constant Storage: FixedValue=1
        NutrientPoolFunctions NDemandPriorityFactors: same as Replacements.Canola.Grain.DMDemandPriorityFactors
        DivideFunction NumberFunction
          Memo
            Grain number is simply estimated from grain mass and a constant potential grain size.
          VariableReference GrainMass: VariableName=[Grain].Wt
          VariableReference PotentialGrainSize: VariableName=[Grain].MaximumPotentialGrainSize
      GenericOrgan Stem: IsAboveGround=true
        Constant NReallocationFactor: FixedValue=1
        PhaseLookup NRetranslocationFactor
          PhaseLookupValue Vegetative: Start=Emergence; End=StartGrainFilling
            Constant RetranslocationFactor: FixedValue=0
          PhaseLookupValue GrainFilling: Start=StartGrainFilling; End=EndGrainFill
            Constant RetranslocationFactor: FixedValue=0.1
        PhaseLookup DMRetranslocationFactor
          PhaseLookupValue Vegetative: Start=Emergence; End=StartGrainFilling
            Constant RetranslocationFactor: FixedValue=0
          PhaseLookupValue GrainFilling: Start=StartGrainFilling; End=EndGrainFill
            Constant RetranslocationFactor: FixedValue=0.2
        LinearInterpolationFunction MaximumNConcX
          XYPairs: X=[3, 4, 5, 6]; Y=[4, 0.035, 0.025, 0.02]
          VariableReference XValue: VariableName=[Phenology].Stage
        VariableReference MaximumNConc: VariableName=[Leaf].MaximumNConc
        Constant MinimumNConc: FixedValue=0.005
        PhaseLookupValue NitrogenDemandSwitch: Start=Emergence; End=StartGrainFilling
          Constant: FixedValue=1
        BiomassRemoval BiomassRemovalDefaults: HarvestFractionLiveToRemove=0.5; HarvestFractionDeadToRemove=0; HarvestFractionLiveToResidue=0.1; HarvestFractionDeadToResidue=0
        PhaseLookup SenescenceRate
          PhaseLookupValue PostCanopyPhase: Start=EndPodDevelopment; End=Maturity
            MinimumFunction Rate
              DivideFunction Fraction
                VariableReference TT: VariableName=[Phenology].ThermalTime
                SubtractFunction TTRemaining
                  ExpressionFunction PostCanopyTT
                    Expression=[Phenology].LateGrainFilling.Target+[Phenology].Maturing.Target
                  ExpressionFunction PostCanopyTTComplete
                    Expression=[Phenology].LateGrainFilling.ProgressThroughPhase+[Phenology].Maturing.ProgressThroughPhase
              Constant One: FixedValue=1
        Constant DetachmentRateFunction: FixedValue=0; Units=/d
        Constant MaintenanceRespirationFunction: FixedValue=0; Units=0-1
        Constant DMConversionEfficiency: FixedValue=1; Units=0-1
        Constant DMReallocationFactor: FixedValue=1
        VariableReference CriticalNConc: VariableName=[Stem].MinimumNConc
        Constant RemobilisationCost: FixedValue=0
        Constant CarbonConcentration: FixedValue=0.4
        NutrientDemandFunctions NDemands
          MultiplyFunction Structural
            VariableReference MinNconc: VariableName=[Stem].minimumNconc
            VariableReference PotentialDMAllocation: VariableName=[Stem].potentialDMAllocation.Structural
          MultiplyFunction Metabolic
            SubtractFunction MetabolicNconc
              VariableReference CritNconc: VariableName=[Stem].criticalNConc
              VariableReference MinNconc: VariableName=[Stem].minimumNconc
            VariableReference PotentialDMAllocation: VariableName=[Stem].potentialDMAllocation.Structural
          StorageNDemandFunction Storage
            VariableReference NitrogenDemandSwitch: VariableName=[Stem].nitrogenDemandSwitch
            VariableReference MaxNconc: VariableName=[Stem].maximumNconc
          Constant QStructuralPriority: FixedValue=1
          Constant QMetabolicPriority: FixedValue=1
          Constant QStoragePriority: FixedValue=1
        RetranslocateNonStructural RetranslocateNitrogen
        NutrientPoolFunctions InitialWt
          Constant Structural: FixedValue=0; Units=g/m^2
          Constant Metabolic: FixedValue=0
          Constant Storage: FixedValue=0
        Constant Photosynthesis: FixedValue=0
        VariableReference initialNConcFunction: VariableName=[Stem].MinimumNConc
        PartitionFractionDemandFunction PotentialGrowth
          PhaseLookup PartitionFraction
            PhaseLookupValue StemGrowthPhase: Start=Emergence; End=EndFlowering
              LinearInterpolationFunction StemFraction
                XYPairs: X=[100, 101, 200, 201, 400]; Y=[0.5, 0.5, 0.5, 0.75, 0.75]
                VariableReference XValue: VariableName=[AboveGround].Wt
            PhaseLookupValue GrainFilling: Start=EndFlowering; End=EndGrainFill
              Constant StemFraction: FixedValue=0
        NutrientDemandFunctions DMDemands
          MultiplyFunction Structural
            PhaseLookup Fraction
              PhaseLookupValue EarlyStemGrowthPhase: Start=Emergence; End=StartFlowering
                Memo
                  This approach is based upon that used in [robertson_simulation_2002].
                Constant Fraction: FixedValue=0.7
              PhaseLookupValue LateStemGrowthPhase: Start=StartFlowering; End=EndFlowering
                Memo
                  This approach is based upon that used in [robertson_simulation_2002].
                Constant Fraction: FixedValue=0.8
              PhaseLookupValue PodAndGrainGrowth: Start=EndFlowering; End=EndGrainFill
                Constant Fraction: FixedValue=0
            VariableReference DMDemand: VariableName=[Stem].PotentialGrowth
          Constant Metabolic: FixedValue=0
          MultiplyFunction Storage
            VariableReference DMDemand: VariableName=[Stem].PotentialGrowth
            SubtractFunction StorageFraction
              Constant One: FixedValue=1
              VariableReference StructuralFraction: VariableName=[Stem].DMDemands.Structural.Fraction
          Constant QStructuralPriority: FixedValue=1
          Constant QMetabolicPriority: FixedValue=1
          Constant QStoragePriority: FixedValue=1
      GenericOrgan Shell: IsAboveGround=true
        Constant NReallocationFactor: FixedValue=1
        Constant NRetranslocationFactor: FixedValue=0.5
        Constant MaximumNConc: FixedValue=0.045
        VariableReference CriticalNConc: VariableName=[Shell].MinimumNConc
        Constant MinimumNConc: FixedValue=0.01
        Constant DMRetranslocationFactor: FixedValue=0.1
        PhaseLookupValue NitrogenDemandSwitch: Start=StartPodDevelopment; End=EndPodDevelopment
          Constant: FixedValue=1
        BiomassRemoval BiomassRemovalDefaults: HarvestFractionLiveToRemove=0; HarvestFractionDeadToRemove=0; HarvestFractionLiveToResidue=1; HarvestFractionDeadToResidue=1
        PhaseLookup SenescenceRate
          PhaseLookupValue ReproductivePhase: Start=EndPodDevelopment; End=Maturity
            MinimumFunction Rate
              DivideFunction Fraction
                VariableReference TT: VariableName=[Phenology].ThermalTime
                SubtractFunction TTRemaining
                  ExpressionFunction ReproductiveTT
                    Expression=[Phenology].LateGrainFilling.Target + [Phenology].Maturing.Target
                  ExpressionFunction ReproductiveTT1Complete
                    Expression=[Phenology].LateGrainFilling.ProgressThroughPhase + [Phenology].Maturing.ProgressThroughPhase
              Constant One: FixedValue=1
        Constant DetachmentRateFunction: FixedValue=0; Units=/d
        Constant MaintenanceRespirationFunction: FixedValue=0; Units=0-1
        Constant DMConversionEfficiency: FixedValue=1; Units=0-1
        Constant DMReallocationFactor: FixedValue=0
        Constant RemobilisationCost: FixedValue=0
        Constant CarbonConcentration: FixedValue=0.4
        AddFunction FillingDuration
          VariableReference EarlyPodDevelopmentDuration: VariableName=[Phenology].EarlyPodDevelopment.Target
          VariableReference EarlyGrainFillingDuration: VariableName=[Phenology].EarlyGrainFilling.Target
          VariableReference MidGrainFillingDuration: VariableName=[Phenology].MidGrainFilling.Target
        NutrientDemandFunctions DMDemands
          MultiplyFunction Structural
            PhaseLookup DMDemandFunction
              PhaseLookupValue PodDevelopment: Start=StartPodDevelopment; End=EndPodDevelopment
                MultiplyFunction HIPodDemand
                  VariableReference AboveGroundWt: VariableName=[AboveGround].Wt
                  DivideFunction HarvestIndexIncrease
                    MaximumFunction OutstandingHarvestIndexIncrease
                      ExpressionFunction Increase: Expression=[Shell].PotentialHarvestIndex - [Shell].HarvestIndex
                      Constant Zero: FixedValue=0
                    SubtractFunction TTRemaining
                      ExpressionFunction ShellGrowthTT
                        Expression=[Phenology].EarlyPodDevelopment.Target+[Phenology].EarlyGrainFilling.Target+[Phenology].MidGrainFilling.Target
                      ExpressionFunction ShellGrowthTTComplete
                        Expression=[Phenology].EarlyPodDevelopment.ProgressThroughPhase+[Phenology].EarlyGrainFilling.ProgressThroughPhase+[Phenology].MidGrainFilling.ProgressThroughPhase
                  VariableReference ThermalTime: VariableName=[Phenology].ThermalTime
            Constant StructuralFraction: FixedValue=1
          Constant Metabolic: FixedValue=0
          StorageDMDemandFunction Storage
            SubtractFunction StorageFraction
              Constant One: FixedValue=1
              VariableReference StructuralFraction: VariableName=[Shell].DMDemands.Structural.StructuralFraction
          Constant QStructuralPriority: FixedValue=1
          Constant QMetabolicPriority: FixedValue=1
          Constant QStoragePriority: FixedValue=1
        NutrientDemandFunctions NDemands
          MultiplyFunction Structural
            VariableReference MinNconc: VariableName=[Shell].minimumNconc
            VariableReference PotentialDMAllocation: VariableName=[Shell].potentialDMAllocation.Structural
          StorageNDemandFunction Storage
            VariableReference NitrogenDemandSwitch: VariableName=[Shell].nitrogenDemandSwitch
            VariableReference MaxNconc: VariableName=[Shell].maximumNconc
          Constant Metabolic: FixedValue=0
          Constant QStructuralPriority: FixedValue=1
          Constant QMetabolicPriority: FixedValue=1
          Constant QStoragePriority: FixedValue=1
        RetranslocateNonStructural RetranslocateNitrogen
        NutrientPoolFunctions InitialWt: same as Replacements.Canola.Stem.InitialWt
        MultiplyFunction PotentialHarvestIndex
          VariableReference PodHarvestIndex: VariableName=[Pod].PotentialHarvestIndex
          Constant ShellFraction: FixedValue=0.28; Units=0-1
        DivideFunction HarvestIndex
          VariableReference ShellWt: VariableName=[Shell].Wt
          VariableReference AboveGroundWt: VariableName=[AboveGround].Wt
        VariableReference initialNConcFunction: VariableName=[Shell].MinimumNConc
        ExpressionFunction Area: Expression=[Shell].Live.Wt*[Shell].SpecificArea
          VariableReference Index: VariableName=[Shell].Area
        Constant SpecificArea: FixedValue=0.01; Units=m^2/g
        EnergyBalance: Albedo=0.25; Gsmax350=0.015; R50=150; KDead=0; LAIDead=0
          MinimumFunction FRGRer
            VariableReference RUE_FT: VariableName=[Shell].Photosynthesis.FT
            MinimumFunction Others
              VariableReference RUE_FN: VariableName=[Shell].Photosynthesis.FN
              VariableReference RUE_FVPD: VariableName=[Shell].Photosynthesis.FVPD
          VariableReference Tallness: VariableName=[Leaf].Height
          VariableReference Deepness: VariableName=[Leaf].Height
          Constant DeadAreaIndex: FixedValue=1
          Constant GreenExtinctionCoefficient: FixedValue=0.8
          Constant Wideness: FixedValue=0
          Constant DeadExtinctionCoefficient: FixedValue=0
          StomatalConductanceCO2Modifier
            VariableReference PhotosynthesisCO2Modifier: VariableName=[Shell].Photosynthesis.FCO2
          VariableReference GreenAreaIndex: VariableName=[Shell].Area.Index
        RUEModel Photosynthesis
          VariableReference RUE: VariableName=[Leaf].Photosynthesis.RUE
          VariableReference FT: VariableName=[Leaf].Photosynthesis.FT
          VariableReference FVPD: VariableName=[Leaf].Photosynthesis.FVPD
          LinearInterpolationFunction FN
            XYPairs: X=[0, 1, 1.5]; Y=[1, 1, 1]
            VariableReference XValue: VariableName=[Leaf].Fn
          LinearInterpolationFunction FW
            XYPairs: X=[0, 1]; Y=[0, 1]
            VariableReference XValue: VariableName=[Leaf].Fw
          VariableReference RadnInt: VariableName=[Shell].EnergyBalance.RadiationIntercepted
          VariableReference FCO2: VariableName=[Leaf].Photosynthesis.FCO2
      CompositeBiomass Pod: OrganNames=[Shell, Grain]; IncludeLive=true; IncludeDead=true
        DivideFunction HarvestIndex
          VariableReference PodWt: VariableName=[Pod].Wt
          VariableReference AboveGroundWt: VariableName=[AboveGround].Wt
        Constant PotentialHarvestIndex: FixedValue=0.6
          Memo
            This approach is based upon that used in [robertson_simulation_2002].
      Constant MortalityRate: FixedValue=0
      CompositeBiomass AboveGround: OrganNames=[Leaf, Stem, Grain, Shell]; IncludeLive=true; IncludeDead=true
      CompositeBiomass AboveGroundLive: OrganNames=[Leaf, Stem, Grain, Shell]; IncludeLive=true; IncludeDead=false
      CompositeBiomass BelowGround: OrganNames=[Root]; IncludeLive=true; IncludeDead=true
      CompositeBiomass Total: OrganNames=[Leaf, Stem, Grain, Shell, Root]; IncludeLive=true; IncludeDead=true
      CompositeBiomass TotalLive: OrganNames=[Leaf, Stem, Grain, Shell, Root]; IncludeLive=true; IncludeDead=false
      CompositeBiomass TotalDead: OrganNames=[Leaf, Stem, Grain, Shell, Root]; IncludeLive=false; IncludeDead=true
      Folder CultivarFolder
        Cultivar Hyola575
          Command:
            [Phenology].Vegetative.Target.XYPairs.X = 0,10
            [Phenology].Vegetative.Target.XYPairs.Y = 300,1
            [Leaf].Phyllochron.Base.FixedValue = 60
            [Photosynthesis].RUE.Potential.FixedValue = 3.4
            [Phenology].EarlyFlowering.Target.FixedValue = 120 //100 default
            [Phenology].LateGrainFilling.Target.EntireGrainfillPeriod.FixedValue = 500//700
            [Grain].PotentialHarvestIndex.GrainFraction.FixedValue = 0.6
            //----- WL suggested parameters ---------
            [Root].RootFrontVelocity.AFPSFactor.XYPairs.X = 0.0, 0.05, 1.0
            [Root].RootFrontVelocity.AFPSFactor.XYPairs.Y = 0.0, 1.0, 1.0
            [Leaf].Photosynthesis.FW.Excess.Today.SowingToStartFlowering.EarlySeason.XYPairs.X = 0, 0.95, 1
            [Leaf].Photosynthesis.FW.Excess.Today.SowingToStartFlowering.EarlySeason.XYPairs.Y = 1, 1, 0.5
            [Leaf].Photosynthesis.FW.Excess.Today.StartFloweringToStartGrainFill.MidSeason.XYPairs.X = 0, 0.7, 1
            [Leaf].Photosynthesis.FW.Excess.Today.StartFloweringToStartGrainFill.MidSeason.XYPairs.Y = 1, 1, 0.25
            [Leaf].Photosynthesis.FW.Excess.Today.StartGrainFillToEndCrop.LateSeason.XYPairs.X = 0, 0.5, 1
            [Leaf].Photosynthesis.FW.Excess.Today.StartGrainFillToEndCrop.LateSeason.XYPairs.Y = 1, 1, 0.25
            [Grain].MaximumPotentialGrainSize.FOXgs.XYPairs.X = 0, 5, 10
            [Grain].MaximumPotentialGrainSize.FOXgs.XYPairs.Y = 1, 1, 1.175
            [Leaf].SenescenceRate.Vegetative.Rate.FOXSenescence.XYPairs.X = 0, 5, 10
            [Leaf].SenescenceRate.Vegetative.Rate.FOXSenescence.XYPairs.Y = 0, 0.03, 0.3
            [Leaf].SenescenceRate.Reproductive.Rate.MaximumFunction.FOXSenescence.XYPairs.X = 0, 5, 10
            [Leaf].SenescenceRate.Reproductive.Rate.MaximumFunction.FOXSenescence.XYPairs.Y = 0, 0.03, 0.3
            //    optional changes (not used)
            //   [Leaf].Phyllochron.FOXphyllo.XYPairs.Y = 1, 1.1, 1.15
            //   [Grain].PotentialHarvestIndex.FOXhi.XYPairs.Y = 1, 0.85, 0.75
            //  [Leaf].Photosynthesis.FW.Excess.PersistentReduction.C = -0.04
            // [Leaf].Photosynthesis.FW.Excess.PersistentReduction.MovingSumFunction.NumberOfDays = 25
        Cultivar Hyola575xxx
          Command:
            [Phenology].Vegetative.Target.XYPairs.X = 0, 10
            [Phenology].Vegetative.Target.XYPairs.Y = 300,1
            [Leaf].Phyllochron.Base.FixedValue = 51
            [Phenology].EarlyPodDevelopment.Target.FixedValue = 140
            [Photosynthesis].RUE.Potential.FixedValue = 2.2
            [Leaf].ExtinctionCoefficient.PotentialExtinctionCoefficient.FixedValue = 0.65
            [Grain].MaximumPotentialGrainSize.GrainSize.FixedValue = 0.0038
            // WL params
            [Root].RootFrontVelocity.AFPSFactor.XYPairs.Y = 0, 1, 1
            [Leaf].Photosynthesis.FW.Excess.Today.SowingToFloralInitiation.EarlySeason.XYPairs.X = 0, 0.9, 1
            [Leaf].Photosynthesis.FW.Excess.Today.SowingToFloralInitiation.EarlySeason.XYPairs.Y = 1, 1, 0
            [Leaf].Photosynthesis.FW.Excess.Today.FloralInitiationToStartGrainFill.MidSeason.XYPairs.X = 0, 0.9, 1
            [Leaf].Photosynthesis.FW.Excess.Today.FloralInitiationToStartGrainFill.MidSeason.XYPairs.Y = 1, 1, 0
            [Leaf].Photosynthesis.FW.Excess.Today.StartGrainFillToEndCrop.LateSeason.XYPairs.X = 0, 0.9, 1
            [Leaf].Photosynthesis.FW.Excess.Today.StartGrainFillToEndCrop.LateSeason.XYPairs.Y = 1, 1, 0
            [Grain].PotentialHarvestIndex.FOXhi.XYPairs.X = 0, 1, 2
            [Grain].PotentialHarvestIndex.FOXhi.XYPairs.Y = 1, 0.85, 0.8
            [Grain].MaximumPotentialGrainSize.FOXgs.XYPairs.X = 0, 1, 2
            [Grain].MaximumPotentialGrainSize.FOXgs.XYPairs.Y = 1, 0.5, 0.3
            [Leaf].Photosynthesis.FW.Excess.PersistentReduction.C = -0.01
            [Leaf].Photosynthesis.FW.Excess.PersistentReduction.MovingSumFunction.NumberOfDays = 35
            // [Leaf].Phyllochron.FOXphyllo.XYPairs.X = 0, 5, 10
            // [Leaf].Phyllochron.FOXphyllo.XYPairs.Y = 1, 1.05, 1.1
        Memo
          Cultivar names include several codes for several traits.
          * RR = Roundup Ready - These cultivars are developed to provide tolerance for Glyphosate herbicide.
          * CL = Clearfield - These cultivars as developed for the Clearfield Canola weed control system.
          * TT = Triazine Tolerant - These cultivars are developed to provide tolerance for triazine herbicide
          * RT = Triazine and Roundup - These cultivars are developed to provide tolerance to both triazine and glyphosate herbicides.
        Folder GenericCultivars
          Cultivar GenericWinter
            Command:
              [Phenology].Vegetative.Target.XYPairs.X = 0,30
              [Phenology].Vegetative.Target.XYPairs.Y = 2200,250
              [Leaf].Phyllochron.Base.FixedValue = 54
          Cultivar GenericEarly
            Command:
              [Phenology].Vegetative.Target.XYPairs.X = 0, 25
              [Phenology].Vegetative.Target.XYPairs.Y = 370,270
              [Leaf].Phyllochron.Base.FixedValue = 51
          Cultivar GenericLate
            Command:
              [Phenology].Vegetative.Target.XYPairs.X = 0, 20
              [Phenology].Vegetative.Target.XYPairs.Y = 500,250
              [Phenology].StemElongation.Target.PPResponse.Amount.FixedValue = 150
              // First leaf 2 Phyllochrons
              // last leaves at 0.55 Phyllochron
              [Leaf].Phyllochron.Base.FixedValue = 50
        Cultivar 43C80_CL
          Command:
            [Phenology].Vegetative.Target.XYPairs.X = 0,24
            [Phenology].Vegetative.Target.XYPairs.Y = 400,200
            [Leaf].Phyllochron.Base.FixedValue = 46
        Cultivar 44Y84_CL
          Command:
            [Phenology].Vegetative.Target.XYPairs.X = 0,20
            [Phenology].Vegetative.Target.XYPairs.Y = 300,200
            [Leaf].Phyllochron.Base.FixedValue = 48
        Cultivar 44Y87_CL
          Command:
            [Phenology].Vegetative.Target.XYPairs.X = 0,20
            [Phenology].Vegetative.Target.XYPairs.Y = 450,250
            [Leaf].Phyllochron.Base.FixedValue = 48
        Cultivar 44Y89_CL
          Command:
            [Phenology].Vegetative.Target.XYPairs.X = 0,20
            [Phenology].Vegetative.Target.XYPairs.Y = 380,280
            [Leaf].Phyllochron.Base.FixedValue = 48
        Cultivar 44Y90_CL
          Command:
            [Phenology].Vegetative.Target.XYPairs.X = 0,20
            [Phenology].Vegetative.Target.XYPairs.Y = 300,250
            [Leaf].Phyllochron.Base.FixedValue = 48
        Cultivar 45Y25_RR
          Command:
            [Phenology].Vegetative.Target.XYPairs.X = 0,20
            [Phenology].Vegetative.Target.XYPairs.Y = 300,200
            [Leaf].Phyllochron.Base.FixedValue = 50
        Cultivar 45Y86_CL
          Command:
            [Phenology].Vegetative.Target.XYPairs.X = 0,20
            [Phenology].Vegetative.Target.XYPairs.Y = 300,200
            [Leaf].Phyllochron.Base.FixedValue = 50
        Cultivar 45Y88_CL
          Command:
            [Phenology].Vegetative.Target.XYPairs.X = 0,20
            [Phenology].Vegetative.Target.XYPairs.Y = 380,250
            [Leaf].Phyllochron.Base.FixedValue = 50
        Cultivar 45Y91_CL
          Command:
            [Phenology].Vegetative.Target.XYPairs.X = 0,25
            [Phenology].Vegetative.Target.XYPairs.Y = 350,250
            [Leaf].Phyllochron.Base.FixedValue = 39
        Cultivar 46Y78
          Command:
            [Phenology].Vegetative.Target.XYPairs.X = 0,16
            [Phenology].Vegetative.Target.XYPairs.Y = 600,177.78
            [Leaf].Phyllochron.Base.FixedValue = 55
            [Leaf].Photosynthesis.RUE.TriazineToleranceModifier.FixedValue = 1.1
        Cultivar Arazzo
          Command:
            [Phenology].Vegetative.Target.XYPairs.X = 0,30
            [Phenology].Vegetative.Target.XYPairs.Y = 2200,250
            [Leaf].Phyllochron.Base.FixedValue = 55
        Cultivar Archer
          Command:
            [Phenology].Vegetative.Target.XYPairs.X = 0, 20
            [Phenology].Vegetative.Target.XYPairs.Y = 500,250
            [Phenology].StemElongation.Target.PPResponse.Amount.FixedValue = 150
            // First leaf 2 Phyllochrons
            // last leaves at 0.55 Phyllochron
            [Leaf].Phyllochron.Base.FixedValue = 50
        Cultivar ATR_Bonito
          Command:
            [Phenology].Vegetative.Target.XYPairs.X = 0,25
            [Phenology].Vegetative.Target.XYPairs.Y = 320,200
            [Leaf].Phyllochron.Base.FixedValue = 55
            [Leaf].Photosynthesis.RUE.TriazineToleranceModifier.FixedValue = 0.78
        Cultivar ATR_Gem
          Command:
            [Phenology].Vegetative.Target.XYPairs.X = 0,16
            [Phenology].Vegetative.Target.XYPairs.Y = 470,250
            [Leaf].Photosynthesis.RUE.TriazineToleranceModifier.FixedValue = 0.78
            [Leaf].Phyllochron.Base.FixedValue = 61
        Cultivar ATR_Marlin
          Command:
            [Phenology].Vegetative.Target.XYPairs.X = 0,16
            [Phenology].Vegetative.Target.XYPairs.Y = 550,250
            [Leaf].Phyllochron.Base.FixedValue = 55
            [Leaf].Photosynthesis.RUE.TriazineToleranceModifier.FixedValue = 0.78
        Cultivar ATR_Stingray
          Command:
            [Phenology].Vegetative.Target.XYPairs.X = 0,6
            [Phenology].Vegetative.Target.XYPairs.Y = 500,250
            [Phenology].StemElongation.Target.PPResponse.Amount.FixedValue = 200
            [Leaf].Photosynthesis.RUE.TriazineToleranceModifier.FixedValue = 0.78
            [Leaf].Phyllochron.Base.FixedValue = 54
        Cultivar ATR_Wahoo
          Command:
            [Phenology].Vegetative.Target.XYPairs.X = 0,13
            [Phenology].Vegetative.Target.XYPairs.Y = 500,200
            [Leaf].Phyllochron.Base.FixedValue = 57
            [Leaf].Photosynthesis.RUE.TriazineToleranceModifier.FixedValue = 0.78
        Cultivar Crusher_TT
          Command:
            [Phenology].Vegetative.Target.XYPairs.X = 0,20
            [Phenology].Vegetative.Target.XYPairs.Y = 300,200
            [Leaf].Photosynthesis.RUE.TriazineToleranceModifier.FixedValue = 0.78
            [Leaf].Phyllochron.Base.FixedValue = 50
        Cultivar AV_Garnet
          Command:
            [Phenology].Vegetative.Target.XYPairs.X = 0,16
            [Phenology].Vegetative.Target.XYPairs.Y = 550,250
            [Leaf].Phyllochron.Base.FixedValue = 55
        Cultivar AV_Zircon
          Command:
            [Phenology].Vegetative.Target.XYPairs.X = 0,25
            [Phenology].Vegetative.Target.XYPairs.Y = 450,200
            [Leaf].Phyllochron.Base.FixedValue = 55
        Cultivar CB_Taurus
          Command:
            [Phenology].Vegetative.Target.XYPairs.X = 17,18,30
            [Phenology].Vegetative.Target.XYPairs.Y = 2500,850,250
            [Leaf].Phyllochron.Base.FixedValue = 50
        Cultivar CB_Telfer
          Command:
            [Phenology].Vegetative.Target.XYPairs.X = 0,20
            [Phenology].Vegetative.Target.XYPairs.Y = 350,350
            [Phenology].StemElongation.Target.PPResponse.Amount.FixedValue = 50
            [Leaf].Photosynthesis.RUE.TriazineToleranceModifier.FixedValue = 0.78
            [Leaf].Phyllochron.Base.FixedValue = 65
            [Leaf].Plastochron.Multiplier.FixedValue=0.9
        Cultivar CBI_306
          Command:
            [Phenology].Vegetative.Target.XYPairs.X = 0,20
            [Phenology].Vegetative.Target.XYPairs.Y = 300,200
            [Leaf].Phyllochron.Base.FixedValue = 50
        Cultivar CSCH_01
          Command:
            [Phenology].Vegetative.Target.XYPairs.X = 0,20
            [Phenology].Vegetative.Target.XYPairs.Y = 310,250
            [Leaf].Phyllochron.Base.FixedValue = 50
        Cultivar CSCH_02
          Command:
            [Phenology].Vegetative.Target.XYPairs.X = 0,20
            [Phenology].Vegetative.Target.XYPairs.Y = 400,250
            [Leaf].Phyllochron.Base.FixedValue = 50
        Cultivar Drum_triazine
          Command:
            [Phenology].Vegetative.Target.XYPairs.X = 0,20
            [Phenology].Vegetative.Target.XYPairs.Y = 300,200
            [Leaf].Photosynthesis.RUE.TriazineToleranceModifier.FixedValue = 0.78
            [Leaf].Phyllochron.Base.FixedValue = 50
        Cultivar Dunkeld
          Command:
            [Phenology].Vegetative.Target.XYPairs.X = 0,20
            [Phenology].Vegetative.Target.XYPairs.Y = 300,200
            [Leaf].Phyllochron.Base.FixedValue = 50
        Cultivar Grouse
          Command:
            [Phenology].Vegetative.Target.XYPairs.X = 0,20
            [Phenology].Vegetative.Target.XYPairs.Y = 300,200
            [Leaf].Phyllochron.Base.FixedValue = 50
        Cultivar GT50_RR
          Command:
            [Phenology].Vegetative.Target.XYPairs.X = 0,20
            [Phenology].Vegetative.Target.XYPairs.Y = 300,200
            [Leaf].Phyllochron.Base.FixedValue = 50
        Cultivar Hyola42
          Command:
            [Phenology].Vegetative.Target.XYPairs.X = 0,20
            [Phenology].Vegetative.Target.XYPairs.Y = 300,200
            [Leaf].Phyllochron.Base.FixedValue = 50
        Cultivar Hyola450_TT
          Command:
            [Phenology].Vegetative.Target.XYPairs.X = 0,20
            [Phenology].Vegetative.Target.XYPairs.Y = 350,150
            [Phenology].StemElongation.Target.PPResponse.Amount.FixedValue = 200
            [Leaf].Photosynthesis.RUE.TriazineToleranceModifier.FixedValue = 0.78
            [Leaf].Phyllochron.Base.FixedValue = 54
            //built from Stingray
        Cultivar Hyola559_TT
          Command:
            [Phenology].Vegetative.Target.XYPairs.X = 0,16
            [Phenology].Vegetative.Target.XYPairs.Y = 500,270
            [Leaf].Photosynthesis.RUE.TriazineToleranceModifier.FixedValue = 0.78
            [Leaf].Phyllochron.Base.FixedValue = 51
        Cultivar Hyola575_CL
          Command:
            [Phenology].Vegetative.Target.XYPairs.X = 0,16
            [Phenology].Vegetative.Target.XYPairs.Y = 370,270
            [Leaf].Phyllochron.Base.FixedValue = 49
          Alias Hyola_575_CL_GT
        Cultivar Hyola577_CL
          Command:
            [Phenology].Vegetative.Target.XYPairs.X = 0,16
            [Phenology].Vegetative.Target.XYPairs.Y = 360,213.33
            [Leaf].Phyllochron.Base.FixedValue = 49
        Cultivar Hyola600_RR
          Command:
            [Phenology].Vegetative.Target.XYPairs.X = 0,5,8,20
            [Phenology].Vegetative.Target.XYPairs.Y = 500,400,200,150
            [Phenology].StemElongation.Target.PPResponse.Amount.FixedValue = 200
            [Leaf].Phyllochron.Base.FixedValue = 51
        Cultivar Hyola635_CL
          Command:
            [Phenology].Vegetative.Target.XYPairs.X = 0,20
            [Phenology].Vegetative.Target.XYPairs.Y = 550,280
            [Leaf].Phyllochron.Base.FixedValue = 51
        Cultivar Hyola650_TT
          Command:
            [Phenology].Vegetative.Target.XYPairs.X = 0,20
            [Phenology].Vegetative.Target.XYPairs.Y = 550,250
            [Leaf].Photosynthesis.RUE.TriazineToleranceModifier.FixedValue = 0.78
            [Leaf].Phyllochron.Base.FixedValue = 48
        Cultivar Hyola725_RT
          Command:
            [Phenology].Vegetative.Target.XYPairs.X = 0,20
            [Phenology].Vegetative.Target.XYPairs.Y = 550,250
            [Leaf].Photosynthesis.RUE.TriazineToleranceModifier.FixedValue = 0.78
            [Leaf].Phyllochron.Base.FixedValue = 48
        Cultivar Hyola750_TT
          Command:
            [Phenology].Vegetative.Target.XYPairs.X = 0,20
            [Phenology].Vegetative.Target.XYPairs.Y = 550,300
            [Leaf].Photosynthesis.RUE.TriazineToleranceModifier.FixedValue = 0.78
            [Leaf].Phyllochron.Base.FixedValue = 50
        Cultivar Hyola970_CL
          Command:
            [Phenology].Vegetative.Target.XYPairs.X = 0,30
            [Phenology].Vegetative.Target.XYPairs.Y = 2200,250
            [Leaf].Phyllochron.Base.FixedValue = 54
        Cultivar Hyola971_CL
          Command:
            [Phenology].Vegetative.Target.XYPairs.X = 0,30
            [Phenology].Vegetative.Target.XYPairs.Y = 2200,250
            [Leaf].Phyllochron.Base.FixedValue = 54
        Cultivar IH30_RR
          Command:
            [Phenology].Vegetative.Target.XYPairs.X = 0,16
            [Phenology].Vegetative.Target.XYPairs.Y = 342.22,220
            [Leaf].Phyllochron.Base.FixedValue = 51
        Cultivar IVT4510
          Command:
            [Phenology].Vegetative.Target.XYPairs.X = 0,20
            [Phenology].Vegetative.Target.XYPairs.Y = 300,200
            [Leaf].Phyllochron.Base.FixedValue = 48
        Cultivar K50055
          Command:
            [Phenology].Vegetative.Target.XYPairs.X = 0,25
            [Phenology].Vegetative.Target.XYPairs.Y = 500,400
            [Leaf].Phyllochron.Base.FixedValue = 56
        Cultivar K50058
          Command:
            [Phenology].Vegetative.Target.XYPairs.X = 0,25
            [Phenology].Vegetative.Target.XYPairs.Y = 500,450
            [Leaf].Phyllochron.Base.FixedValue = 66
        Cultivar Karoo_triazine
          Command:
            [Phenology].Vegetative.Target.XYPairs.X = 0,20
            [Phenology].Vegetative.Target.XYPairs.Y = 300,200
            [Leaf].Photosynthesis.RUE.TriazineToleranceModifier.FixedValue = 0.78
            [Leaf].Phyllochron.Base.FixedValue = 50
        Cultivar Monty
          Command:
            [Phenology].Vegetative.Target.XYPairs.X = 0,20
            [Phenology].Vegetative.Target.XYPairs.Y = 305,205
            [Leaf].Phyllochron.Base.FixedValue = 50
        Cultivar NS_Diamond
          Command:
            [Phenology].Vegetative.Target.XYPairs.X = 0, 25
            [Phenology].Vegetative.Target.XYPairs.Y = 370,270
            [Leaf].Phyllochron.Base.FixedValue = 51
        Cultivar NX953
          Command:
            [Phenology].Vegetative.Target.XYPairs.X = 0,20
            [Phenology].Vegetative.Target.XYPairs.Y = 160,160
            [Leaf].Phyllochron.Base.FixedValue = 50
        Cultivar Oscar
          Command:
            [Phenology].Vegetative.Target.XYPairs.X = 0,20
            [Phenology].Vegetative.Target.XYPairs.Y = 470,270
            [Leaf].Phyllochron.Base.FixedValue = 53
        Cultivar Pinnacle_triazine
          Command:
            [Phenology].Vegetative.Target.XYPairs.X = 0,20
            [Phenology].Vegetative.Target.XYPairs.Y = 300,200
            [Leaf].Photosynthesis.RUE.TriazineToleranceModifier.FixedValue = 0.78
            [Leaf].Phyllochron.Base.FixedValue = 55
          Alias Pinnacle
        Cultivar Range
          Command:
            [Phenology].Vegetative.Target.XYPairs.X = 0,20
            [Phenology].Vegetative.Target.XYPairs.Y = 300,200
            [Leaf].Phyllochron.Base.FixedValue = 50
        Cultivar Sensation
          Command:
            [Phenology].Vegetative.Target.XYPairs.X = 0,30
            [Phenology].Vegetative.Target.XYPairs.Y = 2200,250
            [Leaf].Phyllochron.Base.FixedValue = 54
        Cultivar SF_Brazzil
          Command:
            [Phenology].Vegetative.Target.XYPairs.X = 0,30
            [Phenology].Vegetative.Target.XYPairs.Y = 2200,250
            [Leaf].Phyllochron.Base.FixedValue = 50
        Cultivar SF_Edimax
          Command:
            [Phenology].Vegetative.Target.XYPairs.X = 0,30
            [Phenology].Vegetative.Target.XYPairs.Y = 2200,250
            [Leaf].Phyllochron.Base.FixedValue = 45
        Cultivar Victory_7001_CL
          Command:
            [Phenology].Vegetative.Target.XYPairs.X = 0,25
            [Phenology].Vegetative.Target.XYPairs.Y = 430,200
            [Leaf].Phyllochron.Base.FixedValue = 56
      Constant SeedMortalityRate: FixedValue=0
      AccumulateFunction CumulativeExcessWaterStress: StartStageName=Emergence; EndStageName=Maturity; FractionRemovedOnCut=0; FractionRemovedOnHarvest=1; FractionRemovedOnGraze=0; FractionRemovedOnPrune=0
        SubtractFunction
          Constant: FixedValue=1
          VariableReference: VariableName=[Leaf].Photosynthesis.FW.Excess.Today
    Report Report_Day: EventNames=[Clock].DoReport
      VariableNames:
        [Clock].Today
        [Clock].Today.Year as Year
        [Canola].DaysAfterSowing as DAS
        [Canola].Phenology.Stage as stage
        [Canola].Phenology.CurrentStageName
        [Canola].AboveGroundLive.Wt
        [Canola].AboveGround.Wt
        [Canola].AboveGround.Wt * 10 as Biomass_kgha
        [Canola].AboveGround.N * 10 as BiomassN_kgha
        [Canola].Grain.Wt
        [Canola].Grain.Wt * 10 * 1.15 as Yield_kgha
        [Canola].Grain.Wt * 10 * 0.0149/0.85 as Yield_buac
        [Canola].Leaf.Photosynthesis.FW.Excess
        [Canola].Leaf.Photosynthesis.RueAct as RUE
        [Canola].Leaf.Photosynthesis.RUE.Potential.FixedValue
        [Canola].Leaf.Photosynthesis.FT
        [Canola].Leaf.Photosynthesis.FW.Deficient
        [Canola].Leaf.Photosynthesis.FW.Excess
        [Canola].Leaf.Photosynthesis.FN
        [Canola].Leaf.Photosynthesis.FCO2
        [Canola].Leaf.Photosynthesis.FVPD
        [paddock].Fertiliser.NitrogenApplied as Fert.applied
        Divide (GrainN_kgha, Yield_kgha)*100 as GrainN_conc
        Divide (StoverN_kgha, StoverDM_kgha)*100 as StoverN_conc
        [Canola].Population
        [Canola].Grain.Size * 1000 as GrainSize_mg
        [Canola].Grain.Number as GrainNumber_m2
        sum([Soil].NO3.kgha[1:5]) as NO3_0to30cm
        [Swim3].WaterTable
        [Swim3].SW[1]
        [Swim3].SW[3]
        [Swim3].Es
        [Swim3].WaterTable
        [Swim3].Pond
        [Swim3].Runoff
        [Swim3].Drainage
        [Swim3].SubsurfaceDrain
        [Irrigation].IrrigationApplied
        [Leaf].Transpiration + [Swim3].Es as evapotranspiration
        [Canola].DaysAfterSowing
        [Canola].Root.Depth
        [Canola].Leaf.Photosynthesis.FW.Excess as oxdef_photo
        [Canola].Leaf.LAI
        [Canola].Leaf.CoverGreen
        [Canola].Leaf.CoverTotal
        [Canola].Leaf.NodeNumber
        [Canola].Leaf.Live.N
        [Canola].Leaf.Live.NConc * 100 as leafGreennconc
        [Canola].Leaf.Live.Wt as leafGreenWt
        [Canola].Leaf.Dead.Wt as SenescedWt
        //[Canola].Phenology.FloweringDAS as flowering_date
        sum([NO3].kgha)
        [Canola].Total.NConc
        [Canola].TotalLive.NConc
        //([Swim3].PSI[4] * 0.75 + [Swim3].PSI[5] * 0.25) as PSI_15cm
        //([Swim3].PSI[5] * 0.5 + [Swim3].PSI[6] * 0.5) as PSI_30cm
        //([Swim3].PSI[6] * 0.5 + [Swim3].PSI[7] * 0.5) as PSI_45cm
        //([Swim3].PSI[7] * 0.5 + [Swim3].PSI[8] * 0.5) as PSI_60cm
        //([Swim3].PSI[7] * 0.75 + [Swim3].PSI[8] * 1) as PSI_60cm
        [Clock].Today.DayOfYear as day
        sum([Swim3].SWmm[1:4]) as sw_30cm
        sum([Physical].SATmm[1:4]) as sat_30cm
        sum([Physical].DULmm[1:4]) as dul_30cm
        sum([Swim3].SWmm[1:5]) as sw_90cm
        [Canola].Leaf.NodeNumber
        [Canola].Leaf.Transpiration
        [Canola].Leaf.Photosynthesis.FW as swdef_photo
        [Weather].Rain
        [Weather].Radn
        [Weather].VPD
        [Weather].MaxT
        [Weather].MinT
        [Weather].MeanT
        // irrigation
        sum of (1 - [Canola].Leaf.Photosynthesis.) from [Clock].StartOfYear to [Clock].EndOfYear as OxdefPhotoSum
        //sum of (1 - oxdef_fix) from [Clock].StartOfYear to [Clock].EndOfYear as OxdefFixSum
        sum of divide(1 - oxdef_photo, 1 - oxdef_photo) from [Clock].StartOfYear to [Clock].EndOfYear as OxdefPhotoDays
        //sum of divide(1 - oxdef_fix, 1 - oxdef_fix) from [Clock].StartOfYear to [Clock].EndOfYear as OxdefFixDays
        [Canola].Root.WetRootFraction as wet_root_fr
        //[Canola].Grain.OxdefAccumulation as AccumulatedOx
        [Canola].Leaf.Transpiration + [Swim3].Es as evapotranspiration
        ((sum([Swim3].SWmm) - sum([Soil].Physical.LL15mm)) / (sum([Soil].Physical.SATmm) -  sum([Soil].Physical.LL15mm))) as SWRatio
        sum of [Irrigation].IrrigationApplied from [Canola].Sowing to [Canola].Harvesting as TotalIrrigation
    Report Report_Harvest: EventNames=[Canola].Harvesting
      VariableNames:
        [Clock].Today
        [Clock].Today.Year as Year
        [Canola].SowingDate as SowingDate
        //[Canola].Phenology.FloweringDAS as DTF
        [Canola].Phenology.MaturityDAS as DTM
        [Canola].Grain.Wt
        [Canola].Grain.Wt * 10 as Yield_kgha
        [Canola].Grain.N * 10 as GrainN_kgha
        [Canola].Grain.Wt * 10 * 0.0149/0.85 as Yield_buac
        [Canola].Grain.Wt/([Canola].AboveGround.Wt+0.00001) as HI
        [Canola].Grain.N/([Canola].AboveGround.N+0.00001) as NHI
        [Canola].AboveGround.Wt * 10 as Biomass_kgha
        [Canola].AboveGround.N * 10 as BiomassN_kgha
        (([Canola].AboveGround.Wt) - ([Canola].Grain.Wt))*10 as StoverDM_kgha
        (([Canola].AboveGround.N) - ([Canola].Grain.N))*10 as StoverN_kgha
        [Canola].LAI
        [Canola].Leaf.NConc * 100 as LeafNConc
        Divide (GrainN_kgha, Yield_kgha)*100 as GrainN_conc
        Divide (StoverN_kgha, StoverDM_kgha)*100 as StoverN_conc
        [Canola].Population
        [Canola].Grain.Size * 1000 as GrainSize_mg
        [Canola].Grain.Number as GrainNumber_m2
        sum([Soil].NO3.kgha[1:2]) as NO3_harvest_0to30cm
        sum([Soil].NO3.kgha[3:7]) as NO3_harvest_30to120cm
        //sum of [Swim].FlowNO3[11] from [Canola].Sowing to [Canola].Harvesting as GS_leaching_150cm
        [NO3].Flow[7] from [Canola].Sowing to [Canola].Harvesting as GS_leaching_120cm
        sum of sum([Soil].Nutrient.N2Oatm) from [Canola].Sowing to [Canola].Harvesting as GS_N20
        sum of sum([Soil].Nutrient.DenitrifiedN) from [Canola].Sowing to [Canola].Harvesting as GS_Denitrification
        sum of [Fertiliser].NitrogenApplied from [Canola].Sowing to [Canola].Harvesting as N_fertilizer
        sum of sum([Soil].Nutrient.MineralisedN + [SurfaceOrganicMatter].SurfaceResidue.Decomposition.MineralisedN) from [Canola].Sowing to [Canola].Harvesting as GS_NetNMineralization
        sum of [Irrigation].IrrigationApplied from [Canola].Sowing to [Canola].Harvesting as TotalIrrigation
        //[Structure].FinalLeafNumber
        //[Structure].AllLeavesAppeared
  Memo
    Ploschuk et al. 2021

    Ploschuk, Rocio Antonella, et al. “Early‐ and Late‐waterlogging Differentially Affect the Yield of Wheat, Barley, Oilseed Rape and Field Pea Through Changes in Leaf Area Index, Radiation Interception and Radiation Use Efficiency.” Journal of Agronomy and Crop Science, vol. 207, no. 3, Mar. 2021, pp. 504–20. https://doi.org/10.1111/jac.12486.

    **Study years** -> 2 [2017 & 2018]

    **Sowing dates** -> July 26 (2017) & July 24 (2018)

    **Experimental setup** -> Outdoor in plastic containers with size of 1 m3 (1*1*1m, depth).
    	              4 species (wheat, barley, oilseed rape, and field pea) * 3 treatments (Control; early wl; late wl) * 3 replicates

    **Planting density** -> Wheat & barley = 275 pl/m2
    	         oilseed rape & field pea = 100 pl/m2

    **Row to row & plant to plant spacing** -> Wheat and barley have 10 rows with 4 cm distance b/w plants
    	               oil seed rape and field pea have 9 rows with 10 cm distance b/w plants per container

    **Fertilizer application** -> 200 kg N/ha in three equal split doses at 15 days after sowing, with second and third dose at begining of recovery period  after early and late waterlogging treatments

    **Waterlogging treatments** ->

    			1. Control (daily watered to ensure no water stress)

    			2. Early waterlogging (vegetative stage) -> 43 & 56 DAS in 2017 and 2018, respectively

    			3. Late waterlogging (reproductive stage) -> wheat and barley [72 and 78 DAS in 2017 and 2018 respectively]
    					 	  oilseed rape and field pea [78 and 80 DAS in 2017 and 2018, respectively]

    **Duration of waterlogging** -> 14 days with water standing of 1-2 cm
  Folder Ploschuk 2021
    Experiment Exp_1
      Factors
        Factor _: Specification=[WL]
          Operations Control
          Operations Early_WL
            2017-09-07  [SwimSubsurfaceDrain].Open = false
            2017-09-07  [DumpWater].Script.Dump = true
            2017-09-21  [SwimSubsurfaceDrain].Open = true
            2017-09-21  [DumpWater].Script.Dump = false
            2018-09-18  [SwimSubsurfaceDrain].Open = false //2018-09-18
            2018-09-18  [DumpWater].Script.Dump = true //2018-09-18
            2018-10-02  [SwimSubsurfaceDrain].Open = true //2018-10-02
            2018-10-02  [DumpWater].Script.Dump = false //2018-10-02
          Operations Late_WL
            2017-10-07  [SwimSubsurfaceDrain].Open = false
            2017-10-07  [DumpWater].Script.Dump = true
            2017-10-21  [SwimSubsurfaceDrain].Open = true
            2017-10-21  [DumpWater].Script.Dump = false
            2018-10-10  [SwimSubsurfaceDrain].Open = false
            2018-10-10  [DumpWater].Script.Dump = true
            2018-10-24  [SwimSubsurfaceDrain].Open = true
            2018-10-24  [DumpWater].Script.Dump = false
      Simulation Base_Exp1
        Clock: Start=2017-01-01; End=2018-12-31
        Weather: FileName=Argentina_01.met
        Summary summaryfile
        Zone paddock: Area=1; Slope=0; AspectAngle=0; Altitude=50
          Operations Sowing
            2017-07-26  [Canola].Sow(Hyola575,100,55,120) //this is cultivar name, density, depth, row space
            2018-07-24  [Canola].Sow(Hyola575,100,60,120)
          Manager Harvesting
            Crop = [Canola]
```csharp
using APSIM.Shared.Utilities;
using Models.Utilities;
using Models.Soils;
using Models.PMF;
using Models.Core;
using System;
using System.Linq;

namespace Models
{
    [Serializable] 
    public class Script : Model
    {
        [Description("Crop")]
        public IPlant Crop { get; set; }
        
        [EventSubscribe("DoManagement")]
        private void OnDoManagement(object sender, EventArgs e)
        {
            if (Crop.IsReadyForHarvesting)
            {
                Crop.Harvest();
                Crop.EndCrop();
            }
        }
    }
}
```
          SurfaceOrganicMatter: InitialResidueName=wheat; InitialResidueType=wheat; InitialResidueMass=500; InitialStandingFraction=0; InitialCPR=0; InitialCNR=100
          Report Report_Day: EventNames=[Clock].DoReport
          Soil Synthetic Soil Derived from ISRIC SoilGrids: ASCOrder=NA; ASCSubOrder=NA; SoilType=Luvic Phaeozems; Site=NA; NearestTown=NA; Region=NA; State=NA; Country=Argentina; NaturalVegetation=NA; ApsoilNumber=9999; Latitude=-34.625; Longitude=-58.375; LocationAccuracy=+- 250 m; YearOfSampling=2019; DataSource=ISRIC SoilGrids
            Water: Thickness=[150, 150, 150, 150, 200, 200, 200]; InitialValues=[0.475, 0.456, 0.44175, 0.43225, 0.43035, 0.4351, 0.437]; FilledFromTop=true
            Physical
              Thickness  ParticleSizeSand  ParticleSizeSilt  ParticleSizeClay  Rocks  BD     AirDry  LL15    DUL    SAT    KS
              150        50.7              23.7              26                0      1.181  0.076   0.1816  0.352  0.5    17.21
              150        50                22.5              27                0      1.248  0.075   0.18    0.342  0.48   15.325
              150        49                22                29                0      1.286  0.077   0.1864  0.347  0.465  12.152
              150        47                22                31                0      1.319  0.079   0.1896  0.348  0.455  9.636
              200        46.2              21.8              31.8              0      1.333  0.079   0.1896  0.346  0.453  8.833
              200        46.8              21.2              31.2              0      1.329  0.077   0.1864  0.341  0.458  9.36
              200        47                21.2              31                0      1.327  0.077   0.184   0.339  0.46   0.01
              Rocks source: Calculated
              SoilCrop WheatSoil: LL=[0.227, 0.225, 0.233, 0.247, 0.259, 0.269, 0.281]; KL=[0.06, 0.06, 0.06, 0.055, 0.048, 0.04, 0.032]; XF=[1, 1, 1, 1, 1, 1, 1]
              SoilCrop CanolaSoil: same as Ploschuk 2021.Exp_1.Base_Exp1.paddock.Synthetic Soil Derived from ISRIC SoilGrids.Physical.WheatSoil
              SoilCrop BarleySoil: LL=[0.227, 0.225, 0.233, 0.246, 0.257, 0.264, 0.275]; KL=[0.07, 0.07, 0.07, 0.065, 0.058, 0.049, 0.041]; XF=[1, 1, 1, 1, 1, 1, 1]
            Organic: FOMCNRatio=40; CarbonUnits=Total
              Thickness  Carbon  SoilCNRatio  FBiom  FInert  FOM
              150        2.764   10.2         0.04   0.367   60.6
              150        2.026   10.2         0.031  0.473   48.4
              150        1.26    10.2         0.014  0.739   38.7
              150        1.047   10.2         0.01   0.867   30.9
              200        0.904   10.2         0.01   0.99    22.9
              200        0.824   10.2         0.01   0.99    16.9
              200        0.752   10.2         0.01   0.99    12.6
            Chemical: PHUnits=Water
              Thickness  PH   CEC
              150        6.5  16.558
              150        6.5  15.117
              150        6.5  13.861
              150        6.6  13.782
              200        6.7  13.62
              200        6.8  13.32
              200        6.9  13.118
              CEC source: Calculated
            Nutrient
            Solute NO3: InitialValuesUnits=ppm; WaterTableConcentration=0; D0=0; DepthConstant=0; MaxDepthSoluteAccessible=0; RunoffEffectivenessAtMovingSolute=0; MaxEffectiveRunoff=0
              Thickness  InitialValues  Exco  FIP
              150        0              0     1
              150        0              0     1
              150        0              0     1
              150        0              0     1
              200        0              0     1
              200        0              0     1
              200        0              0     1
            Solute NH4: InitialValuesUnits=ppm; WaterTableConcentration=0; D0=0; DepthConstant=0; MaxDepthSoluteAccessible=0; RunoffEffectivenessAtMovingSolute=0; MaxEffectiveRunoff=0
              Thickness  InitialValues  Exco  FIP
              150        0              1     1
              150        0              1     1
              150        0              1     1
              150        0              1     1
              200        0              1     1
              200        0              1     1
              200        0              1     1
            Solute Urea: InitialValuesUnits=kg/ha; WaterTableConcentration=0; D0=0; DepthConstant=0; MaxDepthSoluteAccessible=0; RunoffEffectivenessAtMovingSolute=0; MaxEffectiveRunoff=0
              Thickness  InitialValues  Exco  FIP
              150        0              0     1
              150        0              0     1
              150        0              0     1
              150        0              0     1
              200        0              0     1
              200        0              0     1
              200        0              0     1
            SoilTemperature Temperature
            Swim3: Salb=0.13; CN2Bare=50; CNRed=20; CNCov=0.8; KDul=0.1; PSIDul=-100; VC=true; DTMin=0; DTMax=1440; MaxWaterIncrement=5; SpaceWeightingFactor=0.5; SoluteSpaceWeightingFactor=0.5; Dis=15; Disp=1; A=1; DTHC=0; DTHP=1; vcon1=7.28e-09; vcon2=7.26e-07; eo_time=06:00; eo_durn=720; default_rain_time=00:00; default_rain_duration=720; Diagnostics=false
              SwimSubsurfaceDrain: DrainDepth=1150; DrainSpacing=1000; DrainRadius=100; Klat=1000; ImpermDepth=1150; Open=true
          Plant Canola
          Irrigation
          Report Report_Harvest: VariableNames=[Clock].Today as Date; EventNames=[Canola].Harvesting
          Manager DumpWater
            ApplicationAmount = 100
```csharp
using System;
using Models.Core;
using Models.Interfaces;
using Models.PMF;
using APSIM.Shared.Utilities;

namespace Models
{
    [Serializable]
    public class Script : Model
    {
        [Link] IClock Clock;
        [Link] ISummary Summary;
        [Link] Irrigation Irrigation;
        
        [Description("Ammount of water to dump (mm).")]
        public double ApplicationAmount { get; set; }
        
        public bool Dump { get; set;} = false;

        [EventSubscribe("DoManagement")]
        private void DoDailyCalculations(object sender, EventArgs e)
        {
            if (!Dump)
                return;
            Irrigation.Apply(ApplicationAmount);
        }
    }
}
```
          Manager SWIMSetLowerBC
            LowerBCType = watertable
            LowerBCValue = 1100
```csharp
using Models.Climate;
using APSIM.Shared.Utilities;
using Models.Soils.Nutrients;
using Models.Soils;
using Models.PMF;
using Models.Core;
using System.Xml.Serialization;
using System;
using System.Linq;
using Models.AgPasture;
using Models.Interfaces;

namespace Models
{
    [Serializable] 
    [System.Xml.Serialization.XmlInclude(typeof(Model))]
    public class Script : Model
    {
        [Link] Clock clock;
        [Link] ISummary summary;
        [Link] private Swim3 swim;
        //[Link] private PastureSpecies ryegrass;
        //[Link] private SimpleGrazing grazing;
        
        public enum LowerBCTypeOptions {gradient,seepage,potential,watertable};

        [Separator("Sets the lower boundary condition type (and value if set to 'potential' for SWIM3. The change is applied at the beginning of the first day of the simulation.")]
        
        [Description("What lower boundary condition is wanted?")] public LowerBCTypeOptions LowerBCType { get; set; }


        [Display(VisibleCallback = "IsBCPotentialOrWater")]
        [Description("What should the lower BC potential be set to (should be positive for a watertable) (mm)?")] public double LowerBCValue { get; set; }
        
        public bool IsBCPotentialOrWater => LowerBCType == LowerBCTypeOptions.potential || LowerBCType == LowerBCTypeOptions.watertable;





        public double SoilWaterStart  { get; set; }
        public double SoilWaterEnd  { get; set; }

        [EventSubscribe("DoDailyInitialisation")]
        private void DoDailyInitialisation(object sender, EventArgs e)
        {
        }

        [EventSubscribe("DoReportCalculations")]
        private void DoReportCalculations(object sender, EventArgs e)
        {
        }

        [EventSubscribe("DoManagement")]
        private void DoDailyCalculations(object sender, EventArgs e)
        {
            if (clock.Today == clock.StartDate)
            {
                summary.WriteMessage(this, "Script is setting lower boundary condition to " + LowerBCType, MessageType.Diagnostic);
                if (LowerBCType == LowerBCTypeOptions.gradient)
                    swim.SetLowerBCForGradient(bbcGradient: 0.0);   // in cm/cm (ibbc=0) Note that this is the default setting
                else if (LowerBCType == LowerBCTypeOptions.potential)
                    swim.SetLowerBCForGivenPotential(bbcPotential: LowerBCValue /10.0 );    //  convert to cm (ibbc=1), DUL is -100 cm so values more positive will often result in inflow to the bottom of the soil profile. Input in mm so divide here.
                else if (LowerBCType == LowerBCTypeOptions.seepage)
                    swim.SetLowerBCForSeepage(bbcPotentialSeepage: 0.0);  // in cm (ibbc=3). This is for zero-tension lysimeters
                else if (LowerBCType == LowerBCTypeOptions.watertable)
                    swim.SetLowerBCForSeepage(LowerBCValue / 10.0);  // in cm (ibbc=4). This is for water tables
                else
                    throw new Exception("Wrong lower boundary condition type");
            }
        }
    }
}
```
          Operations WL
          Fertiliser
          Manager Fertilise topup
            FertiliserType = UreaGranular
            Threshold = 80
            FertiliseDepth = 50
```csharp
using APSIM.Numerics;
using Models.Soils.Nutrients;
using System.Linq;
using System;
using Models.Core;
using Models.PMF;
using Models.Soils.Nutrients;
using APSIM.Shared.Utilities;
using Models.Soils;
namespace Models
{
    [Serializable]
    public class Script : Model
    {
        [Link] Clock Clock;
        [Link] Fertiliser Fertiliser;
        [Link(ByName=true)] Solute NO3;

        [Description("Type of fertiliser to apply? ")] 
        [Display(Type = DisplayType.FertiliserType)]public string FertiliserType { get; set; }
    
        [Description("Threshold amount of NO3 to topup to (kg/ha)")]
        public double Threshold { get; set;}
        
        [Description("Fertilise depth (mm)")]
        public double FertiliseDepth { get; set; }
        
        [EventSubscribe("DoManagement")]
        private void OnDoManagement(object sender, EventArgs e)
        {
            double Amount = Threshold - MathUtilities.Sum(NO3.kgha);
            Fertiliser.Apply(amount: Amount, type: FertiliserType, depth: FertiliseDepth);
        }
    }
}
```
          Manager Reset on date
            ResetDate = 1-Jan
            OffsetDays = 0
            ResetWater = True
            ResetNutrients = True
            ResetSOM = True
```csharp
using Models.Soils.Nutrients;
using APSIM.Shared.Utilities;
using Models.Surface;
using Models.Utilities;
using Models.Soils.Nutrients;
using Models.Soils;
using Models.PMF;
using Models.Core;
using System;
using System.Linq;
using Models.Interfaces;

namespace Models
{
    [Serializable]
    public class Script : Model
    {
        [Link] private Clock Clock;
        [Link] private Plant Wheat;
        [Link] private ISoilWater SoilWater;
        [Link] private Nutrient nutrient;
        [Link] private SurfaceOrganicMatter SOM;
        [Link] private Summary Summary;

        [Description("Date to reset on:")]
        public string ResetDate {get;set;}
        
        [Description("Offset by Days (Negative is Days Before, Positive is Days After):")]
        public int OffsetDays {get;set;}

        [Description("Reset Water?")]
        public bool ResetWater {get;set;}

        [Description("Reset Soil Nutrients?")]
        public bool ResetNutrients {get;set;}

        [Description("Reset Surface Organic Matter?")]
        public bool ResetSOM {get;set;}

        [EventSubscribe("DoManagement")]
        private void OnDoManagement(object sender, EventArgs e)
        {
            DateTime offsetDate = DateUtilities.GetDate(ResetDate, Clock.Today).AddDays(OffsetDays);
            if (offsetDate.Equals(Clock.Today))
            {
                if (ResetWater)
                {
                    Summary.WriteMessage(this, "Reset Water", MessageType.Diagnostic);
                    SoilWater.Reset();
                }
                if (ResetNutrients)
                {
                    Summary.WriteMessage(this, "Reset Nitrogen", MessageType.Diagnostic);
                    nutrient.Reset();
                }
                if (ResetSOM)
                {
                    Summary.WriteMessage(this, "Reset Surface OM", MessageType.Diagnostic);
                    SOM.Reset();
                }
            }
        }
    }
}
```
        SoilArbitrator
        MicroClimate: a_interception=0; b_interception=1; c_interception=0; d_interception=0; SoilHeatFluxFraction=0.4; MinimumHeightDiffForNewLayer=0; NightInterceptionFraction=0.5; ReferenceHeight=2
        Memo: same as Memo
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