Simulations: Version=197
  Memo TitlePage
    # The APSIM Canola Model
  DataStore
    ExcelInput: SheetNames=[Observed, OBSPhenology, OBSLeafAppearance]
      FileNames=[Greenethorpe2013.xlsx, Greenethorpe2014.xlsx, Harden1999.xlsx, WA_Obs_DPAgronomy+N.xlsx, Wagga2008.xlsx, GenomicsPhenology.xlsx, OCP.xlsx]
    PredictedObserved: PredictedTableName=HarvestReport; ObservedTableName=OBSPhenology; FieldNameUsedForMatch=SimulationName; FieldName2UsedForMatch=Canola.Phenology.CurrentStageName; AllColumns=true
    PredictedObserved PredictedObservedLeafAppearance: PredictedTableName=DailyReport; ObservedTableName=OBSLeafAppearance; FieldNameUsedForMatch=SimulationName; FieldName2UsedForMatch=Clock.Today; AllColumns=true
    PredictedObserved PredictedObservedDaily: PredictedTableName=DailyReport; ObservedTableName=Observed; FieldNameUsedForMatch=SimulationName; FieldName2UsedForMatch=Clock.Today; AllColumns=true
    Probability WaggaCDF: TableName=WaggaHarvestReport; Exceedence=false; FieldToSplitOn=SimulationName
  Folder Replacements
    Report DailyReport: EventNames=[Clock].DoReport
      VariableNames:
        [Clock].Today
        [Clock].Today.Year
        [Canola].DaysAfterSowing
        [Canola].Phenology.CurrentStageName
        [Canola].Leaf.TrueLeafNumber
        [Canola].SowingData.Cultivar
        [Canola].Phenology.CurrentStageName
        [Canola].Phenology.Stage
        [Canola].Phenology.Photoperiod
        [Canola].Phenology.StemElongation.Target.PPResponse
        [Weather].MeanT
        sum([Soil].Water.MM) as ProfileWater
        sum([Soil].SoilWater.ESW) as ProfileESW
        sum([Soil].NO3.kgha) as TotalSoilNitrogen
        [Canola].AboveGround.Wt
        [Canola].AboveGroundLive.Wt
        [Canola].AboveGround.N
        [Canola].AboveGroundLive.N
        [Canola].Grain.Wt
        [Canola].Grain.Live.Wt
        [Canola].Grain.N
        [Canola].Grain.NConc
        [Canola].Grain.Number
        [Canola].CoverTotal
        [Canola].Leaf.CoverTotal
        [Canola].Leaf.LAI
        [Canola].Leaf.Live.Wt
        [Canola].Leaf.Wt
        [Canola].Leaf.Live.N
        [Canola].Leaf.Live.NConc
        [Canola].Leaf.Dead.Wt
        [Canola].Leaf.Dead.N
        [Canola].Leaf.Dead.N
        [Canola].Leaf.BranchNumber
        [Canola].Leaf.Fw
        [Canola].Leaf.Fn
        [Canola].Leaf.FNmetabolic
        [Canola].Pod.Wt
        [Canola].Pod.N
        [Canola].Pod.NConc
        [Canola].Root.Depth
        [Canola].Root.N
        [Canola].Root.Wt
        [Canola].Root.NConc
        [Canola].Root.WaterUptake
        [Canola].Stem.N
        [Canola].Stem.NConc
        [Canola].Stem.Wt
        [Canola].Stem.Live.StorageWt
        [Canola].Shell.Wt
        [Canola].Shell.N
        [Canola].Leaf.Height
        [SurfaceOrganicMatter].Wt
        [Canola].Arbitrator.DM.TotalPlantDemand
        [Canola].Phenology.CumulativeVernalTime
        [Canola].Leaf.FinalLeafNumber
        [Canola].Root.NUptake
    Report HarvestReport: EventNames=[Canola].Harvesting
      VariableNames:
        [Clock].Today
        [Canola].SowingDate
        [Canola].SowingData.Cultivar
        [Canola].Phenology.CurrentStageName
        [Canola].Phenology.EmergenceDAS
        [Canola].Phenology.FloralInitiationDAS
        [Canola].Phenology.GreenBudDAS
        [Canola].Phenology.StartFloweringDAS
        [Canola].Phenology.CumulativeVernalTime
        [Canola].Grain.Wt
        [Canola].AboveGroundLive.Wt
        [Canola].AboveGround.Wt
        sum([Soil].Water.MM) as ProfileWater
        sum([Soil].NO3.kgha) as TotalSoilNitrogen
        [Canola].Phenology.MaturityDAS
        [Clock].Today.Year
        [Canola].DaysAfterSowing
    Report DailyBiomass: EventNames=[Clock].DoReport
      VariableNames:
        [Clock].Today
        [Canola].AboveGround.Wt
        [Canola].AboveGroundLive.Wt
        [Canola].Population
        [Canola].AboveGround.NConc
        [Canola].Grain.Wt
        [Canola].Grain.Size
        [Canola].Grain.Total.Wt
        [Canola].Grain.N
        [Canola].Grain.NConc
        [Canola].Grain.Number
        [Canola].LAI
        [Canola].Stem.Live.Wt
        [Canola].Leaf.Live.Wt
        [Canola].Stem.Wt
        [Canola].Leaf.Wt
        [Canola].Phenology.CurrentStageName
        [Canola].Phenology.Stage
    Manager Harvesting
```csharp
using Models.PMF.Phen;
using System;
using Models.Core;
using System.Collections.Generic;
using System.Text;
using Models.Soils;
using Models.PMF;
using Models;
using System.Xml.Serialization;
using APSIM.Shared.Utilities;

namespace Models
{
    [Serializable] 
    public class Script : Model
    {
        [Link] private Plant Canola;
        [Link] private Clock Clock;
        [Link(Type = LinkType.Path, Path = "[Canola].Phenology")]
        private Phenology phenology;

        [EventSubscribe("DoManagement")]
        private void OnDoManagement(object sender, EventArgs e)
        {
            if ((phenology.CurrentPhase.Name == "ReadyForHarvesting")||(Canola.IsAlive&&DateUtilities.DatesEqual("31-Dec", Clock.Today)))
            {
                Canola.Harvest();
                Canola.EndCrop();
            }
        }
    }
}
```
    Report DailyReport_DP: EventNames=[Clock].DoReport
      VariableNames:
        [Clock].Today
        [Canola].SowingData.Cultivar
        [Canola].Phenology.CurrentStageName
        [Canola].Phenology.Stage
        [Weather].MeanT
        sum([Soil].Water.MM) as ProfileWater
        sum([Soil].NO3.kgha) as TotalSoilNitrogen
        [Canola].AboveGround.Wt
        [Canola].AboveGroundLive.Wt
        [Canola].AboveGround.N
        [Canola].AboveGroundLive.N
        [Canola].AboveGroundLive.N*10 as UptakeNKgHA
        [canola].Grain.Wt
        [Canola].Grain.Live.Wt
        [Canola].Grain.N
        [Canola].Grain.NConc
        [Canola].Grain.Number
        [Canola].Grain.Size
        [Canola].Leaf.LAI
        [canola].Leaf.Live.Wt
        [canola].Leaf.Wt
        [canola].Leaf.SpecificArea
        [Canola].Leaf.Live.N
        [Canola].Leaf.Live.NConc
        [Canola].Leaf.Dead.Wt
        [Canola].Leaf.Dead.N
        [Canola].Leaf.Dead.NConc
        [canola].Pod.NConc
        [Canola].Root.Depth
        [Canola].Root.N
        [Canola].Root.Wt
        [Canola].Root.NConc
        [Canola].Root.WaterUptake
        [Canola].Stem.N
        [Canola].Stem.NConc
        [Canola].Stem.Wt
        [Canola].Stem.Live.StorageWt
        [Canola].Structure.Height
        [SurfaceOrganicMatter].Wt
        [Clock].Today.Year
        [Canola].Leaf.DeadCohortNo
        [Canola].Leaf.GreenCohortNo
        [Canola].Leaf.SenescingCohortNo
        [Canola].Leaf.ExpandedCohortNo
    Report HarvestReport_DP: EventNames=[Canola].Harvesting
      VariableNames:
        [Clock].Today
        [Canola].SowingData.Cultivar
        [Canola].AboveGroundLive.Wt
        [Canola].Grain.Wt
        [Canola].Phenology.CurrentStageName
        sum([Soil].Water.MM) as ProfileWater
        sum([Soil].NO3.kgha) as TotalSoilNitrogen
        [Canola].Phenology.MaturityDAS
        [Clock].Today.Year
    Report SowingReport: EventNames=[Canola].Sowing
      VariableNames:
        [Clock].Today
        [Canola].SowingData.Cultivar
        [IWeather].Latitude
        [IWeather].Longitude
  Folder Validation
    Memo
      A test dataset has been developed to test the APSIM Canola model for a range of environmental (soil and climate) conditions, management options (sowing dates, populations, nitrogen rates, irrigation) and genetic backgrounds (different regions, cultivar types).  These tests have been grouped into experiments focusing on phenological development or growth and resource use.  Graphs of model performance are provided for yield, biomass production, canopy development, phenological development, water and nitrogen uptake, and grain yield components.
    Folder Phenology Experiments
      Folder OCP Phenology
        Memo
          GRDC funded Optimised Canola Profitability project had experiments at Gatton in 2015, and Gatton and Canberra in 2016 and 2017 which consisted of 3 to 5 sowing dates [whish2020vernalisation]. In 2016 and 2017 photoperiod treatments (daylength extension with lights) were also applied. Experiments were in the field in single rows of 1-3.5m in length and row spacing of 50cm. Plants were well watered and supplied with nutrients and were removed after flowering.  The total number of cultivars included across the 5 experiments was 37, with each cultivar being included 4 to 28 combinations of location, year, TOS, and photoperiod (most cultivars between 13 and 18 combinations.
          Data collected:  plant growth stage and leaf number was recorded 2 to 3 x weekly between emergence and flowering for 8 plants in each plot. Data was summarised as average sowing, emergence, floral initation, green bud, flowering date for each cultivar/treatment.

          Contact Jeremy Whish, Julianne Lilley (CSIRO)
        Experiment Gatton2015
          Factors
            Permutation
              Memo
                All would be this
                [SowingRule].Script.CultivarName=44Y87_CL,44Y89_CL,45Y88_CL,ATR_Gem,ATR_Stingray,CB_Taurus,CB_Telfer,CBI_306,CSCH_01,CSCH_02,Hyola559_TT,Hyola575_CL,Hyola600_RR,Hyola635_CL,Hyola750_TT,Hyola970_CL,Hyola971_CL,IH30_RR,NS_Diamond,Oscar,SF_Brazzil,SF_Edimax

                Currently
                [SowingRule].Script.CultivarName=44Y87_CL,44Y89_CL,45Y88_CL,ATR_Gem,ATR_Stingray,CB_Taurus,CB_Telfer,CBI_306,CSCH_01,CSCH_02,Hyola559_TT,Hyola575_CL,Hyola600_RR,Hyola635_CL,Hyola750_TT,Hyola970_CL,Hyola971_CL,IH30_RR,NS_Diamond,Oscar,SF_Brazzil,SF_Edimax

                [SowingRule].Script.CultivarName=44Y87_CL,44Y89_CL,45Y88_CL,ATR_Gem,ATR_Stingray,CB_Taurus,CB_Telfer,CBI_306,CSCH_01,CSCH_02,Hyola559_TT,Hyola575_CL,Hyola600_RR,Hyola635_CL,Hyola750_TT,Hyola970_CL,Hyola971_CL,IH30_RR,NS_Diamond,Oscar,SF_Brazzil,SF_Edimax
              Factor TOS
                Specification=[SowingRule].Script.SowDate=31-Mar,15-Apr,7-May,15-May,23-Jun
              Factor Cv
                Specification=[SowingRule].Script.CultivarName=44Y87_CL,44Y89_CL,45Y88_CL,ATR_Gem,ATR_Stingray,CB_Taurus,CB_Telfer,Hyola559_TT,Hyola575_CL,Hyola600_RR,Hyola635_CL,Hyola750_TT,Hyola970_CL,Hyola971_CL,NS_Diamond,Oscar,SF_Brazzil,SF_Edimax
              Factor PP: Specification=[Weather]
                Weather 0: FileName=met/Gatton.met
          Simulation Gatton2015Base
            Clock: Start=2015-03-25; End=2015-12-31
            Summary summaryfile
            Weather: FileName=met/Gatton.met
            Zone Paddock: Area=1; Slope=0; AspectAngle=0; Altitude=50
              Irrigation
              Fertiliser
              SurfaceOrganicMatter: InitialResidueName=wheat_stubble; InitialResidueType=wheat; InitialResidueMass=1000; InitialStandingFraction=0; InitialCPR=0; InitialCNR=80
              Report DailyReport
              Report HarvestReport: EventNames=[Oats].Harvesting
                VariableNames:
                  [Canola].Structure.LeafTipsAppeared
                  [Canola].Structure.FinalLeafNumber
                  [Canola].Phenology.FlagLeafDAS
                  [Canola].Phenology.FloweringDAS
                  [Canola].Phenology.MaturityDAS
                  [Canola].Phenology.CurrentPhase.Name
                  [Canola].Phenology.CurrentStageName
                  [Canola].AboveGroundLive.Wt
                  [Canola].AboveGroundLive.Wt
                  [Canola].Grain.Wt
              Plant Canola
              Soil: Latitude=0; Longitude=0
                Water: Thickness=[150, 150, 300, 300, 300, 300, 300]; InitialValues=[0.2426, 0.3148, 0.371, 0.355, 0.3156, 0.2892, 0.341]; FilledFromTop=false
                Physical
                  Thickness  BD   AirDry  LL15  DUL    SAT
                  150        1.2  0.1     0.2   0.413  0.453
                  150        1.2  0.26    0.28  0.454  0.504
                  300        1.2  0.32    0.34  0.495  0.545
                  300        1.2  0.3     0.32  0.495  0.545
                  300        1.3  0.27    0.29  0.418  0.468
                  300        1.3  0.24    0.26  0.406  0.457
                  300        1.3  0.31    0.33  0.385  0.435
                  SoilCrop CanolaSoil: LL=[0.2, 0.28, 0.34, 0.34, 0.3, 0.35, 0.38]; KL=[0.08, 0.06, 0.04, 0.08, 0.06, 0.04, 0.02]; XF=[1, 1, 1, 1, 1, 1, 1]
                WaterBalance SoilWater: SummerDate=1-Nov; SummerU=6; SummerCona=3.5; WinterDate=1-Apr; WinterU=6; WinterCona=3.5; DiffusConst=40; DiffusSlope=16; Salb=0.13; CN2Bare=75; CNRed=20; CNCov=0.8; PSIDul=-100; Thickness=[150, 150, 300, 300, 300, 300, 300]; SWCON=[0.3, 0.3, 0.3, 0.3, 0.3, 0.3, 0.3]
                Organic: FOMCNRatio=33; CarbonUnits=Total
                  Thickness  Carbon  SoilCNRatio  FBiom  FInert  FOM
                  150        1       14.5         0.05   0.39    34.7129
                  150        0.64    14.5         0.02   0.47    27.0344
                  300        0.64    14.5         0.015  0.6     16.3972
                  300        0.47    14.5         0.01   0.83    9.9454
                  300        0.47    14.5         0.01   0.93    6.0322
                  300        0.35    14.5         0.01   0.93    3.6587
                  300        0.26    14.5         0.01   0.93    2.2191
                Chemical: Thickness=[150, 150, 300, 300, 300, 300, 300]; PH=[6.5, 6.2, 6.2, 6.3, 6.3, 6.4, 6.5]; PHUnits=Water
                Nutrient
                Solute NO3: Thickness=[150, 150, 300, 300, 300, 300, 300]; InitialValues=[5, 2, 2, 1, 1, 1, 1]; InitialValuesUnits=ppm; WaterTableConcentration=0; D0=0; DepthConstant=0; MaxDepthSoluteAccessible=0; RunoffEffectivenessAtMovingSolute=0; MaxEffectiveRunoff=0
                Solute NH4: Thickness=[150, 150, 300, 300, 300, 300, 300]; InitialValues=[1, 1, 1, 1, 1, 1, 1]; InitialValuesUnits=ppm; WaterTableConcentration=0; D0=0; DepthConstant=0; MaxDepthSoluteAccessible=0; RunoffEffectivenessAtMovingSolute=0; MaxEffectiveRunoff=0
                Solute Urea: Thickness=[150, 150, 300, 300, 300, 300, 300]; InitialValues=[0, 0, 0, 0, 0, 0, 0]; InitialValuesUnits=kg/ha; WaterTableConcentration=0; D0=0; DepthConstant=0; MaxDepthSoluteAccessible=0; RunoffEffectivenessAtMovingSolute=0; MaxEffectiveRunoff=0
                SoilTemperature Temperature
              MicroClimate: a_interception=0; b_interception=1; c_interception=0; d_interception=0; SoilHeatFluxFraction=0.4; MinimumHeightDiffForNewLayer=0; NightInterceptionFraction=0.5; ReferenceHeight=2
              Manager
```csharp
using Models.Soils;
using System;
using Models.Core;
using Models.PMF;
namespace Models
{
    [Serializable]
    [System.Xml.Serialization.XmlInclude(typeof(Model))]
    public class Script : Model
    {
        [Link] Clock Clock;

        [EventSubscribe("StartOfSimulation")]
        private void OnSimulationCommencing(object sender, EventArgs e)
        {
            /*
                
                 dateset = 0
                 emer_date = 0
                 endjuv_date = 0
                 anth_date = 0
                 mat_date = 0
                 event = 0
                 cum_temp = 0
                 cum_swdef = 0
                 cum_days = 0
            
            */
        }
        [EventSubscribe("DoManagement")]
        private void OnDoManagement(object sender, EventArgs e)
        {
            /*
                
               if (daysaftersowing = 1) then
                  cum_temp = 0
                  cum_swdef = 0
                  cum_days = 0
               elseif (stagename = 'start_grain_fill' or
                             stagename = 'end_grain_fill' or
                             stagename = 'maturity' or
                             stagename = 'harvest_ripe') then
                  cum_temp = cum_temp + (maxt + mint) / 2
                  cum_swdef = cum_swdef + swdef_photo
                  cum_days = cum_days + 1
               endif
               ! calculate canola oil content
               if (cum_days > 0) then
                  avg_temp = cum_temp / cum_days
                  avg_swdef = cum_swdef / cum_days
                  if (avg_temp <= 14) then
                     oil_conc =  47
                  else
                     oil_conc = (47 - ((avg_temp - 14)*1.21)) - (1.91*(1 - avg_swdef^2))
                  endif
               else
                  oil_conc = 0
               endif
            if (canola.stagename = 'harvest_ripe' or canola.plant_status = 'dead') then
               canola harvest
               canola kill_crop
               canola end_crop
               dateset = 0
            endif
            
            */
        }
    }
}
```
              Manager Harvesting
```csharp
using Models.PMF.Phen;
using System;
using Models.Core;
using System.Collections.Generic;
using System.Text;
using Models.Soils;
using Models.PMF;
using Models;
using System.Xml.Serialization;
using APSIM.Shared.Utilities;

namespace Models
{
    [Serializable] 
    public class Script : Model
    {
        [Link] private Plant Canola;
        [Link(Type = LinkType.Path, Path = "[Canola].Phenology")]
        private Phenology phenology;
        [EventSubscribe("DoManagement")]
        private void OnDoManagement(object sender, EventArgs e)
        {
            if (phenology.CurrentPhase.Name == "Ripening")
            {
                Canola.Harvest();
                Canola.EndCrop();
            }
        }
    }
}
```
              Manager SowingRule
                SowDate = 24-Jul
                CultivarName = Monty
                SowingDepth = 20
                RowSpacing = 700
                Population = 30
```csharp
using APSIM.Shared.Utilities;
using Models.Utilities;
using Models.Soils;
using Models.PMF;
using Models.Core;
using System;

namespace Models
{
    [Serializable]
    public class Script : Model
    {
        [Link] Clock Clock;
        [Link] Fertiliser Fertiliser;
        [Link] Summary Summary;
        [Link] Soil Soil;
        [Link] Plant Canola;
        Accumulator accumulatedRain;
        
        [Description("Sowing date (d-mmm)")]
        public string SowDate { get; set; }
        [Description("Cultivar to be sown")]
        public string CultivarName { get; set; }
        [Description("Sowing depth (mm)")]
        public double SowingDepth { get; set; }
        [Description("Row spacing (mm)")]
        public double RowSpacing { get; set; }
        [Description("Plant population (/m2)")]
        public double Population { get; set; }
        


        [EventSubscribe("DoManagement")]
        private void OnDoManagement(object sender, EventArgs e)
        {
            if (DateUtilities.WithinDates(SowDate, Clock.Today, SowDate))
            {
                Canola.Sow(population: Population, cultivar: CultivarName, depth: SowingDepth, rowSpacing: RowSpacing);    
            }
        
        }
        
    }
}
```
              Manager Irrigate at Sowing
                Amount = 160
```csharp
using Models.Soils;
using System;
using Models.Core;
using Models.PMF;
namespace Models
{
    [Serializable]
    public class Script : Model
    {
        [Link] Clock Clock;
        [Link] Irrigation Irrigation;
        
  
        [Description("Amount of irrigation to be applied (mm)")]
        public double Amount { get; set; }
        
        [EventSubscribe("Sowing")]
        private void OnSowing(object sender, EventArgs e)
        {                
                Irrigation.Apply(amount: Amount, depth: 0, efficiency: 1, willRunoff: false);
        }
        
    }
}
```
              Report SowingReport: EventNames=[Canola].Sowing
                VariableNames:
                  [Clock].Today
                  [Canola].SowingData.Cultivar
                  [IWeather].Latitude
                  [IWeather].Longitude
            SoilArbitrator
        Experiment Gatton2016
          Factors
            Permutation
              Memo
                All would be this
                [SowingRule].Script.CultivarName=43C80_CL,44Y87_CL,44Y89_CL,45Y86_CL,45Y88_CL,Archer,ATR_Gem,ATR_Stingray,AV_Garnet,CBI_306,CSCH_01,CSCH_02,Hyola559_TT,Hyola575_CL,Hyola600_RR,Hyola635_CL,Hyola750_TT,Hyola970_CL,Hyola971_CL,IH30_RR,NS_Diamond,Oscar,SF_Brazzil,SF_Edimax

                Currently
                [SowingRule].Script.CultivarName=43C80_CL,44Y87_CL,44Y89_CL,45Y86_CL,45Y88_CL,Archer,ATR_Gem,ATR_Stingray,AV_Garnet,CBI_306,CSCH_01,CSCH_02,Hyola559_TT,Hyola575_CL,Hyola600_RR,Hyola635_CL,Hyola750_TT,Hyola970_CL,Hyola971_CL,IH30_RR,NS_Diamond,Oscar,SF_Brazzil,SF_Edimax
              Factor TOS: Specification=[SowingRule].Script.SowDate=19-Apr,5-May,10-May,20-May
              Factor Cv
                Specification=[SowingRule].Script.CultivarName=43C80_CL,44Y87_CL,44Y89_CL,45Y88_CL,Archer,ATR_Gem,ATR_Stingray,AV_Garnet,Hyola559_TT,Hyola575_CL,Hyola600_RR,Hyola635_CL,Hyola750_TT,Hyola970_CL,Hyola971_CL,NS_Diamond,Oscar,SF_Brazzil,SF_Edimax
              Factor PP: Specification=[Weather]
                Weather 0: FileName=met/Gatton.met
                Weather 14: FileName=met/GattonPP14H.met
                Weather 16: FileName=met/GattonPP16H.met
          Simulation Gatton2016Base
            Clock: Start=2016-04-04; End=2016-12-31
            Summary summaryfile
            Weather: FileName=met/Gatton.met
            Zone Paddock: same as Validation.Phenology Experiments.OCP Phenology.Gatton2015.Gatton2015Base.Paddock
            SoilArbitrator
        Experiment Gatton2017
          Factors
            Permutation
              Memo
                All would be this
                [SowingRule].Script.CultivarName=44Y90_CL,45Y91_CL,Arazzo,Archer,ATR_Bonito,ATR_Stingray,ATR_Wahoo,AV_Zircon,K50055,K50058,NX953,Sensation,Victory_7001_CL

                Currently
                [SowingRule].Script.CultivarName=44Y90_CL,45Y91_CL,Arazzo,Archer,ATR_Bonito,ATR_Stingray,ATR_Wahoo,AV_Zircon,K50055,K50058,NX953,Sensation,Victory_7001_CL
              Factor TOS: Specification=[SowingRule].Script.SowDate=4-May,6-Jun,2-Jun,13-Jun
              Factor Cv
                Specification=[SowingRule].Script.CultivarName=44Y90_CL,45Y91_CL,Arazzo,Archer,ATR_Bonito,ATR_Stingray,ATR_Wahoo,AV_Zircon,NX953,Sensation,Victory_7001_CL
              Factor PP: same as Validation.Phenology Experiments.OCP Phenology.Gatton2016.Factors.Permutation.PP
          Simulation Gatton2017Base
            Clock: Start=2017-05-01; End=2017-12-31
            Summary summaryfile
            Weather: FileName=met/Gatton.met
            Zone Paddock: same as Validation.Phenology Experiments.OCP Phenology.Gatton2015.Gatton2015Base.Paddock
            SoilArbitrator
        Experiment Canberra2016
          Factors
            Permutation
              Factor TOS: Specification=[SowingRule].Script.SowDate=31-Mar,8-Apr,26-Apr,19-May
              Factor Cv
                Specification=[SowingRule].Script.CultivarName=43C80_CL,44Y89_CL,45Y88_CL,Arazzo,Archer,ATR_Bonito,ATR_Gem,ATR_Stingray,AV_Garnet,CB_Telfer,Hyola559_TT,Hyola575_CL,Hyola635_CL,Hyola750_TT,Hyola970_CL,Hyola971_CL,NS_Diamond,Oscar,Sensation,SF_Brazzil,SF_Edimax
              Factor PP: Specification=[Weather]
                Weather 0: FileName=met/Canberra.met
                Weather 14: FileName=met/CanberraPP14H.met
                Weather 16: FileName=met/CanberraPP16H.met
              Memo
                All would be this
                [SowingRule].Script.CultivarName=43C80_CL,44Y89_CL,45Y88_CL,Arazzo,Archer,ATR_Bonito,ATR_Gem,ATR_Stingray,AV_Garnet,CB_Telfer,CBI_306,CSCH_01,CSCH_02,Hyola559_TT,Hyola575_CL,Hyola635_CL,Hyola750_TT,Hyola970_CL,Hyola971_CL,NS_Diamond,Oscar,Sensation,SF_Brazzil,SF_Edimax

                Currently
                [SowingRule].Script.CultivarName=43C80_CL,44Y89_CL,45Y88_CL,Arazzo,Archer,ATR_Bonito,ATR_Gem,ATR_Stingray,AV_Garnet,CB_Telfer,CBI_306,CSCH_01,CSCH_02,Hyola559_TT,Hyola575_CL,Hyola635_CL,Hyola750_TT,Hyola970_CL,Hyola971_CL,NS_Diamond,Oscar,Sensation,SF_Brazzil,SF_Edimax
          Simulation Canberra2016Base
            Clock: Start=2016-03-30; End=2016-12-31
            Summary summaryfile
            Weather: FileName=met/Canberra.met
            Zone Paddock: same as Validation.Phenology Experiments.OCP Phenology.Gatton2015.Gatton2015Base.Paddock
            SoilArbitrator
        Experiment Canberra2017
          Factors
            Permutation
              Factor TOS
                Specification=[SowingRule].Script.SowDate=18-Apr,27-Apr,15-May,24-May,16-Jun,11-Sep
              Factor Cv
                Specification=[SowingRule].Script.CultivarName=44Y90_CL,45Y91_CL,Arazzo,Archer,ATR_Bonito,ATR_Stingray,ATR_Wahoo,AV_Zircon,NX953,Sensation,Victory_7001_CL
              Factor PP: same as Validation.Phenology Experiments.OCP Phenology.Canberra2016.Factors.Permutation.PP
              Memo: same as Validation.Phenology Experiments.OCP Phenology.Gatton2017.Factors.Permutation.Memo
          Simulation Canberra2017Base
            Clock: Start=2017-04-17; End=2018-03-24
            Summary summaryfile
            Weather: FileName=met/Canberra.met
            Zone Paddock: same as Validation.Phenology Experiments.OCP Phenology.Gatton2015.Gatton2015Base.Paddock
            SoilArbitrator
      Folder Omics Phenology
        Memo
          GRDC funded "CSP1901-002RTX: Optimising Canola Production in Diverse Australian Growing Environments" project had experiments at Gatton in 2019, 2020, Boorowa 2019, 2021, Cummins 2020, 2021, York 2020, 2021 which consisted of 2-4 sowing dates.  Project aimed to use field observations and transcritptomic and genomic data to establish a genetic phenology model. This project assesses G x E effects on phenological traits (including flowering time) in a diverse set of modern Australian and globally important canola varieties (~350) across key growing environments and regions relevant to the Australian industry (14 combinations of site, year and TOS), as well as three controlled environments.

          Data collected:  plant growth stage and leaf number was recorded 2 to 3 x weekly between emergence and flowering for 4 plants in each plot. Data was summarised as average sowing, emergence, floral initation, green bud, flowering date for each cultivar/treatment.

          Contact Jeremy Whish, Julianne Lilley (CSIRO)
        Experiment Gatton2019
          Factors
            Permutation
              Memo
                CGH_Stingray
                NUS_diamond
                NUS_ATR-Bonito
                AGG_Garnet
                CGH_GEM
                NUS_ATR-Wahoo_2020
                AGG_OSCAR
                NUS_ZIRCON
              Factor TOS: Specification=[SowingRule].Script.SowDate=23-Apr,15-May,24-May,21-Jun
              Factor Cv
                Specification=[SowingRule].Script.CultivarName=ATR_Stingray,ATR_Bonito,AV_Garnet,Oscar,AV_Zircon,Monty,ATR_Gem
          Simulation Gatton2019Base
            Clock: Start=2019-03-25; End=2019-12-31
            Summary summaryfile
            Weather: FileName=met/gatton2019onwards.met
            Zone Paddock: same as Validation.Phenology Experiments.OCP Phenology.Gatton2015.Gatton2015Base.Paddock
            SoilArbitrator
        Experiment Gatton2020
          Factors
            Permutation
              Memo
                CGH_Stingray
                NUS_diamond
                NUS_ATR-Bonito
                AGG_Garnet
                CGH_GEM
                NUS_ATR-Wahoo_2020
                AGG_OSCAR
                NUS_ZIRCON
              Factor TOS: Specification=[SowingRule].Script.SowDate=20-Apr,20-May
              Factor Cv
                Specification=[SowingRule].Script.CultivarName=ATR_Wahoo,ATR_Stingray,NS_Diamond,ATR_Bonito,AV_Garnet,ATR_Gem,Oscar,AV_Zircon,Monty
          Simulation Gatton2020Base
            Clock: Start=2020-03-25; End=2020-12-31
            Summary summaryfile
            Weather: FileName=met/gatton2019onwards.met
            Zone Paddock: same as Validation.Phenology Experiments.OCP Phenology.Gatton2015.Gatton2015Base.Paddock
            SoilArbitrator
        Experiment Boorowa2019
          Factors
            Permutation
              Memo
                CGH_Stingray
                NUS_diamond
                NUS_ATR-Bonito
                AGG_Garnet
                CGH_GEM
                NUS_ATR-Wahoo_2020
                AGG_OSCAR
                NUS_ZIRCON
              Factor TOS: Specification=[SowingRule].Script.SowDate=28-Mar,26-Apr,16-May
              Factor Cv
                Specification=[SowingRule].Script.CultivarName=ATR_Wahoo,ATR_Stingray,ATR_Bonito,AV_Garnet,ATR_Gem,Oscar,AV_Zircon,Monty
          Simulation Boorowa2019Base
            Clock: Start=2019-03-25; End=2019-12-31
            Summary summaryfile
            Weather: FileName=met/boorowa2019onwards.met
            Zone Paddock: same as Validation.Phenology Experiments.OCP Phenology.Gatton2015.Gatton2015Base.Paddock
            SoilArbitrator
        Experiment Cummins2020
          Factors
            Permutation
              Memo
                CGH_Stingray
                NUS_diamond
                NUS_ATR-Bonito
                AGG_Garnet
                CGH_GEM
                NUS_ATR-Wahoo_2020
                AGG_OSCAR
                NUS_ZIRCON
              Factor TOS: Specification=[SowingRule].Script.SowDate=17-Apr,14-May
              Factor Cv
                Specification=[SowingRule].Script.CultivarName=ATR_Wahoo,ATR_Stingray,NS_Diamond,ATR_Bonito,AV_Garnet,ATR_Gem,Oscar,AV_Zircon,Monty
          Simulation Cummins2020Base
            Clock: Start=2020-03-25; End=2020-12-31
            Summary summaryfile
            Weather: FileName=met/cummins2019onwards.met
            Zone Paddock: same as Validation.Phenology Experiments.OCP Phenology.Gatton2015.Gatton2015Base.Paddock
            SoilArbitrator
        Experiment York2020
          Factors
            Permutation
              Memo
                CGH_Stingray
                NUS_diamond
                NUS_ATR-Bonito
                AGG_Garnet
                CGH_GEM
                NUS_ATR-Wahoo_2020
                AGG_OSCAR
                NUS_ZIRCON
              Factor TOS: Specification=[SowingRule].Script.SowDate=17-Apr,20-May
              Factor Cv
                Specification=[SowingRule].Script.CultivarName=ATR_Wahoo,ATR_Stingray,NS_Diamond,ATR_Bonito,AV_Garnet,ATR_Gem,Oscar,AV_Zircon,Monty
          Simulation York2020Base
            Clock: Start=2020-03-25; End=2020-12-31
            Summary summaryfile
            Weather: FileName=met/beverley2019onwards.met
            Zone Paddock: same as Validation.Phenology Experiments.OCP Phenology.Gatton2015.Gatton2015Base.Paddock
            SoilArbitrator
    Folder Growth Experiments
      Folder Kojonup
        Experiment Kojonup2013
          Factors
            Permutation
              Factor Cv
                Specification=[SowingRule].Script.CultivarName=43C80_CL,ATR_Gem,ATR_Stingray,AV_Garnet,AV_Zircon,CB_Telfer,Crusher_TT,Hyola559_TT,Hyola575_CL
              Factor Fert
                CompositeFactor 0N
                  Specifications:
                    [Fertilise at sowing].Script.Amount = 0
                    [Fertilise on fixed dates].Script.Amount = 0
                CompositeFactor 150N
                  Specifications:
                    [Fertilise at sowing].Script.Amount = 20
                    [Fertilise on fixed dates].Script.Amount = 65
              Memo
                [SowingRule].Script.CultivarName=ATR_Gem, ATR_Stingray

                Actual Full List
                [SowingRule].Script.CultivarName=43C80_CL,43Y23_RR,43Y85_CL,45Y22_RR,45Y86_CL,ATR_Gem,ATR_Stingray,AV_Garnet,AV_Zipon,AV_Zircon,CB_Atomic,CB_Status_RR,CB_Telfer,Crusher_TT,GT_Cobra,Hyola404_RR,Hyola450_TT,Hyola50,Hyola505_RR,Hyola555_TT,Hyola559_TT,Hyola575_CL
                [SowingRule].Script.CultivarName=43C80_CL,ATR_Gem,ATR_Stingray,AV_Garnet,AV_Zircon,CB_Telfer,Crusher_TT,Hyola559_TT,Hyola575_CL
          Simulation Kojonup2013Base
            Memo
              Need to sort out soil and check whether N rules are correct.

              soil sampling done on 9 May   - gravimetric
              Row Labels	Average of %H20 (g/g)
              0-10cm	0.1254
              10-20cm	0.0837
              20-40cm	0.0837
              40-60cm	0.1019
              60-80cm	0.1426
              80-100cm	0.1818
              100-120cm	0.1850

              N applied at sowing, 18/6/13 and topdressed at flowering (14/8/13)

              Also treatments with 0 or 150N and lots of biomass data.
            Clock: Start=2013-05-09; End=2013-12-31
            Summary summaryfile
            Weather: FileName=met/Kojonup.met
            SoilArbitrator
            Zone paddock: Area=1; Slope=0; AspectAngle=0; Altitude=50
              Plant canola: ResourceName=Canola
              MicroClimate: a_interception=0; b_interception=0; c_interception=0; d_interception=0; SoilHeatFluxFraction=0; MinimumHeightDiffForNewLayer=0; NightInterceptionFraction=0; ReferenceHeight=2
              SurfaceOrganicMatter SurfaceOM: InitialResidueName=wheat; InitialResidueType=wheat; InitialResidueMass=6000; InitialStandingFraction=0; InitialCPR=0; InitialCNR=80
              Fertiliser
              Report DailyReport: EventNames=[Clock].DoReport
                VariableNames:
                  [Clock].Today
                  [Canola].SowingData.Cultivar
                  [Canola].Phenology.CurrentStageName
                  [Weather].MeanT
                  [Soil].Water.Volumetric
                  [Soil].Water.MM
                  sum([Soil].Water.MM) as ProfileWater
                  [Canola].AboveGround.N
                  [Canola].AboveGround.Wt
                  [Canola].AboveGroundLive.N
                  [Canola].AboveGroundLive.N*10 as UptakeNKgHA
                  [Canola].AboveGroundLive.Wt
                  [Canola].Arbitrator.DM.TotalFixationSupply
                  [Canola].Grain.N
                  [Canola].Grain.NConc
                  [Canola].Grain.Number
                  [Canola].Grain.Size
                  [Canola].Grain.Wt
                  [Canola].Grain.Live.Wt
                  [Canola].Leaf.AppearedCohortNo
                  [Canola].Leaf.CoverDead
                  [Canola].Leaf.CoverGreen
                  [Canola].Leaf.CoverTotal
                  [Canola].Leaf.Dead.N
                  [Canola].Leaf.Dead.NConc
                  [Canola].Leaf.Dead.Wt
                  [Canola].Leaf.DeadCohortNo
                  [Canola].Leaf.GreenCohortNo
                  [Canola].Leaf.SenescingCohortNo
                  [Canola].Leaf.ExpandedCohortNo
                  [Canola].Leaf.Fn
                  [Canola].Leaf.Fw
                  [Canola].Leaf.Height
                  [Canola].Leaf.InitialisedCohortNo
                  [Canola].Leaf.LAI
                  [Canola].Leaf.Live.N
                  [Canola].Leaf.Live.NConc
                  [Canola].Leaf.Live.Wt
                  [Canola].Leaf.SpecificArea
                  [Canola].Leaf.Transpiration
                  [Canola].Phenology.CurrentPhase.Name
                  [Canola].Phenology.CurrentStageName
                  [Canola].Phenology.Photoperiod
                  [Canola].Phenology.Stage
                  [Canola].Phenology.ThermalTime
                  [Canola].Phenology.ThermalTime
                  [Canola].Root.Depth
                  [Canola].Root.N
                  [Canola].Root.Wt
                  [Canola].Root.NConc
                  [Canola].Root.WaterUptake
                  [Canola].Stem.N
                  [Canola].Stem.NConc
                  [Canola].Stem.Wt
                  [Canola].Stem.Live.StorageWt
                  [Canola].SowingData.Cultivar
                  [Canola].Structure.Height
                  [Canola].Structure.LeafTipsAppeared
                  [Canola].Structure.MainStemPopn
                  [Canola].Structure.TotalStemPopn
                  [SurfaceOrganicMatter].Wt
                  sum([Soil].NO3.kgha) as TotalSoilNitrogen
                  [Canola].Phenology.MaturityDAS
                  [Canola].Phenology.PhotoPeriod
                  [Canola].Phenology.Stage
                  [Clock].Today.Year
              Report HarvestReport: EventNames=[canola].Harvesting
                VariableNames:
                  [Clock].Today
                  [canola].SowingDate
                  [canola].SowingData.Cultivar
                  [canola].Phenology.CurrentStageName
                  [canola].Phenology.EmergenceDAS
                  [canola].Phenology.FloralInitiationDAS
                  [canola].Phenology.GreenBudDAS
                  [canola].Phenology.StartFloweringDAS
                  [canola].Phenology.CumulativeVernalTime
                  [canola].Grain.Wt
              Soil: ASCOrder=Deep sandy duplex (Kojonup C2 No1146); SoilType=sand; Site=Kojonup; NearestTown=Kojonup; Region=Southern Region; State=Western Australia; Country=Australia; ApsoilNumber=1146; Latitude=-34.157; Longitude=117.127; LocationAccuracy=+/- 20m; YearOfSampling=2015; DataSource=Rob Summers DAFWA
                Comments=C2 - SBDiff4 - Deep sandy duplex - clay @60cm  Modified by Julianne to match Kojonup measurments at sowing 2013  Deep sandy duplex (Kojonup C2 No1146)
                Physical
                  Thickness  ParticleSizeSand  ParticleSizeSilt  ParticleSizeClay  BD      AirDry  LL15   DUL     SAT
                  100        81.79             7.1               11.11             1.2     0.0219  0.04   0.2365  0.5395
                  100        87.28             5.9               6.83              1.6176  0.0349  0.05   0.1461  0.3596
                  100        87.28             5.9               6.83              1.6176  0.035   0.05   0.1461  0.3596
                  100        89.23             3.93              6.84              1.6176  0.035   0.05   0.1461  0.34
                  100        89.23             3.93              6.84              1.6176  0.035   0.07   0.188   0.3
                  100        89.23             3.93              6.84              1.618   0.06    0.078  0.1878  0.3
                  100        89.3              1.95              8.75              1.618   0.09    0.11   0.1878  0.3
                  100        89.3              1.95              8.75              1.618   0.09    0.13   0.22    0.33
                  400        89.3              1.95              8.75              1.618   0.09    0.19   0.3     0.36
                  BD source: Measured
                  AirDry, LL15 source: Estimated based on local knowledge
                  DUL source: Field measured and checked for sensibility
                  SAT source: c_bd
                  SoilCrop CanolaSoil: LL=[0.027, 0.044, 0.042, 0.044, 0.048, 0.078, 0.11, 0.13, 0.2]; KL=[0.06, 0.06, 0.06, 0.06, 0.06, 0.06, 0.04, 0.04, 0.04]; XF=[1, 1, 1, 1, 1, 1, 1, 1, 1]
                WaterBalance SoilWater: SummerDate=1-Nov; SummerU=6; SummerCona=3.5; WinterDate=1-Apr; WinterU=2; WinterCona=2; DiffusConst=88; DiffusSlope=35; Salb=0.12; CN2Bare=73; CNRed=20; CNCov=0.8; PSIDul=-100; Thickness=[100, 100, 100, 100, 100, 100, 100, 100, 100, 100]; SWCON=[0.7, 0.7, 0.7, 0.7, 0.7, 0.5, 0.5, 0.5, 0.5, 0.5]
                Organic: FOMCNRatio=40; CarbonUnits=Total
                  Thickness  Carbon  SoilCNRatio  FBiom  FInert  FOM
                  100        3.029   12           0.035  0.4     543.7302
                  200        0.923   12           0.02   0.5     298.4055
                  300        0.364   12           0.02   0.7     121.3226
                  400        0.26    12           0.015  0.7     36.5417
                  200        0.26    12           0.015  0.7     12
                Chemical: PHUnits=Water
                  Thickness  PH   EC     ESP
                  100        5    0.144  0.0442
                  100        4.9  0.049  0.0479
                  200        5    0.047  0.0719
                  200        5.4  0.041  0.075
                  200        5.7  -      -
                  200        5.6  -      -
                  200        5.6  -      -
                  EC, ESP, PH source: Measured
                Water: Thickness=[100, 100, 200, 200, 200, 200, 200]; InitialValues=[0.1504, 0.1354, 0.1354, 0.165, 0.2308, 0.2942, 0.2993]; FilledFromTop=false
                Nutrient
                Solute NO3: Thickness=[100, 100, 200, 200, 200, 200, 200]; InitialValues=[20, 10, 5, 2, 1, 1, 1]; InitialValuesUnits=ppm; WaterTableConcentration=0; D0=0; DepthConstant=0; MaxDepthSoluteAccessible=0; RunoffEffectivenessAtMovingSolute=0; MaxEffectiveRunoff=0
                Solute NH4: Thickness=[100, 100, 200, 200, 200, 200, 200]; InitialValues=[1, 1, 1, 1, 1, 1, 1]; InitialValuesUnits=ppm; WaterTableConcentration=0; D0=0; DepthConstant=0; MaxDepthSoluteAccessible=0; RunoffEffectivenessAtMovingSolute=0; MaxEffectiveRunoff=0
                Solute Urea: Thickness=[100, 100, 200, 200, 200, 200, 200]; InitialValues=[0, 0, 0, 0, 0, 0, 0]; InitialValuesUnits=kg/ha; WaterTableConcentration=0; D0=0; DepthConstant=0; MaxDepthSoluteAccessible=0; RunoffEffectivenessAtMovingSolute=0; MaxEffectiveRunoff=0
                SoilTemperature Temperature
              Manager Fertilise at sowing
                Crop = [canola]
                FertiliserType = NH4N
                Amount = 0
```csharp
using Models.Soils;
using System;
using Models.Core;
using Models.PMF;
namespace Models
{
    [Serializable]
    public class Script : Model
    {
        [Link] Clock Clock;
        [Link] Fertiliser Fertiliser;
        [Link] Summary summary;

        [Description("Crop to be fertilised")]
        public IPlant Crop { get; set; }

        [Description("Type of fertiliser to apply? ")] 
        [Display(Type = DisplayType.FertiliserType)]public string FertiliserType { get; set; }

        [Description("Amount of fertiliser to be applied (kg/ha)")]
        public double Amount { get; set; }

        [EventSubscribe("Sowing")]
        public void OnSowing(object sender, EventArgs e)
        {
            Model crop = sender as Model;
            if (Crop != null && crop.Name.ToLower() == (Crop as IModel).Name.ToLower())
                Fertiliser.Apply(amount: Amount, type: FertiliserType);  //"NO3N"
        }

    }
}
```
              Manager SowingRule
                SowDate = 10-May
                CultivarName = Hyola575_CL
                SowingDepth = 20
                RowSpacing = 250
                Population = 68
```csharp
using APSIM.Shared.Utilities;
using Models.Utilities;
using Models.Soils;
using Models.PMF;
using Models.Core;
using System;

namespace Models
{
    [Serializable]
    public class Script : Model
    {
        [Link] Clock Clock;
        [Link] Fertiliser Fertiliser;
        [Link] Summary Summary;
        [Link] Plant Canola;
        [Link] Soil Soil;
        Accumulator accumulatedRain;
        
        [Description("Sowing date (d-mmm)")]
        public string SowDate { get; set; }
        [Description("Cultivar to be sown")]
        public string CultivarName { get; set; }
        [Description("Sowing depth (mm)")]
        public double SowingDepth { get; set; }
        [Description("Row spacing (mm)")]
        public double RowSpacing { get; set; }
        [Description("Plant population (/m2)")]
        public double Population { get; set; }
      
        


        [EventSubscribe("DoManagement")]
        private void OnDoManagement(object sender, EventArgs e)
        {
            if (DateUtilities.DatesAreEqual(SowDate, Clock.Today))
            {
                Canola.Sow(population: Population, cultivar: CultivarName, depth: SowingDepth, rowSpacing: RowSpacing);    
            }
        
        }
        
    }
}
```
              Manager Reset on date
                ResetDate = 9-May
                ResetWater = Yes
                ResetN = Yes
                ResetSOM = No
```csharp
using Models.Interfaces;
using System;
using Models.Core;
using Models.PMF;
using Models.Soils;
using Models.Utilities;
using Models.Surface;
using APSIM.Shared.Utilities;
using Models.Soils.Nutrients;

namespace Models
{
    [Serializable]
    public class Script : Model
    {
        [Link] private Clock Clock;
        [Link] private Plant Wheat;
        [Link] private ISoilWater SoilWater;
        [Link] private INutrient SoilN;
        [Link] private SurfaceOrganicMatter SOM;
        [Link] private Summary summary;

        [Description("Date to reset on:")]
        public string ResetDate {get;set;}

        [Description("Reset Water?")]
        public string ResetWater {get;set;}

        [Description("Reset Nitrogen?")]
        public string ResetN {get;set;}

        [Description("Reset Surface Organic Matter?")]
        public string ResetSOM {get;set;}

        [EventSubscribe("DoManagement")]
        private void OnDoManagement(object sender, EventArgs e)
        {
            if (DateUtilities.WithinDates(ResetDate, Clock.Today, ResetDate))
            {
                if (ResetWater == "Yes")
                {
                    summary.WriteMessage(this, "Reset Water", MessageType.Diagnostic);
                    SoilWater.Reset();
                }
                if (ResetN == "Yes")
                {
                    summary.WriteMessage(this, "Reset Nitrogen", MessageType.Diagnostic);
                    SoilN.Reset();
                }
                if (ResetSOM == "Yes")
                {
                    summary.WriteMessage(this, "Reset Surface OM", MessageType.Diagnostic);
                    SOM.Reset();
                }
            }
        }
    }
}
```
              Manager Fertilise on fixed dates
                FertiliserType = UreaN
                FertiliserDates = 18-Jun, 14-Aug
                Amount = 0
                AmountType = True
```csharp
using Models.Soils;
using System;
using Models.Core;
using Models.PMF;
using APSIM.Shared.Utilities;
namespace Models
{
    [Serializable]
    public class Script : Model
    {
        [Link] Clock Clock;
        [Link] Fertiliser Fertiliser;
        
        [Separator("A component to apply fertiliser on one or more dates on every year of the simulation")]

        [Description("Type of fertiliser to apply? ")] [Display(Type = DisplayType.FertiliserType)]public string FertiliserType { get; set; }

        [Description("Enter the fertilisation dates as dd-mmm with comma separation (any year information entered will be ignored): ")] public string[] FertiliserDates { get; set; } 

        [Description("Amount of fertiliser to be applied (kg /ha)")] public double Amount { get; set; }

        [Description("Is the above amount to be applied each time? (yes/ticked)? Or is it the total annual amount across all dates (no/unticked)")] public bool AmountType { get; set; }
        
        [EventSubscribe("DoManagement")]
        private void OnDoManagement(object sender, EventArgs e)
        {
            foreach (string ddMMM in FertiliserDates)
            {
                if (DateUtilities.DatesEqual(ddMMM, Clock.Today))
                {
                    if (AmountType)
                        Fertiliser.Apply(amount: Amount, type: FertiliserType);
                    else
                        Fertiliser.Apply(amount: Amount / FertiliserDates.Length, type: FertiliserType);
                }
            }
        }
    }
}
```
              Manager HarvestAfterDate
                HarvestDate = 20-Nov
```csharp
using Models.Soils;
using System;
using Models.Core;
using System.Text;
using Models.PMF;
using Models;
using APSIM.Shared.Utilities;
using Models.PMF.Phen;

namespace Models
{
    [Serializable] 
    public class Script : Model
    {
        [Link] ISummary summary;
        [Link] private Plant canola;
        [Link(Type = LinkType.Path, Path = "[canola].Phenology")]
        private Phenology phenology;
                [Link] Clock Clock;

        private bool Harvestable = false;

        [Description("Harvest Date (d-mmm)")]
        public string HarvestDate { get; set; }   
      
        [EventSubscribe("DoManagement")]
        private void OnDoManagement(object sender, EventArgs e)
        {
           
            if (Harvestable && phenology.CurrentPhase.Name == "ReadyForHarvesting")
            {
                canola.Harvest();
                canola.EndCrop();                
            }
            
            if (DateUtilities.DatesAreEqual(HarvestDate, Clock.Today))
                Harvestable = true;

        }
    }
}
```
              Report SowingReport: EventNames=[Canola].Sowing
                VariableNames:
                  [Clock].Today
                  [Canola].SowingData.Cultivar
                  [IWeather].Latitude
                  [IWeather].Longitude
        Experiment Kojonup2014
          Factors
            Permutation
              Factor Cv
                Specification=[SowingRule].Script.CultivarName=43C80_CL,ATR_Stingray,ATR_Wahoo,AV_Garnet,Hyola559_TT,Hyola600_RR,Hyola635_CL,Hyola750_TT,Hyola971_CL,NS_Diamond
              Memo
                [SowingRule].Script.CultivarName=ATR_Stingray, AV_Garnet

                Actual Cultivars sown

                [SowingRule].Script.CultivarName=43C80_CL,44Y26_RR,44Y87_CL,45Y86_CL,ATR_Stingray,ATR_Wahoo,AV_Garnet,CB_Tango,GT_Cobra,GT_Viper,Hyola404_RR,Hyola450_TT,Hyola50,Hyola559_TT,Hyola577_CL,Hyola600_RR,Hyola635_CL,Hyola750_TT,Hyola971_CL,NS_Diamond
              Factor Fert: same as Validation.Growth Experiments.Kojonup.Kojonup2013.Factors.Permutation.Fert
          Simulation Kojonup2014
            Memo
              Don't know when fertiliser added in 2014
            Clock: Start=2014-05-12; End=2014-12-31
            Summary summaryfile
            Weather: FileName=met/Kojonup.met
            SoilArbitrator
            Zone paddock: Area=1; Slope=0; AspectAngle=0; Altitude=50
              Plant canola: ResourceName=Canola
              MicroClimate: a_interception=0; b_interception=0; c_interception=0; d_interception=0; SoilHeatFluxFraction=0; MinimumHeightDiffForNewLayer=0; NightInterceptionFraction=0; ReferenceHeight=2
              SurfaceOrganicMatter SurfaceOM: InitialResidueName=wheat; InitialResidueType=wheat; InitialResidueMass=6000; InitialStandingFraction=0; InitialCPR=0; InitialCNR=80
              Fertiliser
              Report DailyReport: same as Validation.Growth Experiments.Kojonup.Kojonup2013.Kojonup2013Base.paddock.DailyReport
              Report HarvestReport: same as Validation.Growth Experiments.Kojonup.Kojonup2013.Kojonup2013Base.paddock.HarvestReport
              Report DailyBiomass: EventNames=[Clock].DoReport
                VariableNames:
                  [Clock].Today
                  [canola].AboveGround.Wt
                  [Canola].AboveGroundLive.Wt
                  [canola].Population
                  [canola].AboveGround.NConc
                  [canola].Grain.Wt
                  [canola].Grain.Size
                  [canola].Grain.Total.Wt
                  [canola].Grain.N
                  [canola].Grain.NConc
                  [canola].Grain.Number
                  [Canola].LAI
                  [canola].Stem.Live.Wt
                  [canola].Leaf.Live.Wt
                  [canola].Stem.Wt
                  [canola].Leaf.Wt
                  [canola].Phenology.CurrentStageName
                  [canola].Phenology.Stage
              Soil: ASCOrder=Deep sandy duplex (Kojonup C2 No1146); SoilType=sand; Site=Kojonup; NearestTown=Kojonup; Region=Southern Region; State=Western Australia; Country=Australia; ApsoilNumber=1146; Latitude=-34.157; Longitude=117.127; LocationAccuracy=+/- 20m; YearOfSampling=2015; DataSource=Rob Summers DAFWA
                Comments=C2 - SBDiff4 - Deep sandy duplex - clay @60cm  Modified by Julianne to match Kojonup measurments at sowing 2013  Deep sandy duplex (Kojonup C2 No1146)
                Physical
                  Thickness  ParticleSizeSand  ParticleSizeSilt  ParticleSizeClay  BD      AirDry  LL15   DUL     SAT
                  100        81.79             7.1               11.11             1.2     0.0219  0.04   0.2365  0.5395
                  100        87.28             5.9               6.83              1.6176  0.0349  0.05   0.1461  0.3596
                  100        87.28             5.9               6.83              1.6176  0.035   0.05   0.1461  0.3596
                  100        89.23             3.93              6.84              1.6176  0.035   0.05   0.1461  0.34
                  100        89.23             3.93              6.84              1.6176  0.035   0.07   0.188   0.3
                  100        89.23             3.93              6.84              1.618   0.06    0.078  0.1878  0.3
                  100        89.3              1.95              8.75              1.618   0.09    0.11   0.1878  0.3
                  100        89.3              1.95              8.75              1.618   0.09    0.13   0.22    0.33
                  600        89.3              1.95              8.75              1.618   0.09    0.19   0.3     0.36
                  BD source: Measured
                  AirDry, LL15 source: Estimated based on local knowledge
                  DUL source: Field measured and checked for sensibility
                  SAT source: c_bd
                  SoilCrop CanolaSoil: LL=[0.027, 0.044, 0.042, 0.044, 0.048, 0.078, 0.11, 0.13, 0.2]; KL=[0.06, 0.06, 0.06, 0.06, 0.06, 0.06, 0.04, 0.04, 0.04]; XF=[1, 1, 1, 1, 1, 1, 1, 1, 1]
                WaterBalance SoilWater: SummerDate=1-Nov; SummerU=6; SummerCona=3.5; WinterDate=1-Apr; WinterU=2; WinterCona=2; DiffusConst=88; DiffusSlope=35; Salb=0.12; CN2Bare=73; CNRed=20; CNCov=0.8; PSIDul=-100; Thickness=[100, 100, 100, 100, 100, 100, 100, 100, 100, 100, 400]; SWCON=[0.7, 0.7, 0.7, 0.7, 0.7, 0.5, 0.5, 0.5, 0.5, 0.5, 0.5]
                Organic: FOMCNRatio=40; CarbonUnits=Total
                  Thickness  Carbon  SoilCNRatio  FBiom  FInert  FOM
                  100        3.029   12           0.035  0.4     543.7302
                  200        0.923   12           0.02   0.5     298.4055
                  300        0.364   12           0.02   0.7     121.3226
                  400        0.26    12           0.015  0.7     36.5417
                  400        0.26    12           0.015  0.7     24
                Chemical: PHUnits=Water
                  Thickness  PH   EC     ESP
                  100        4.8  0.144  0.0442
                  100        5.1  0.049  0.0479
                  200        5.3  0.047  0.0719
                  200        5.8  0.041  0.075
                  200        5.8  -      -
                  200        5.6  -      -
                  200        5.8  -      -
                  200        5.7  -      -
                  EC, ESP, PH source: Measured
                Water: Thickness=[100, 100, 200, 200, 200, 200, 200, 200]; FilledFromTop=false
                  InitialValues=[0.1493, 0.1553, 0.1667, 0.2283, 0.2279, 0.2413, 0.2582, 0.2878]
                Nutrient
                Solute NO3: Thickness=[100, 100, 200, 200, 200, 200, 200, 200]; InitialValues=[10, 2, 1, 1, 1, 0.1, 0.1, 0.1]; InitialValuesUnits=ppm; WaterTableConcentration=0; D0=0; DepthConstant=0; MaxDepthSoluteAccessible=0; RunoffEffectivenessAtMovingSolute=0; MaxEffectiveRunoff=0
                Solute NH4: Thickness=[100, 100, 200, 200, 200, 200, 200, 200]; InitialValues=[0.1, 0.1, 0.1, 0.1, 0.1, 0.1, 0.1, 0.1]; InitialValuesUnits=ppm; WaterTableConcentration=0; D0=0; DepthConstant=0; MaxDepthSoluteAccessible=0; RunoffEffectivenessAtMovingSolute=0; MaxEffectiveRunoff=0
                Solute Urea: Thickness=[100, 100, 200, 200, 200, 200, 200, 200]; InitialValues=[0, 0, 0, 0, 0, 0, 0, 0]; InitialValuesUnits=kg/ha; WaterTableConcentration=0; D0=0; DepthConstant=0; MaxDepthSoluteAccessible=0; RunoffEffectivenessAtMovingSolute=0; MaxEffectiveRunoff=0
                SoilTemperature Temperature
              Manager Reset on date
                ResetDate = 12-May
                ResetWater = Yes
                ResetN = Yes
                ResetSOM = No
```csharp
using Models.Soils.Nutrients;
using APSIM.Shared.Utilities;
using Models.Surface;
using Models.Utilities;
using Models.Soils;
using Models.PMF;
using Models.Core;
using System;
using Models.Interfaces;

namespace Models
{
    [Serializable]
    public class Script : Model
    {
        [Link] private Clock Clock;
        [Link] private Plant Wheat;
        [Link] private ISoilWater SoilWater;
        [Link] private INutrient nutrient;
        [Link] private SurfaceOrganicMatter SOM;
        [Link] private Summary summary;

        [Description("Date to reset on:")]
        public string ResetDate {get;set;}

        [Description("Reset Water?")]
        public string ResetWater {get;set;}

        [Description("Reset Nitrogen?")]
        public string ResetN {get;set;}

        [Description("Reset Surface Organic Matter?")]
        public string ResetSOM {get;set;}

        [EventSubscribe("DoManagement")]
        private void OnDoManagement(object sender, EventArgs e)
        {
            if (DateUtilities.WithinDates(ResetDate, Clock.Today, ResetDate))
            {
                if (ResetWater == "Yes")
                {
                    summary.WriteMessage(this, "Reset Water", MessageType.Diagnostic);
                    SoilWater.Reset();
                }
                if (ResetN == "Yes")
                {
                    summary.WriteMessage(this, "Reset Nitrogen", MessageType.Diagnostic);
                    nutrient.Reset();
                }
                if (ResetSOM == "Yes")
                {
                    summary.WriteMessage(this, "Reset Surface OM", MessageType.Diagnostic);
                    SOM.Reset();
                }
            }
        }
    }
}
```
              Manager SowingRule
                SowDate = 13-May
                CultivarName = Hyola575_CL
                SowingDepth = 20
                RowSpacing = 250
                Population = 64
                script: same as in Validation.Growth Experiments.Kojonup.Kojonup2013.Kojonup2013Base.paddock.SowingRule
              Manager Fertilise at sowing: same as Validation.Growth Experiments.Kojonup.Kojonup2013.Kojonup2013Base.paddock.Fertilise at sowing
              Manager Fertilise on fixed dates
                FertiliserType = UreaN
                FertiliserDates = 18-jun, 13-Aug
                Amount = 0
                AmountType = True
                script: same as in Validation.Growth Experiments.Kojonup.Kojonup2013.Kojonup2013Base.paddock.Fertilise on fixed dates
              Manager HarvestAfterDate
                HarvestDate = 2-Dec
                script: same as in Validation.Growth Experiments.Kojonup.Kojonup2013.Kojonup2013Base.paddock.HarvestAfterDate
              Report SowingReport: EventNames=[Canola].Sowing
                VariableNames:
                  [Clock].Today
                  [Canola].SowingData.Cultivar
                  [IWeather].Latitude
                  [IWeather].Longitude
      Folder Cunderdin
        Experiment Cunderdin2013
          Factors
            Permutation
              Factor Cv
                Specification=[SowingRule].Script.CultivarName=43C80_CL,ATR_Gem,ATR_Stingray,AV_Garnet,AV_Zircon,CB_Telfer,Crusher_TT,Hyola559_TT,Hyola575_CL
              Factor Fert
                CompositeFactor 0N
                  Specifications:
                    [Fertilise at sowing].Script.Amount = 0
                    [Fertilise on fixed dates].Script.Amount = 0
                CompositeFactor 50N
                  Specifications:
                    [Fertilise at sowing].Script.Amount = 20
                    [Fertilise on fixed dates].Script.Amount = 15
                CompositeFactor 100N
                  Specifications:
                    [Fertilise at sowing].Script.Amount = 20
                    [Fertilise on fixed dates].Script.Amount = 40
                CompositeFactor 150N
                  Specifications:
                    [Fertilise at sowing].Script.Amount = 20
                    [Fertilise on fixed dates].Script.Amount = 65
              Memo
                [SowingRule].Script.CultivarName=ATR_Gem, ATR_Stingray

                Actual Cultivars in trial
                [SowingRule].Script.CultivarName=43C80_CL,43Y23_RR,43Y85_CL,45Y22_RR,45Y86_CL,ATR_Gem,ATR_Stingray,AV_Garnet,AV_Zipon,AV_Zircon,CB_Atomic,CB_Status_RR,CB_Telfer,Crusher_TT,GT_Cobra,Hyola404_RR,Hyola450_TT,Hyola50,Hyola505_RR,Hyola555_TT,Hyola559_TT,Hyola575_CL

                [SowingRule].Script.CultivarName=43C80_CL,ATR_Gem,ATR_Stingray,AV_Garnet,AV_Zircon,CB_Telfer,Crusher_TT,Hyola559_TT,Hyola575_CL
          Simulation Cunderdin2013
            Clock: Start=2013-05-07; End=2013-12-31
            Summary summaryfile
            Weather: FileName=met/cunderdin.met
            SoilArbitrator
            Zone paddock: Area=1; Slope=0; AspectAngle=0; Altitude=50
              Plant canola: ResourceName=Canola
              MicroClimate: a_interception=0; b_interception=0; c_interception=0; d_interception=0; SoilHeatFluxFraction=0; MinimumHeightDiffForNewLayer=0; NightInterceptionFraction=0; ReferenceHeight=2
              SurfaceOrganicMatter SurfaceOM: InitialResidueName=wheat; InitialResidueType=wheat; InitialResidueMass=6000; InitialStandingFraction=0; InitialCPR=0; InitialCNR=80
              Fertiliser
              Report DailyReport: same as Validation.Growth Experiments.Kojonup.Kojonup2013.Kojonup2013Base.paddock.DailyReport
              Report HarvestReport: same as Validation.Growth Experiments.Kojonup.Kojonup2013.Kojonup2013Base.paddock.HarvestReport
              Report DailyBiomass: same as Validation.Growth Experiments.Kojonup.Kojonup2014.Kojonup2014.paddock.DailyBiomass
              Soil: SoilType=sand; LocalName=Deep sandy duplexes; Site=C-J2; NearestTown=Cunderdin; Region=Central Region; State=Western Australia; Country=Australia; ApsoilNumber=1230; Latitude=-31.5797; Longitude=117.2489; LocationAccuracy=+/- 20m; YearOfSampling=2015
                DataSource=CSIRO - Yvette Oliver and John Byrne - GRDC soil water project
                Comments=Modified by Julianne to suit Cunderdin data - BD, LL, DUL, pH
                Physical
                  Thickness  ParticleSizeSand  ParticleSizeSilt  ParticleSizeClay  BD     AirDry  LL15    DUL     SAT
                  100        91.98             3.03              4.99              1.2    0.0158  0.0317  0.0971  0.2758
                  100        91                2.01              6.99              1.423  0.0248  0.0413  0.1049  0.2655
                  100        91.11             2.98              5.91              1.423  0.03    0.0423  0.1116  0.284
                  100        77.54             3.91              18.55             1.451  0.06    0.088   0.15    0.3
                  100        69.92             3.89              26.19             1.451  0.08    0.096   0.163   0.32
                  200        57.94             3.92              38.14             1.451  0.08    0.096   0.17    0.36
                  200        52.22             6.7               41.08             1.6    0.08    0.096   0.218   0.36
                  200        68.72             8.08              23.19             1.7    0.08    0.1     0.222   0.355
                  300        -                 -                 -                 1.7    0.08    0.11    0.222   0.355
                  BD, DUL source: Measured
                  AirDry, LL15 source: Estimated based on local knowledge
                  SAT source: Calculated from measured, estimated or calculated BD
                  SoilCrop CanolaSoil
                    LL=[0.032, 0.041, 0.042, 0.088, 0.096, 0.096, 0.15, 0.222, 0.222]
                    KL=[0.06, 0.05, 0.05, 0.03, 0.03, 0.02, 0.01, 0, 0]
                    XF=[0.1, 0.1, 0.5, 0.5, 0.5, 0.3, 0.3, 0, 0]
                WaterBalance SoilWater: SummerDate=1-Nov; SummerU=6; SummerCona=3.5; WinterDate=1-Apr; WinterU=2; WinterCona=2; DiffusConst=88; DiffusSlope=35; Salb=0.13; CN2Bare=68; CNRed=20; CNCov=0.8; PSIDul=-100; Thickness=[100, 100, 100, 100, 100, 200, 200, 200, 300]; SWCON=[0.7, 0.7, 0.7, 0.5, 0.5, 0.5, 0.5, 0.5, 0.5]
                Organic: FOMCNRatio=40; CarbonUnits=Total
                  Thickness  Carbon  SoilCNRatio  FBiom  FInert  FOM
                  100        0.962   12           0.035  0.4     28.6456
                  100        0.442   12           0.02   0.5     21.8079
                  100        0.195   12           0.015  0.5     16.6023
                  100        0.156   12           0.015  0.7     12.6394
                  100        0.13    12           0.035  0.7     9.6224
                  200        0.091   12           0.02   0.95    5.5769
                  200        0.091   12           0.015  0.95    3.2323
                  200        0.117   12           0.015  0.95    1.8733
                  300        0.117   12           0.015  0.95    1.873
                Chemical: PHUnits=Water
                  Thickness  PH    EC     ESP
                  100        5.05  0.108  3.2836
                  100        5.2   0.044  4.4025
                  100        5.95  0.035  7.2993
                  100        6.55  0.052  20.2216
                  100        6.75  0.065  26.25
                  200        6.7   0.105  32.4324
                  200        6.5   0.114  36.3281
                  200        6.8   0.109  38.3217
                  300        6.8   -      38.322
                  EC, ESP, PH source: Measured
                Water: Thickness=[100, 100, 200, 200, 200, 200, 200]; InitialValues=[0.035, 0.056, 0.104, 0.163, 0.165, 0.205, 0.207]; FilledFromTop=false
                Nutrient
                Solute NO3: Thickness=[100, 100, 100, 100, 100, 200, 200, 200, 300]; InitialValues=[73.2, 21.35, 9.96, 7.26, 6.4, 8.5, 8.5, 8.5, 8.5]; InitialValuesUnits=ppm; WaterTableConcentration=0; D0=0; DepthConstant=0; MaxDepthSoluteAccessible=0; RunoffEffectivenessAtMovingSolute=0; MaxEffectiveRunoff=0
                Solute NH4: Thickness=[100, 100, 100, 100, 100, 200, 200, 200, 300]; InitialValues=[6, 1.42, 1.42, 0, 0, 0, 1.7, 1.7, 1.7]; InitialValuesUnits=ppm; WaterTableConcentration=0; D0=0; DepthConstant=0; MaxDepthSoluteAccessible=0; RunoffEffectivenessAtMovingSolute=0; MaxEffectiveRunoff=0
                Solute Urea: Thickness=[100, 100, 100, 100, 100, 200, 200, 200, 300]; InitialValues=[0, 0, 0, 0, 0, 0, 0, 0, 0]; InitialValuesUnits=kg/ha; WaterTableConcentration=0; D0=0; DepthConstant=0; MaxDepthSoluteAccessible=0; RunoffEffectivenessAtMovingSolute=0; MaxEffectiveRunoff=0
                SoilTemperature Temperature
              Manager Reset on date
                ResetDate = 7-May
                ResetWater = Yes
                ResetN = Yes
                ResetSOM = No
                script: same as in Validation.Growth Experiments.Kojonup.Kojonup2014.Kojonup2014.paddock.Reset on date
              Manager SowingRule
                SowDate = 8-May
                CultivarName = Hyola575_CL
                SowingDepth = 20
                RowSpacing = 250
                Population = 49
                script: same as in Validation.Growth Experiments.Kojonup.Kojonup2013.Kojonup2013Base.paddock.SowingRule
              Manager Fertilise at sowing: same as Validation.Growth Experiments.Kojonup.Kojonup2013.Kojonup2013Base.paddock.Fertilise at sowing
              Manager Fertilise on fixed dates
                FertiliserType = UreaN
                FertiliserDates = 19-Jun, 13-Aug
                Amount = 0
                AmountType = True
                script: same as in Validation.Growth Experiments.Kojonup.Kojonup2013.Kojonup2013Base.paddock.Fertilise on fixed dates
              Manager HarvestAfterDate
                HarvestDate = 29-Oct
                script: same as in Validation.Growth Experiments.Kojonup.Kojonup2013.Kojonup2013Base.paddock.HarvestAfterDate
              Report SowingReport: EventNames=[Canola].Sowing
                VariableNames:
                  [Clock].Today
                  [Canola].SowingData.Cultivar
                  [IWeather].Latitude
                  [IWeather].Longitude
        Experiment Cunderdin2014
          Factors
            Permutation
              Factor Cv
                Specification=[SowingRule].Script.CultivarName=43C80_CL,ATR_Stingray,ATR_Wahoo,AV_Garnet,Hyola559_TT,Hyola600_RR,Hyola635_CL,Hyola750_TT,Hyola971_CL,NS_Diamond
              Factor Fert
                CompositeFactor 0N
                  Specifications:
                    [Fertilise at sowing].Script.Amount = 0
                    [Fertilise on fixed dates].Script.Amount = 0
                CompositeFactor 100N
                  Specifications:
                    [Fertilise at sowing].Script.Amount = 20
                    [Fertilise on fixed dates].Script.Amount = 40
              Memo
                [SowingRule].Script.CultivarName=ATR_Gem, ATR_Stingray

                Actual Cultivars in trial
                [SowingRule].Script.CultivarName=43C80_CL,44Y26_RR,44Y87_CL,45Y86_CL,ATR_Stingray,ATR_Wahoo,AV_Garnet,CB_Tango,GT_Cobra,GT_Viper,Hyola404_RR,Hyola450_TT,Hyola50,Hyola559_TT,Hyola577_CL,Hyola600_RR,Hyola635_CL,Hyola750_TT,Hyola971_CL,NS_Diamond

                [SowingRule].Script.CultivarName=43C80_CL,ATR_Stingray,ATR_Wahoo,AV_Garnet,Hyola559_TT,Hyola600_RR,Hyola635_CL,Hyola750_TT,Hyola971_CL,NS_Diamond
          Simulation Cunderdin2014
            Clock: Start=2014-03-01; End=2014-12-31
            Summary summaryfile
            Weather: FileName=met/cunderdin.met
            SoilArbitrator
            Zone paddock: Area=1; Slope=0; AspectAngle=0; Altitude=50
              Plant canola: ResourceName=Canola
              MicroClimate: a_interception=0; b_interception=0; c_interception=0; d_interception=0; SoilHeatFluxFraction=0; MinimumHeightDiffForNewLayer=0; NightInterceptionFraction=0; ReferenceHeight=2
              SurfaceOrganicMatter SurfaceOM: InitialResidueName=wheat; InitialResidueType=wheat; InitialResidueMass=6000; InitialStandingFraction=0; InitialCPR=0; InitialCNR=80
              Fertiliser
              Report DailyReport: same as Validation.Growth Experiments.Kojonup.Kojonup2013.Kojonup2013Base.paddock.DailyReport
              Report HarvestReport: same as Validation.Growth Experiments.Kojonup.Kojonup2013.Kojonup2013Base.paddock.HarvestReport
              Report DailyBiomass: same as Validation.Growth Experiments.Kojonup.Kojonup2014.Kojonup2014.paddock.DailyBiomass
              Soil: SoilType=sand; LocalName=Deep sandy duplexes; Site=C-J2; NearestTown=Cunderdin; Region=Central Region; State=Western Australia; Country=Australia; ApsoilNumber=1230; Latitude=-31.5797; Longitude=117.2489; LocationAccuracy=+/- 20m; YearOfSampling=2015
                DataSource=CSIRO - Yvette Oliver and John Byrne - GRDC soil water project
                Physical
                  Thickness  ParticleSizeSand  ParticleSizeSilt  ParticleSizeClay  BD      AirDry  LL15    DUL     SAT
                  100        91.98             3.03              4.99              1.2     0.0158  0.0317  0.0971  0.2758
                  100        91                2.01              6.99              1.423   0.0248  0.0413  0.1049  0.2655
                  100        91.11             2.98              5.91              1.423   0.03    0.0423  0.1116  0.284
                  100        77.54             3.91              18.55             1.451   0.06    0.088   0.15    0.3
                  100        69.92             3.89              26.19             1.4508  0.08    0.096   0.163   0.32
                  200        57.94             3.92              38.14             1.4505  0.08    0.096   0.17    0.36
                  200        52.22             6.7               41.08             1.6     0.08    0.096   0.218   0.36
                  200        68.72             8.08              23.19             1.7     0.08    0.1     0.222   0.355
                  300        -                 -                 -                 1.7     0.08    0.11    0.222   0.355
                  BD, DUL source: Measured
                  AirDry, LL15 source: Estimated based on local knowledge
                  SAT source: Calculated from measured, estimated or calculated BD
                  SoilCrop CanolaSoil
                    LL=[0.032, 0.041, 0.042, 0.088, 0.096, 0.096, 0.096, 0.1, 0.11]
                    KL=[0.06, 0.05, 0.05, 0.03, 0.03, 0.03, 0.03, 0.03, 0.03]
                    XF=[0.3, 0.3, 0.5, 0.5, 0.5, 0.5, 0.5, 0.5, 0.5]
                WaterBalance SoilWater: same as Validation.Growth Experiments.Cunderdin.Cunderdin2013.Cunderdin2013.paddock.Soil.SoilWater
                Organic: same as Validation.Growth Experiments.Cunderdin.Cunderdin2013.Cunderdin2013.paddock.Soil.Organic
                Chemical: same as Validation.Growth Experiments.Cunderdin.Cunderdin2013.Cunderdin2013.paddock.Soil.Chemical
                Water: Thickness=[100, 100, 200, 200, 200, 200, 200]; InitialValues=[0.103, 0.104, 0.11, 0.101, 0.093, 0.106, 0.116]; FilledFromTop=false
                Nutrient
                Solute NO3: Thickness=[100, 100, 100, 100, 100, 200, 200, 200, 300]; InitialValues=[20, 10, 5, 2, 2, 2, 2, 2, 2]; InitialValuesUnits=ppm; WaterTableConcentration=0; D0=0; DepthConstant=0; MaxDepthSoluteAccessible=0; RunoffEffectivenessAtMovingSolute=0; MaxEffectiveRunoff=0
                Solute NH4: Thickness=[100, 100, 100, 100, 100, 200, 200, 200, 300]; InitialValues=[5, 1, 1, 1, 1, 1, 1, 1, 1]; InitialValuesUnits=ppm; WaterTableConcentration=0; D0=0; DepthConstant=0; MaxDepthSoluteAccessible=0; RunoffEffectivenessAtMovingSolute=0; MaxEffectiveRunoff=0
                Solute Urea: same as Validation.Growth Experiments.Cunderdin.Cunderdin2013.Cunderdin2013.paddock.Soil.Urea
                SoilTemperature Temperature
              Manager Reset on date: same as Validation.Growth Experiments.Cunderdin.Cunderdin2013.Cunderdin2013.paddock.Reset on date
              Manager SowingRule
                SowDate = 6-May
                CultivarName = Hyola600_RR
                SowingDepth = 20
                RowSpacing = 250
                Population = 49
                script: same as in Validation.Growth Experiments.Kojonup.Kojonup2013.Kojonup2013Base.paddock.SowingRule
              Manager Fertilise at sowing: same as Validation.Growth Experiments.Kojonup.Kojonup2013.Kojonup2013Base.paddock.Fertilise at sowing
              Manager Fertilise on fixed dates: same as Validation.Growth Experiments.Cunderdin.Cunderdin2013.Cunderdin2013.paddock.Fertilise on fixed dates
              Manager HarvestAfterDate
                HarvestDate = 17-Oct
                script: same as in Validation.Growth Experiments.Kojonup.Kojonup2013.Kojonup2013Base.paddock.HarvestAfterDate
              Report SowingReport: EventNames=[Canola].Sowing
                VariableNames:
                  [Clock].Today
                  [Canola].SowingData.Cultivar
                  [IWeather].Latitude
                  [IWeather].Longitude
      Folder Wagga
        Experiment Wagga2008
          Memo
            McCormick et al 2012. irrigated experiment,3 cultivars, 3 densities, grazed and ungrazed
          Factors
            Permutation
              Factor Cv: Specification=[SowingRule].Script.CultivarName=AV_Garnet,ATR_Marlin,46Y78
              Memo Memo1
                [SowingRule].Script.CultivarName=AV_Garnet,ATR_Marlin,46Y78

                Next Gen needs parameters for all 3 - possibly not correct, but placeholders there
              Factor Treat
                CompositeFactor Low
                  Specifications:
                    [SowingRule].Script.SowDate=29-Apr
                    [SowingRule].Script.Population =  27
                CompositeFactor Mid
                  Specifications:
                    [SowingRule].Script.SowDate=29-Apr
                    [SowingRule].Script.Population =  48
                CompositeFactor High
                  Specifications:
                    [SowingRule].Script.SowDate=29-Apr
                    [SowingRule].Script.Population =  67
                CompositeFactor Late
                  Specifications:
                    [SowingRule].Script.SowDate=8-May
                    [SowingRule].Script.Population =  48
                    [SowingRule].Script.SowingDepth =  35
          Simulation WaggaWagga2008
            Clock: Start=2007-11-12; End=2008-12-31
            Summary summaryfile
            Weather: FileName=met/wagga_-35.05_147.30.met
            SoilArbitrator
            MicroClimate: a_interception=0; b_interception=1; c_interception=0; d_interception=0; SoilHeatFluxFraction=0.4; MinimumHeightDiffForNewLayer=0; NightInterceptionFraction=0.5; ReferenceHeight=2
            Zone Paddock: Area=1; Slope=0; AspectAngle=0; Altitude=50
              Irrigation
              Fertiliser
              SurfaceOrganicMatter: InitialResidueName=wheat_stubble; InitialResidueType=wheat; InitialResidueMass=1000; InitialStandingFraction=0; InitialCPR=0; InitialCNR=80
              Plant Canola
              Manager: same as Validation.Phenology Experiments.OCP Phenology.Gatton2015.Gatton2015Base.Paddock.manager
              Manager SowingRule
                SowDate = 29-Apr
                CultivarName = AV_Garnet
                SowingDepth = 25
                RowSpacing = 180
                Population = 45
                script: same as in Validation.Phenology Experiments.OCP Phenology.Gatton2015.Gatton2015Base.Paddock.SowingRule
              Manager Fertilise at sowing
                Crop = [Canola]
                FertiliserType = NH4N
                Amount = 31
```csharp
using Models.Soils;
using System;
using Models.Core;
using Models.PMF;
namespace Models
{
    [Serializable]
    public class Script : Model
    {
        [Link] Clock Clock;
        [Link] Fertiliser Fertiliser;
        
        [Description("Crop to be fertilised")]
        public IPlant Crop { get; set; }

        [Description("Type of fertiliser to apply? ")] 
        [Display(Type = DisplayType.FertiliserType)]public string FertiliserType { get; set; }
    
        [Description("Amount of fertiliser to be applied (kg/ha)")]
        public double Amount { get; set; }
        
        [EventSubscribe("Sowing")]
        private void OnSowing(object sender, EventArgs e)
        {
            Model crop = sender as Model;
            if (Crop != null && crop.Name.ToLower() == (Crop as IModel).Name.ToLower())
                Fertiliser.Apply(amount: Amount, type: FertiliserType);
        }
    }
}
```
              Manager Irrigate
                irrigDates = 27-Apr, 3-jun, 18-sep
                amount = 50
```csharp
using Models.Soils;
using System;
using Models.Core;
using APSIM.Shared.Utilities;
namespace Models
{
    [Serializable]
    [System.Xml.Serialization.XmlInclude(typeof(Model))]
    public class Script : Model
    {
        [Link] Clock clock;    
           [Link] Irrigation irrigation;

           [Description("Dates for irrigation")] 
        public string[] irrigDates { get; set; }

        [Description("Amount of each irrigation (mm)")]
        public double amount {get; set; }

        [EventSubscribe("DoManagement")]
        private void OnDoManagement(object sender, EventArgs e)
        {
            foreach (string ddMMM in irrigDates)
            {
                if (DateUtilities.DatesEqual(ddMMM, clock.Today))
                    irrigation.Apply(amount: amount);
            }
        }
    }
}
```
              Soil: SoilType=sand; Site=CSU; NearestTown=Wagga Wagga; Region=Southern NSW; State=NSW; Latitude=0; Longitude=0; YearOfSampling=0; DataSource=Kirsten Verburg; Comments=Greenethorpe
                Chemical: PHUnits=Water
                  Thickness=[100, 100, 100, 100, 100, 100, 100, 100, 100, 100, 100, 100, 100, 100, 100, 100, 100, 100, 100, 100]
                  PH=[5.8, 5.9, 6.6, 6.8, 7, 7.1, 7.2, 7.3, 7.4, 7.4, 7.6, 7.8, 8, 8.2, 8.3, 8.4, 8.4, 8.5, 8.5, 8.5]
                Water: FilledFromTop=false
                  Thickness=[100, 100, 100, 100, 100, 100, 100, 100, 100, 100, 100, 100, 100, 100, 100, 100, 100, 100, 100, 100]
                  InitialValues=[0.127, 0.135, 0.151, 0.172, 0.19, 0.19, 0.219, 0.219, 0.247, 0.247, 0.265, 0.265, 0.275, 0.275, 0.285, 0.285, 0.285, 0.285, 0.285, 0.285]
                Physical
                  Thickness  BD    AirDry  LL15  DUL   SAT
                  100        1.48  0.03    0.11  0.28  0.34
                  100        1.49  0.12    0.12  0.27  0.34
                  100        1.41  0.14    0.14  0.25  0.32
                  100        1.37  0.16    0.16  0.28  0.35
                  100        1.41  0.18    0.18  0.28  0.35
                  100        1.41  0.18    0.18  0.28  0.35
                  100        1.52  0.21    0.21  0.3   0.34
                  100        1.52  0.21    0.21  0.3   0.34
                  100        1.62  0.24    0.24  0.31  0.33
                  100        1.62  0.24    0.24  0.31  0.33
                  100        1.66  0.26    0.26  0.31  0.34
                  100        1.66  0.26    0.26  0.31  0.34
                  100        1.62  0.27    0.27  0.32  0.34
                  100        1.62  0.27    0.27  0.32  0.34
                  100        1.62  0.28    0.28  0.33  0.36
                  100        1.62  0.28    0.28  0.33  0.36
                  100        1.62  0.28    0.28  0.33  0.36
                  100        1.62  0.28    0.28  0.33  0.36
                  100        1.62  0.28    0.28  0.33  0.36
                  100        1.62  0.28    0.28  0.33  0.36
                  SoilCrop CanolaSoil
                    LL=[0.11, 0.12, 0.14, 0.16, 0.18, 0.18, 0.21, 0.21, 0.24, 0.24, 0.26, 0.26, 0.27, 0.27, 0.28, 0.28, 0.28, 0.28, 0.28, 0.28]
                    KL=[0.06, 0.05, 0.05, 0.04, 0.04, 0.04, 0.04, 0.03, 0.03, 0.03, 0.03, 0.02, 0.02, 0.02, 0.01, 0.01, 0.01, 0.01, 0, 0]
                    XF=[1, 1, 1, 1, 1, 1, 1, 1, 1, 1, 1, 1, 1, 1, 1, 1, 0.8, 0.4, 0, 0]
                WaterBalance SoilWater: SummerDate=1-nov; SummerU=6; SummerCona=3.5; WinterDate=1-apr; WinterU=2; WinterCona=2; DiffusConst=44; DiffusSlope=16; Salb=0.13; CN2Bare=72; CNRed=20; CNCov=0.8; DischargeWidth=5; CatchmentArea=10; PSIDul=-100
                  Thickness=[100, 100, 100, 100, 100, 100, 100, 100, 100, 100, 100, 100, 100, 100, 100, 100, 100, 100, 100, 100]
                  SWCON=[0.8, 0.8, 0.8, 0.8, 0.8, 0.8, 0.8, 0.8, 0.8, 0.8, 0.8, 0.8, 0.8, 0.8, 0.8, 0.8, 0.6, 0.6, 0.6, 0.6]
                Organic: FOMCNRatio=60; CarbonUnits=Total
                  Thickness  Carbon  SoilCNRatio  FBiom  FInert  FOM
                  100        0.83    8            0.06   0.01    439.771
                  100        0.35    8            0.05   0.01    378.5144
                  100        0.33    8            0.04   0.31    325.7904
                  100        0.22    8            0.03   0.35    280.4104
                  100        0.22    8            0.02   0.4     241.3514
                  100        0.22    8            0.01   0.45    207.7331
                  100        0.19    8            0.01   0.5     178.7975
                  100        0.17    8            0.01   0.6     153.8925
                  100        0.15    8            0.01   0.7     132.4565
                  100        0.12    8            0.01   0.8     114.0063
                  100        0.11    8            0.01   0.9     98.1262
                  100        0.1     8            0.01   0.99    84.458
                  100        0.1     8            0.01   0.99    72.6937
                  100        0.1     8            0.01   0.99    62.568
                  100        0.1     8            0.01   0.99    53.8528
                  100        0.1     8            0.01   0.99    46.3515
                  100        0.08    8            0.01   0.99    39.8951
                  100        0.06    8            0.01   0.99    34.3381
                  100        0.05    8            0.01   0.99    29.555
                  100        0.04    8            0.01   0.99    25.4383
                Nutrient
                Solute NO3: InitialValuesUnits=ppm; WaterTableConcentration=0; D0=0; DepthConstant=0; MaxDepthSoluteAccessible=0; RunoffEffectivenessAtMovingSolute=0; MaxEffectiveRunoff=0
                  Thickness=[100, 100, 100, 100, 100, 100, 100, 100, 100, 100, 100, 100, 100, 100, 100, 100, 100, 100, 100, 100]
                  InitialValues=[20.1, 6.88, 2.8, 2.8, 1.32, 1.32, 0.9, 0.9, 0.58, 0.58, 0.46, 0.46, 0.47, 0.47, 0.56, 0.56, 0.79, 0.79, 0.95, 0.95]
                Solute NH4: InitialValuesUnits=ppm; WaterTableConcentration=0; D0=0; DepthConstant=0; MaxDepthSoluteAccessible=0; RunoffEffectivenessAtMovingSolute=0; MaxEffectiveRunoff=0
                  Thickness=[100, 100, 100, 100, 100, 100, 100, 100, 100, 100, 100, 100, 100, 100, 100, 100, 100, 100, 100, 100]
                  InitialValues=[1.65, 0.21, 0.14, 0.14, 0.1, 0.1, 0.1, 0.1, 0.12, 0.12, 0.13, 0.13, 0.14, 0.14, 0.14, 0.14, 0.09, 0.09, 0.14, 0.14]
                Solute Urea: InitialValuesUnits=kg/ha; WaterTableConcentration=0; D0=0; DepthConstant=0; MaxDepthSoluteAccessible=0; RunoffEffectivenessAtMovingSolute=0; MaxEffectiveRunoff=0
                  Thickness=[100, 100, 100, 100, 100, 100, 100, 100, 100, 100, 100, 100, 100, 100, 100, 100, 100, 100, 100, 100]
                  InitialValues=[0, 0, 0, 0, 0, 0, 0, 0, 0, 0, 0, 0, 0, 0, 0, 0, 0, 0, 0, 0]
                SoilTemperature Temperature
              Report DailyReport
              Report HarvestReport
              Report DailyBiomass: same as Validation.Growth Experiments.Kojonup.Kojonup2014.Kojonup2014.paddock.DailyBiomass
              Report SowingReport: EventNames=[Canola].Sowing
                VariableNames:
                  [Clock].Today
                  [Canola].SowingData.Cultivar
                  [IWeather].Latitude
                  [IWeather].Longitude
              Manager HarvestAfterDate
                HarvestDate = 11-Nov-2008
```csharp
using Models.Soils;
using System;
using Models.Core;
using System.Text;
using Models.PMF;
using Models;
using APSIM.Shared.Utilities;
using Models.PMF.Phen;

namespace Models
{
    [Serializable] 
    public class Script : Model
    {
        [Link] ISummary summary;
        [Link] private Plant canola;
        [Link(Type = LinkType.Path, Path = "[canola].Phenology")]
        private Phenology phenology;
                [Link] Clock Clock;

        private bool Harvestable = false;

        [Description("Harvest Date (d-mmm-yyyy)")]
        public string HarvestDate { get; set; }   
      
        [EventSubscribe("DoManagement")]
        private void OnDoManagement(object sender, EventArgs e)
        {
           
            if (Harvestable && phenology.CurrentPhase.Name == "ReadyForHarvesting")
            {
                canola.Harvest();
                canola.EndCrop();                
            }
            
            if (DateUtilities.DatesAreEqual(HarvestDate, Clock.Today))
                Harvestable = true;

        }
    }
}
```
      Folder Harden
        Experiment Harden1999
          Factors
            Permutation
              Factor Cv: Specification=[SowingRule].Script.CultivarName=Pinnacle_triazine
              Memo
                [SowingRule].Script.CultivarName=Archer,ATR_Wahoo,
                [SowingRule].Script.CultivarName=44Y90_CL,45Y91_CL,Archer,Arazzo,ATR_Bonito,ATR_Stingray,ATR_Wahoo,AV_Zircon,Diamond,K50055,Sensation,Victory_7001_CL
          Simulation Harden1999
            Clock: Start=1999-04-06; End=1999-12-31
            Summary summaryfile
            Weather: FileName=met/harden_-34.50_148.30.met
            SoilArbitrator
            MicroClimate: a_interception=0; b_interception=1; c_interception=0; d_interception=0; SoilHeatFluxFraction=0.4; MinimumHeightDiffForNewLayer=0; NightInterceptionFraction=0.5; ReferenceHeight=2
            Zone Paddock: Area=1; Slope=0; AspectAngle=0; Altitude=50
              Irrigation
              Fertiliser
              SurfaceOrganicMatter: InitialResidueName=wheat_stubble; InitialResidueType=wheat; InitialResidueMass=1000; InitialStandingFraction=0; InitialCPR=0; InitialCNR=80
              Plant Canola
              Soil: SoilType=sand; LocalName=sNSW; Latitude=0; Longitude=0; YearOfSampling=0; DataSource=Harden long-term tillage and stubble managment site
                Comments=This soil modified by Julianne Lilley to match SOM reported by Kirkby et al 2016   ---   Kirkby CA, Richardson AE, Wade LJ, Conyers M, Kirkegaard JA (2016) Inorganic Nutrients Increase Humification Efficiency and C-Sequestration in an Annually Cropped Soil. PLoS ONE 11(5):e0153698. doi:10.1371/journal.pone.0153698
                Physical
                  Thickness  BD    AirDry  LL15   DUL    SAT
                  100        1.35  0.022   0.059  0.161  0.481
                  100        1.66  0.01    0.068  0.175  0.364
                  100        1.61  0.018   0.089  0.201  0.382
                  100        1.68  0.029   0.162  0.232  0.356
                  100        1.61  0.03    0.162  0.259  0.382
                  100        1.7   0.031   0.16   0.269  0.348
                  100        1.76  0.03    0.158  0.28   0.326
                  100        1.76  0.03    0.149  0.283  0.326
                  100        1.77  0.031   0.154  0.285  0.322
                  100        1.77  0.033   0.158  0.282  0.322
                  100        1.78  0.033   0.186  0.278  0.318
                  100        1.8   0.034   0.186  0.289  0.311
                  100        1.8   0.034   0.186  0.3    0.311
                  100        1.8   0.034   0.192  0.29   0.311
                  100        1.86  0.033   0.189  0.28   0.288
                  100        1.86  0.033   0.18   0.28   0.288
                  SoilCrop CanolaSoil
                    LL=[0.059, 0.068, 0.089, 0.162, 0.162, 0.16, 0.158, 0.149, 0.154, 0.158, 0.186, 0.186, 0.186, 0.192, 0.189, 0.18]
                    KL=[0.08, 0.07, 0.07, 0.05, 0.04, 0.03, 0.02, 0.02, 0.02, 0.02, 0.02, 0.02, 0.02, 0.02, 0.01, 0.01]
                    XF=[1, 1, 1, 1, 1, 1, 1, 1, 1, 1, 1, 1, 1, 0.6, 0.3, 0]
                WaterBalance SoilWater: SummerDate=1-Nov; SummerU=3.5; SummerCona=6; WinterDate=1-Apr; WinterU=2; WinterCona=2; DiffusConst=88; DiffusSlope=35.4; Salb=0.13; CN2Bare=72; CNRed=20; CNCov=0.8; PSIDul=-100
                  Thickness=[100, 100, 100, 100, 100, 100, 100, 100, 100, 100, 100, 100, 100, 100, 100, 100, -, -, -, -]
                  SWCON=[0.6, 0.6, 0.6, 0.6, 0.6, 0.6, 0.6, 0.6, 0.6, 0.6, 0.6, 0.6, 0.6, 0.6, 0.6, 0.6, -, -, -, -]
                Organic: FOMCNRatio=40; CarbonUnits=Total
                  Thickness  Carbon  SoilCNRatio  FBiom  FInert  FOM
                  100        1.1     8            0.11   0.01    899.6451
                  100        0.6     8            0.1    0.01    745.832
                  100        0.35    8            0.1    0.01    618.3164
                  100        0.3     8            0.08   0.01    512.6023
                  100        0.27    8            0.08   0.01    424.9623
                  100        0.23    8            0.07   0.1     352.3061
                  100        0.2     8            0.07   0.1     292.072
                  100        0.18    8            0.07   0.2     242.1362
                  100        0.16    8            0.07   0.2     200.738
                  100        0.15    8            0.06   0.2     166.4176
                  100        0.14    8            0.06   0.2     137.965
                  100        0.14    8            0.04   0.2     114.377
                  100        0.13    8            0.04   0.2     94.8219
                  100        0.12    8            0.04   0.2     78.6101
                  100        0.11    8            0.04   0.2     65.1701
                  100        0.1     8            0.04   0.2     54.0279
                Chemical: PHUnits=Water
                  Thickness=[100, 100, 100, 100, 100, 100, 100, 100, 100, 100, 100, 100, 100, 100, 100, 100]
                  PH=[5.8, 5.9, 6.6, 6.8, 7, 7.1, 7.2, 7.3, 7.4, 7.4, 7.6, 7.8, 8, 8.2, 8.3, 8.4]
                Water: FilledFromTop=false
                  Thickness=[100, 100, 100, 100, 100, 100, 100, 100, 100, 100, 100, 100, 100, 100, 100, 100]
                  InitialValues=[0.151, 0.175, 0.192, 0.221, 0.228, 0.206, 0.2, 0.202, 0.206, 0.21, 0.215, 0.221, 0.226, 0.231, 0.235, 0.238]
                Nutrient
                Solute NO3: InitialValues=[30, 10, 5, 3, 3, 3, 3, 2, 2, 2, 2, 2, 2, 2, 2, 2]; InitialValuesUnits=ppm; WaterTableConcentration=0; D0=0; DepthConstant=0; MaxDepthSoluteAccessible=0; RunoffEffectivenessAtMovingSolute=0; MaxEffectiveRunoff=0
                  Thickness=[100, 100, 100, 100, 100, 100, 100, 100, 100, 100, 100, 100, 100, 100, 100, 100]
                Solute NH4: InitialValues=[1, 1, 1, 1, 1, 1, 1, 1, 1, 1, 1, 1, 0, 0, 0, 0]; InitialValuesUnits=ppm; WaterTableConcentration=0; D0=0; DepthConstant=0; MaxDepthSoluteAccessible=0; RunoffEffectivenessAtMovingSolute=0; MaxEffectiveRunoff=0
                  Thickness=[100, 100, 100, 100, 100, 100, 100, 100, 100, 100, 100, 100, 100, 100, 100, 100]
                Solute Urea: InitialValues=[0, 0, 0, 0, 0, 0, 0, 0, 0, 0, 0, 0, 0, 0, 0, 0]; InitialValuesUnits=kg/ha; WaterTableConcentration=0; D0=0; DepthConstant=0; MaxDepthSoluteAccessible=0; RunoffEffectivenessAtMovingSolute=0; MaxEffectiveRunoff=0
                  Thickness=[100, 100, 100, 100, 100, 100, 100, 100, 100, 100, 100, 100, 100, 100, 100, 100]
                SoilTemperature Temperature
              Manager: same as Validation.Phenology Experiments.OCP Phenology.Gatton2015.Gatton2015Base.Paddock.manager
              Manager SowingRule
                SowDate = 18-May
                CultivarName = Pinnacle
                SowingDepth = 25
                RowSpacing = 185
                Population = 50
                script: same as in Validation.Phenology Experiments.OCP Phenology.Gatton2015.Gatton2015Base.Paddock.SowingRule
              Manager Fertilise at sowing
                Crop = [Canola]
                FertiliserType = NH4N
                Amount = 19.7
                script: same as in Validation.Growth Experiments.Wagga.Wagga2008.WaggaWagga2008.Paddock.Fertilise at sowing
              Manager Fertilise on fixed dates
                FertiliserType = UreaN
                FertiliserDates = 20-Jul
                Amount = 70
                AmountType = False
                script: same as in Validation.Growth Experiments.Kojonup.Kojonup2013.Kojonup2013Base.paddock.Fertilise on fixed dates
              Manager Fertilise on fixed dates1
                FertiliserType = UreaN
                FertiliserDates = 9-Sep
                Amount = 40
                AmountType = False
                script: same as in Validation.Growth Experiments.Kojonup.Kojonup2013.Kojonup2013Base.paddock.Fertilise on fixed dates
              Report DailyReport
              Report HarvestReport
              Manager HarvestAfterDate
                HarvestDate = 23-Nov
                script: same as in Validation.Growth Experiments.Kojonup.Kojonup2013.Kojonup2013Base.paddock.HarvestAfterDate
              Report SowingReport: EventNames=[Canola].Sowing
                VariableNames:
                  [Clock].Today
                  [Canola].SowingData.Cultivar
                  [IWeather].Latitude
                  [IWeather].Longitude
      Folder Greenthorpe
        Experiment Greenethorpe2013_Ex1
          Factors
            Permutation
              Factor Cv: Specification=[SowingRule].Script.CultivarName=Hyola971_CL
              Memo
                [SowingRule].Script.CultivarName=Archer,ATR_Wahoo,
                [SowingRule].Script.CultivarName=44Y90_CL,45Y91_CL,Archer,Arazzo,ATR_Bonito,ATR_Stingray,ATR_Wahoo,AV_Zircon,Diamond,K50055,Sensation,Victory_7001_CL
          Simulation Greenethorpe2013_Ex1
            Clock: Start=2013-02-19; End=2013-12-31
            Summary summaryfile
            Weather: FileName=met/greenethorpe_min_adjusted_LT_new1.met
            SoilArbitrator
            MicroClimate: a_interception=0; b_interception=1; c_interception=0; d_interception=0; SoilHeatFluxFraction=0.4; MinimumHeightDiffForNewLayer=0; NightInterceptionFraction=0.5; ReferenceHeight=2
            Zone Paddock: Area=1; Slope=0; AspectAngle=0; Altitude=50
              Irrigation
              Fertiliser
              SurfaceOrganicMatter: InitialResidueName=wheat_stubble; InitialResidueType=wheat; InitialResidueMass=1000; InitialStandingFraction=0; InitialCPR=0; InitialCNR=80
              Plant Canola
              Manager: same as Validation.Phenology Experiments.OCP Phenology.Gatton2015.Gatton2015Base.Paddock.manager
              Manager SowingRule
                SowDate = 25-Mar
                CultivarName = Hyola971_CL
                SowingDepth = 30
                RowSpacing = 230
                Population = 40
                script: same as in Validation.Phenology Experiments.OCP Phenology.Gatton2015.Gatton2015Base.Paddock.SowingRule
              Manager Fertilise at sowing
                Crop = [Canola]
                FertiliserType = NH4N
                Amount = 35
                script: same as in Validation.Growth Experiments.Wagga.Wagga2008.WaggaWagga2008.Paddock.Fertilise at sowing
              Soil: SoilType=Greenethorpe; Site=Front paddock; NearestTown=Young; Region=Southern NSW; State=NSW; Latitude=0; Longitude=0; YearOfSampling=0; DataSource=Kirkegaard/Lilley
                Chemical: same as Validation.Growth Experiments.Wagga.Wagga2008.WaggaWagga2008.Paddock.Soil.Chemical
                Physical
                  Thickness  BD    AirDry  LL15   DUL    SAT
                  100        1.45  0.04    0.1    0.225  0.433
                  100        1.5   0.04    0.138  0.237  0.414
                  100        1.55  0.04    0.161  0.262  0.395
                  100        1.5   0.053   0.161  0.286  0.414
                  100        1.53  0.066   0.224  0.338  0.406
                  100        1.55  0.079   0.227  0.358  0.395
                  100        1.58  0.077   0.263  0.354  0.388
                  100        1.6   0.075   0.264  0.34   0.376
                  100        1.63  0.09    0.264  0.338  0.369
                  100        1.65  0.106   0.264  0.346  0.357
                  100        1.63  0.106   0.264  0.347  0.369
                  100        1.6   0.106   0.266  0.353  0.376
                  100        1.58  0.107   0.276  0.356  0.384
                  100        1.55  0.109   0.271  0.351  0.395
                  100        1.55  0.102   0.252  0.343  0.395
                  100        1.55  0.095   0.252  0.339  0.395
                  100        1.55  0.088   0.189  0.336  0.395
                  100        1.55  0.081   0.189  0.324  0.395
                  100        1.55  0.074   0.186  0.324  0.395
                  100        1.55  0.068   0.186  0.324  0.395
                  SoilCrop CanolaSoil
                    LL=[0.1, 0.138, 0.161, 0.161, 0.224, 0.227, 0.263, 0.264, 0.264, 0.264, 0.264, 0.266, 0.276, 0.271, 0.252, 0.252, 0.189, 0.189, 0.186, 0.186]
                    KL=[0.08, 0.08, 0.06, 0.06, 0.05, 0.04, 0.04, 0.04, 0.04, 0.04, 0.04, 0.03, 0.03, 0.02, 0.02, 0.01, 0.01, 0.01, 0.01, 0.01]
                    XF=[1, 1, 1, 1, 1, 1, 1, 1, 1, 1, 1, 1, 1, 1, 1, 0.7, 0.5, 0.2, 0, 0]
                WaterBalance SoilWater: same as Validation.Growth Experiments.Wagga.Wagga2008.WaggaWagga2008.Paddock.Soil.SoilWater
                Organic: same as Validation.Growth Experiments.Wagga.Wagga2008.WaggaWagga2008.Paddock.Soil.Organic
                Nutrient
                Water: FilledFromTop=true
                  Thickness=[100, 100, 100, 100, 100, 100, 100, 100, 100, 100, 100, 100, 100, 100, 100, 100, 100, 100, 100, 100]
                  InitialValues=[0.225, 0.237, 0.262, 0.286, 0.338, 0.358, 0.354, 0.34, 0.338, 0.346, 0.347, 0.353, 0.356, 0.351, 0.277564, 0.252, 0.189, 0.189, 0.186, 0.186]
                Solute NO3: same as Validation.Growth Experiments.Wagga.Wagga2008.WaggaWagga2008.Paddock.Soil.NO3
                Solute NH4: same as Validation.Growth Experiments.Wagga.Wagga2008.WaggaWagga2008.Paddock.Soil.NH4
                Solute Urea: same as Validation.Growth Experiments.Wagga.Wagga2008.WaggaWagga2008.Paddock.Soil.Urea
                SoilTemperature Temperature
              Manager Fertilise on fixed dates
                FertiliserType = UreaN
                FertiliserDates = 30-mar
                Amount = 150
                AmountType = False
                script: same as in Validation.Growth Experiments.Kojonup.Kojonup2013.Kojonup2013Base.paddock.Fertilise on fixed dates
              Manager Fertilise on fixed dates1
                FertiliserType = UreaN
                FertiliserDates = 30-jul
                Amount = 100
                AmountType = False
                script: same as in Validation.Growth Experiments.Kojonup.Kojonup2013.Kojonup2013Base.paddock.Fertilise on fixed dates
              Report DailyReport
              Report HarvestReport
              Manager HarvestAfterDate
                HarvestDate = 4-Nov
                script: same as in Validation.Growth Experiments.Kojonup.Kojonup2013.Kojonup2013Base.paddock.HarvestAfterDate
              Report SowingReport: EventNames=[Canola].Sowing
                VariableNames:
                  [Clock].Today
                  [Canola].SowingData.Cultivar
                  [IWeather].Latitude
                  [IWeather].Longitude
              Manager codes
                location = Greenethorpe
                TOS = 1-Apr
```csharp
using Models.Soils;
using System;
using Models.Core;
using Models.PMF;
namespace Models
{
    [Serializable]
    [System.Xml.Serialization.XmlInclude(typeof(Model))]
    public class Script : Model
    {
        [Link] Clock Clock;

        [Description("location")]
        public string location { get; set; }

        [Description("Time of sowing")]
        public string TOS { get; set; }


        [EventSubscribe("StartOfSimulation")]
        private void OnSimulationCommencing(object sender, EventArgs e)
        {
          }
      

        }
    }
```
              Report DetailedReport: EventNames=[Clock].DoReport
                VariableNames:
                  [Clock].Today
                  [Canola].Phenology.CurrentStageName
                  [Canola].Leaf.Wt
                  [Canola].Leaf.N
                  [Canola].Leaf.Total.StructuralWt
                  [Canola].Leaf.Total.StructuralN
                  [Canola].Leaf.Live.StructuralWt
                  [Canola].Leaf.Live.StructuralN
                  [Canola].Leaf.Live.Wt
                  [Canola].Leaf.Live.StructuralWt
                  [Canola].Leaf.Live.N
                  [Canola].Leaf.Live.NConc
                  [Canola].Leaf.NConc
                  [Canola].Leaf.MinimumNConc
                  [Canola].Leaf.CriticalNConc
                  [Canola].Leaf.MaximumNConc
                  [Canola].Leaf.Senesced.Wt
                  [Canola].Leaf.LAI
                  [Canola].Leaf.DMSupply.Fixation
                  [Canola].Leaf.Transpiration
                  [Canola].Stem.Wt
                  [Canola].Stem.Live.Wt
                  [Canola].Stem.Live.N
                  [Canola].Stem.Total.StructuralWt
                  [Canola].Stem.Total.StructuralN
                  [Canola].Stem.Live.StructuralWt
                  [Canola].Stem.Live.StructuralN
                  [Canola].Stem.N
                  [Canola].Stem.NConc
                  [Canola].Stem.MinimumNConc
                  [Canola].Stem.CriticalNConc
                  [Canola].Stem.MaximumNConc
                  [Canola].Shell.Wt
                  [Canola].Shell.N
                  [Canola].Shell.Total.StructuralWt
                  [Canola].Shell.Total.StructuralN
                  [Canola].Shell.Live.Wt
                  [Canola].Shell.Live.N
                  [Canola].Shell.Live.StructuralWt
                  [Canola].Shell.Live.StructuralN
                  [Canola].Shell.NConc
                  [Canola].Shell.MinimumNConc
                  [Canola].Shell.CriticalNConc
                  [Canola].Shell.MaximumNConc
                  [Canola].Shell.Area.Index
                  [Canola].Shell.DMSupply.Fixation
                  [Canola].Shell.EnergyBalance.Transpiration
                  [Canola].Grain.Wt
                  [Canola].Grain.N
                  [Canola].Grain.NConc
                  [Canola].Shell.Wt
                  [Canola].Pod.Wt
                  [Canola].Pod.N
                  [Canola].Pod.NConc
                  [Canola].Arbitrator.DM.TotalFixationSupply
                  sum([Canola].Arbitrator.N.Fixation) as NFixed
                  [Canola].Arbitrator.N.TotalPlantDemand
                  [Canola].Arbitrator.N.TotalUptakeSupply
                  [Canola].Arbitrator.DM.TotalPlantDemand
                  [Canola].Leaf.DMDemand.Total
                  [Canola].Stem.DMDemand.Total
                  [Canola].Shell.DMDemand.Total
                  [Canola].Grain.DMDemand.Total
                  [Canola].Root.DMDemand.Total
                  [Canola].Shell.EnergyBalance.CoverTotal
                  [Canola].Leaf.CoverTotal
                  [Canola].CoverTotal
        Experiment Greenethorpe2013_Ex2
          Factors
            Permutation
              Factor Cv: Specification=[SowingRule].Script.CultivarName=Hyola575_CL
              Memo
                [SowingRule].Script.CultivarName=Archer,ATR_Wahoo,
                [SowingRule].Script.CultivarName=44Y90_CL,45Y91_CL,Archer,Arazzo,ATR_Bonito,ATR_Stingray,ATR_Wahoo,AV_Zircon,Diamond,K50055,Sensation,Victory_7001_CL
          Simulation Greenethorpe2013_Ex2
            Clock: Start=2013-02-19; End=2013-12-31
            Summary summaryfile
            Weather: FileName=met/greenethorpe_min_adjusted_LT_new1.met
            SoilArbitrator
            MicroClimate: a_interception=0; b_interception=1; c_interception=0; d_interception=0; SoilHeatFluxFraction=0.4; MinimumHeightDiffForNewLayer=0; NightInterceptionFraction=0.5; ReferenceHeight=2
            Zone Paddock: Area=1; Slope=0; AspectAngle=0; Altitude=50
              Irrigation
              Fertiliser
              SurfaceOrganicMatter: InitialResidueName=wheat_stubble; InitialResidueType=wheat; InitialResidueMass=1000; InitialStandingFraction=0; InitialCPR=0; InitialCNR=80
              Plant Canola
              Manager: same as Validation.Phenology Experiments.OCP Phenology.Gatton2015.Gatton2015Base.Paddock.manager
              Manager SowingRule
                SowDate = 23-Apr
                CultivarName = Hyola575_CL_GT
                SowingDepth = 30
                RowSpacing = 230
                Population = 35
                script: same as in Validation.Phenology Experiments.OCP Phenology.Gatton2015.Gatton2015Base.Paddock.SowingRule
              Manager Fertilise at sowing: same as Validation.Growth Experiments.Greenthorpe.Greenethorpe2013_Ex1.Greenethorpe2013_Ex1.Paddock.Fertilise at sowing
              Soil: same as Validation.Growth Experiments.Greenthorpe.Greenethorpe2013_Ex1.Greenethorpe2013_Ex1.Paddock.Soil
              Manager Fertilise on fixed dates: same as Validation.Growth Experiments.Greenthorpe.Greenethorpe2013_Ex1.Greenethorpe2013_Ex1.Paddock.Fertilise on fixed dates
              Manager Fertilise on fixed dates1
                FertiliserType = UreaN
                FertiliserDates = 30-jul
                Amount = 50
                AmountType = False
                script: same as in Validation.Growth Experiments.Kojonup.Kojonup2013.Kojonup2013Base.paddock.Fertilise on fixed dates
              Report DailyReport: EventNames=[Clock].DoReport
                VariableNames:
                  [Clock].Today
                  [Canola].SowingData.Cultivar
                  [Canola].Phenology.CurrentStageName
                  [Weather].MeanT
                  sum([Soil].Water.MM) as ProfileWater
                  [Canola].AboveGround.Wt
                  [Canola].AboveGroundLive.Wt
                  [Canola].AboveGround.N
                  [Canola].AboveGroundLive.N
                  [Canola].AboveGroundLive.N*10 as UptakeNKgHA
                  [canola].Grain.Wt
                  [Canola].Grain.Live.Wt
                  [Canola].Grain.N
                  [Canola].Grain.NConc
                  [Canola].Grain.Number
                  [Canola].Grain.Size
                  [Canola].Leaf.LAI
                  [canola].Leaf.Live.Wt
                  [canola].Leaf.Wt
                  [canola].Leaf.SpecificArea
                  [canola].Leaf.LiveNconc
                  [canola].Leaf.Live.NConc
                  [canola].Pod.NConc
                  [Canola].Leaf.Dead.N
                  [Canola].Leaf.Dead.NConc
                  [Canola].Leaf.Dead.Wt
                  [Canola].Leaf.Live.N
                  [Canola].Leaf.Live.NConc
                  [Canola].Root.Depth
                  [Canola].Root.N
                  [Canola].Root.Wt
                  [Canola].Root.NConc
                  [Canola].Root.WaterUptake
                  [Canola].Stem.N
                  [Canola].Stem.NConc
                  [Canola].Stem.Wt
                  [Canola].Stem.Live.StorageWt
                  [Canola].Structure.Height
                  [SurfaceOrganicMatter].Wt
                  sum([Soil].NO3.kgha) as TotalSoilNitrogen
                  [Canola].Phenology.Stage
                  [Clock].Today.Year
                  [Canola].Leaf.DeadCohortNo
                  [Canola].Leaf.GreenCohortNo
                  [Canola].Leaf.SenescingCohortNo
                  [Canola].Leaf.ExpandedCohortNo
              Report HarvestReport: EventNames=[Canola].Harvesting
                VariableNames:
                  [Clock].Today
                  [Canola].SowingData.Cultivar
                  [Canola].AboveGroundLive.Wt
                  [Canola].Grain.Wt
                  [Canola].Phenology.CurrentStageName
                  [Soil].Water.Volumetric
                  [Soil].Water.MM
                  sum([Soil].Water.MM) as ProfileWater
                  sum([Soil].NO3.kgha) as TotalSoilNitrogen
                  [Canola].Phenology.MaturityDAS
                  [Canola].Phenology.Stage
                  [Clock].Today.Year
              Report SowingReport: EventNames=[Canola].Sowing
                VariableNames:
                  [Clock].Today
                  [Canola].SowingData.Cultivar
                  [IWeather].Latitude
                  [IWeather].Longitude
              Manager codes: same as Validation.Growth Experiments.Greenthorpe.Greenethorpe2013_Ex1.Greenethorpe2013_Ex1.Paddock.codes
              Manager HarvestAfterDate
                HarvestDate = 23-Oct
                script: same as in Validation.Growth Experiments.Kojonup.Kojonup2013.Kojonup2013Base.paddock.HarvestAfterDate
        Experiment Greenethorpe2013_Ex3
          Factors
            Permutation
              Factor Cv
                Specification=[SowingRule].Script.CultivarName=Hyola575_CL,Crusher_TT,AV_Garnet
              Memo
                [SowingRule].Script.CultivarName=Archer,ATR_Wahoo,
                [SowingRule].Script.CultivarName=44Y90_CL,45Y91_CL,Archer,Arazzo,ATR_Bonito,ATR_Stingray,ATR_Wahoo,AV_Zircon,Diamond,K50055,Sensation,Victory_7001_CL
          Simulation Greenethorpe2013Base
            Clock: Start=2013-02-19; End=2013-12-31
            Summary summaryfile
            Weather: FileName=met/greenethorpe_min_adjusted_LT_new1.met
            SoilArbitrator
            MicroClimate: a_interception=0; b_interception=1; c_interception=0; d_interception=0; SoilHeatFluxFraction=0.4; MinimumHeightDiffForNewLayer=0; NightInterceptionFraction=0.5; ReferenceHeight=2
            Zone Paddock: Area=1; Slope=0; AspectAngle=0; Altitude=50
              Irrigation
              Fertiliser
              SurfaceOrganicMatter: InitialResidueName=wheat_stubble; InitialResidueType=wheat; InitialResidueMass=1000; InitialStandingFraction=0; InitialCPR=0; InitialCNR=80
              Plant Canola
              Manager: same as Validation.Phenology Experiments.OCP Phenology.Gatton2015.Gatton2015Base.Paddock.manager
              Manager SowingRule
                SowDate = 23-Apr
                CultivarName = Monty
                SowingDepth = 30
                RowSpacing = 230
                Population = 40
                script: same as in Validation.Phenology Experiments.OCP Phenology.Gatton2015.Gatton2015Base.Paddock.SowingRule
              Manager Fertilise at sowing: same as Validation.Growth Experiments.Greenthorpe.Greenethorpe2013_Ex1.Greenethorpe2013_Ex1.Paddock.Fertilise at sowing
              Manager Fertilise on fixed dates: same as Validation.Growth Experiments.Greenthorpe.Greenethorpe2013_Ex1.Greenethorpe2013_Ex1.Paddock.Fertilise on fixed dates
              Manager Fertilise on fixed dates1: same as Validation.Growth Experiments.Greenthorpe.Greenethorpe2013_Ex2.Greenethorpe2013_Ex2.Paddock.Fertilise on fixed dates1
              Report DailyReport: same as Validation.Growth Experiments.Greenthorpe.Greenethorpe2013_Ex2.Greenethorpe2013_Ex2.Paddock.DailyReport
              Report HarvestReport: same as Validation.Growth Experiments.Greenthorpe.Greenethorpe2013_Ex2.Greenethorpe2013_Ex2.Paddock.HarvestReport
              Manager HarvestAfterDate: same as Validation.Growth Experiments.Greenthorpe.Greenethorpe2013_Ex2.Greenethorpe2013_Ex2.Paddock.HarvestAfterDate
              Report SowingReport: EventNames=[Canola].Sowing
                VariableNames:
                  [Clock].Today
                  [Canola].SowingData.Cultivar
                  [IWeather].Latitude
                  [IWeather].Longitude
              Manager codes: same as Validation.Growth Experiments.Greenthorpe.Greenethorpe2013_Ex1.Greenethorpe2013_Ex1.Paddock.codes
              Soil: SoilType=sand; LocalName=Greenethorpe; Site=Front paddock; NearestTown=Young; Region=Southern NSW; State=NSW; Latitude=0; Longitude=0; YearOfSampling=0; DataSource=Kirkegaard/Lilley
                Chemical: PHUnits=Water
                  Thickness=[100, 100, 100, 100, 100, 100, 100, 100, 100, 100, 100, 100, 100, 100, 100, 100, 100, 100, 100, 1100]
                  PH=[5.8, 5.9, 6.6, 6.8, 7, 7.1, 7.2, 7.3, 7.4, 7.4, 7.6, 7.8, 8, 8.2, 8.3, 8.4, 8.4, 8.5, 8.5, 8.5]
                Physical
                  Thickness  BD    AirDry  LL15   DUL    SAT
                  100        1.45  0.04    0.1    0.225  0.433
                  100        1.5   0.04    0.138  0.237  0.414
                  100        1.55  0.04    0.161  0.262  0.395
                  100        1.5   0.053   0.161  0.286  0.414
                  100        1.53  0.066   0.224  0.338  0.406
                  100        1.55  0.079   0.227  0.358  0.395
                  100        1.58  0.077   0.263  0.354  0.388
                  100        1.6   0.075   0.264  0.34   0.376
                  100        1.63  0.09    0.264  0.338  0.369
                  100        1.65  0.106   0.264  0.346  0.357
                  100        1.63  0.106   0.264  0.347  0.369
                  100        1.6   0.106   0.266  0.353  0.376
                  100        1.58  0.107   0.276  0.356  0.384
                  100        1.55  0.109   0.271  0.351  0.395
                  100        1.55  0.102   0.252  0.343  0.395
                  100        1.55  0.095   0.252  0.339  0.395
                  100        1.55  0.088   0.189  0.336  0.395
                  100        1.55  0.081   0.189  0.324  0.395
                  100        1.55  0.074   0.186  0.324  0.395
                  1100       1.55  0.068   0.186  0.324  0.395
                  SoilCrop CanolaSoil
                    LL=[0.1, 0.138, 0.161, 0.161, 0.224, 0.227, 0.263, 0.264, 0.264, 0.264, 0.264, 0.266, 0.276, 0.271, 0.252, 0.252, 0.189, 0.189, 0.186, 0.186]
                    KL=[0.08, 0.08, 0.06, 0.06, 0.05, 0.04, 0.04, 0.04, 0.04, 0.04, 0.04, 0.03, 0.03, 0.02, 0.02, 0.01, 0.01, 0.01, 0.01, 0.01]
                    XF=[1, 1, 1, 1, 1, 1, 1, 1, 1, 1, 1, 1, 1, 1, 1, 1, 0.5, 0.3, 0, 0]
                WaterBalance SoilWater: SummerDate=1-nov; SummerU=6; SummerCona=3.5; WinterDate=1-apr; WinterU=2; WinterCona=2; DiffusConst=44; DiffusSlope=16; Salb=0.13; CN2Bare=72; CNRed=20; CNCov=0.8; DischargeWidth=5; CatchmentArea=10; PSIDul=-100
                  Thickness=[100, 100, 100, 100, 100, 100, 100, 100, 100, 100, 100, 100, 100, 100, 100, 100, 100, 100, 100, 1100]
                  SWCON=[0.8, 0.8, 0.8, 0.8, 0.8, 0.8, 0.8, 0.8, 0.8, 0.8, 0.8, 0.8, 0.8, 0.8, 0.8, 0.8, 0.6, 0.6, 0.6, 0.6]
                Organic: FOMCNRatio=60; CarbonUnits=Total
                  Thickness  Carbon  SoilCNRatio  FBiom  FInert  FOM
                  100        0.83    8            0.06   0.01    439.771
                  100        0.35    8            0.05   0.01    378.5144
                  100        0.33    8            0.04   0.31    325.7904
                  100        0.22    8            0.03   0.35    280.4104
                  100        0.22    8            0.02   0.4     241.3514
                  100        0.22    8            0.01   0.45    207.7331
                  100        0.19    8            0.01   0.5     178.7975
                  100        0.17    8            0.01   0.6     153.8925
                  100        0.15    8            0.01   0.7     132.4565
                  100        0.12    8            0.01   0.8     114.0063
                  100        0.11    8            0.01   0.9     98.1262
                  100        0.1     8            0.01   0.99    84.458
                  100        0.1     8            0.01   0.99    72.6937
                  100        0.1     8            0.01   0.99    62.568
                  100        0.1     8            0.01   0.99    53.8528
                  100        0.1     8            0.01   0.99    46.3515
                  100        0.08    8            0.01   0.99    39.8951
                  100        0.06    8            0.01   0.99    34.3381
                  100        0.05    8            0.01   0.99    29.555
                  1100       0.04    8            0.01   0.99    25.4383
                Nutrient
                Water: FilledFromTop=true
                  Thickness=[100, 100, 100, 100, 100, 100, 100, 100, 100, 100, 100, 100, 100, 100, 100, 100, 100, 100, 100, 1100]
                  InitialValues=[0.225, 0.237, 0.262, 0.286, 0.338, 0.358, 0.354, 0.34, 0.338, 0.346, 0.347, 0.353, 0.356, 0.351, 0.343, 0.339, 0.336, 0.324, 0.324, 0.216647]
                Solute NO3: InitialValuesUnits=ppm; WaterTableConcentration=0; D0=0; DepthConstant=0; MaxDepthSoluteAccessible=0; RunoffEffectivenessAtMovingSolute=0; MaxEffectiveRunoff=0
                  Thickness=[100, 100, 100, 100, 100, 100, 100, 100, 100, 100, 100, 100, 100, 100, 100, 100, 100, 100, 100, 1100]
                  InitialValues=[43.333, 15.686, 4.487, 3.846, 3.896, 3.896, 3.896, 3.896, 1.875, 1.25, 1.235, 0.617, 0.585, 0.585, 0.592, 0.592, 0.565, 0.565, 0.552, 0.552]
                Solute NH4: InitialValuesUnits=ppm; WaterTableConcentration=0; D0=0; DepthConstant=0; MaxDepthSoluteAccessible=0; RunoffEffectivenessAtMovingSolute=0; MaxEffectiveRunoff=0
                  Thickness=[100, 100, 100, 100, 100, 100, 100, 100, 100, 100, 100, 100, 100, 100, 100, 100, 100, 100, 100, 1100]
                  InitialValues=[1.595, 0.206, 0.139, 0.135, 0.099, 0.101, 0.103, 0.104, 0.122, 0.124, 0.131, 0.128, 0.129, 0.127, 0.128, 0.128, 0.079, 0.079, 0.12, 0.12]
                Solute Urea: InitialValuesUnits=kg/ha; WaterTableConcentration=0; D0=0; DepthConstant=0; MaxDepthSoluteAccessible=0; RunoffEffectivenessAtMovingSolute=0; MaxEffectiveRunoff=0
                  Thickness=[100, 100, 100, 100, 100, 100, 100, 100, 100, 100, 100, 100, 100, 100, 100, 100, 100, 100, 100, 1100]
                  InitialValues=[0, 0, 0, 0, 0, 0, 0, 0, 0, 0, 0, 0, 0, 0, 0, 0, 0, 0, 0, 0]
                SoilTemperature Temperature
        Experiment Greenethorpe2014_Ex1
          Factors
            Permutation
              Factor Cv: Specification=[SowingRule].Script.CultivarName=Hyola971_CL
          Simulation Greenethorpe2014_Ex1
            Clock: Start=2014-03-10; End=2014-12-31
            Summary summaryfile
            Weather: FileName=met/greenethorpe_min_adjusted_LT_new1.met
            SoilArbitrator
            MicroClimate: a_interception=0; b_interception=1; c_interception=0; d_interception=0; SoilHeatFluxFraction=0.4; MinimumHeightDiffForNewLayer=0; NightInterceptionFraction=0.5; ReferenceHeight=2
            Zone Paddock: Area=1; Slope=0; AspectAngle=0; Altitude=50
              Irrigation
              Fertiliser
              SurfaceOrganicMatter: InitialResidueName=wheat_stubble; InitialResidueType=wheat; InitialResidueMass=1000; InitialStandingFraction=0; InitialCPR=0; InitialCNR=80
              Plant Canola
              Manager: same as Validation.Phenology Experiments.OCP Phenology.Gatton2015.Gatton2015Base.Paddock.manager
              Manager Harvesting: same as Validation.Phenology Experiments.OCP Phenology.Gatton2015.Gatton2015Base.Paddock.Harvesting
              Manager SowingRule
                SowDate = 15-mar
                CultivarName = Hyola971_CL
                SowingDepth = 30
                RowSpacing = 230
                Population = 40
                script: same as in Validation.Phenology Experiments.OCP Phenology.Gatton2015.Gatton2015Base.Paddock.SowingRule
              Soil: SoilType=sand; LocalName=Greenethorpe; Site=Front paddock; NearestTown=Young; Region=Southern NSW; State=NSW; Latitude=0; Longitude=0; YearOfSampling=0; DataSource=Kirkegaard/Lilley
                Chemical: same as Validation.Growth Experiments.Greenthorpe.Greenethorpe2013_Ex3.Greenethorpe2013Base.Paddock.Soil.Chemical
                Water: same as Validation.Growth Experiments.Greenthorpe.Greenethorpe2013_Ex3.Greenethorpe2013Base.Paddock.Soil.Water
                Physical
                  Thickness  BD    AirDry  LL15   DUL    SAT
                  100        1.45  0.04    0.1    0.225  0.433
                  100        1.5   0.04    0.138  0.237  0.414
                  100        1.55  0.04    0.161  0.262  0.395
                  100        1.5   0.053   0.161  0.286  0.414
                  100        1.53  0.066   0.224  0.338  0.406
                  100        1.55  0.079   0.227  0.358  0.395
                  100        1.58  0.077   0.263  0.354  0.388
                  100        1.6   0.075   0.264  0.34   0.376
                  100        1.63  0.09    0.264  0.338  0.369
                  100        1.65  0.106   0.264  0.346  0.357
                  100        1.63  0.106   0.264  0.347  0.369
                  100        1.6   0.106   0.266  0.353  0.376
                  100        1.58  0.107   0.276  0.356  0.384
                  100        1.55  0.109   0.271  0.351  0.395
                  100        1.55  0.102   0.252  0.343  0.395
                  100        1.55  0.095   0.252  0.339  0.395
                  100        1.55  0.088   0.189  0.336  0.395
                  100        1.55  0.081   0.189  0.324  0.395
                  100        1.55  0.074   0.186  0.324  0.395
                  1100       1.55  0.068   0.186  0.324  0.395
                  SoilCrop CanolaSoil
                    LL=[0.1, 0.138, 0.161, 0.161, 0.224, 0.227, 0.263, 0.264, 0.264, 0.264, 0.264, 0.266, 0.276, 0.271, 0.252, 0.252, 0.189, 0.189, 0.186, 0.186]
                    KL=[0.08, 0.08, 0.06, 0.06, 0.05, 0.04, 0.04, 0.04, 0.04, 0.04, 0.04, 0.03, 0.03, 0.02, 0.02, 0.01, 0.01, 0.01, 0.01, 0.01]
                    XF=[1, 1, 1, 1, 1, 1, 1, 1, 1, 1, 1, 1, 1, 1, 1, 1, 1, 1, 1, 0.5]
                WaterBalance SoilWater: same as Validation.Growth Experiments.Greenthorpe.Greenethorpe2013_Ex3.Greenethorpe2013Base.Paddock.Soil.SoilWater
                Organic: same as Validation.Growth Experiments.Greenthorpe.Greenethorpe2013_Ex3.Greenethorpe2013Base.Paddock.Soil.Organic
                Nutrient
                Solute NO3: same as Validation.Growth Experiments.Greenthorpe.Greenethorpe2013_Ex3.Greenethorpe2013Base.Paddock.Soil.NO3
                Solute NH4: same as Validation.Growth Experiments.Greenthorpe.Greenethorpe2013_Ex3.Greenethorpe2013Base.Paddock.Soil.NH4
                Solute Urea: same as Validation.Growth Experiments.Greenthorpe.Greenethorpe2013_Ex3.Greenethorpe2013Base.Paddock.Soil.Urea
                SoilTemperature Temperature
              Manager Fertilise at sowing
                Crop = [Canola]
                FertiliserType = NO3N
                Amount = 21
                script: same as in Validation.Growth Experiments.Wagga.Wagga2008.WaggaWagga2008.Paddock.Fertilise at sowing
              Manager Fertilise on fixed dates
                FertiliserType = UreaN
                FertiliserDates = 24-jul
                Amount = 50
                AmountType = True
                script: same as in Validation.Growth Experiments.Kojonup.Kojonup2013.Kojonup2013Base.paddock.Fertilise on fixed dates
              Report DailyReport: same as Validation.Growth Experiments.Greenthorpe.Greenethorpe2013_Ex2.Greenethorpe2013_Ex2.Paddock.DailyReport
              Report HarvestReport: same as Validation.Growth Experiments.Greenthorpe.Greenethorpe2013_Ex2.Greenethorpe2013_Ex2.Paddock.HarvestReport
              Report SowingReport: EventNames=[Canola].Sowing
                VariableNames:
                  [Clock].Today
                  [Canola].SowingData.Cultivar
                  [IWeather].Latitude
                  [IWeather].Longitude
              Manager codes: same as Validation.Growth Experiments.Greenthorpe.Greenethorpe2013_Ex1.Greenethorpe2013_Ex1.Paddock.codes
        Experiment Greenethorpe2014_Ex2
          Factors
            Permutation
              Factor Cv: Specification=[SowingRule].Script.CultivarName=Hyola575_CL
          Simulation Greenethorpe2014_Ex2
            Clock: Start=2014-03-10; End=2014-12-31
            Summary summaryfile
            Weather: FileName=met/greenethorpe_min_adjusted_LT_new1.met
            SoilArbitrator
            MicroClimate: a_interception=0; b_interception=1; c_interception=0; d_interception=0; SoilHeatFluxFraction=0.4; MinimumHeightDiffForNewLayer=0; NightInterceptionFraction=0.5; ReferenceHeight=2
            Zone Paddock: Area=1; Slope=0; AspectAngle=0; Altitude=50
              Irrigation
              Fertiliser
              SurfaceOrganicMatter: InitialResidueName=wheat_stubble; InitialResidueType=wheat; InitialResidueMass=1000; InitialStandingFraction=0; InitialCPR=0; InitialCNR=80
              Plant Canola
              Manager: same as Validation.Phenology Experiments.OCP Phenology.Gatton2015.Gatton2015Base.Paddock.manager
              Manager Harvesting: same as Validation.Phenology Experiments.OCP Phenology.Gatton2015.Gatton2015Base.Paddock.Harvesting
              Manager SowingRule
                SowDate = 16-apr
                CultivarName = Hyola575_CL
                SowingDepth = 30
                RowSpacing = 230
                Population = 59
                script: same as in Validation.Phenology Experiments.OCP Phenology.Gatton2015.Gatton2015Base.Paddock.SowingRule
              Manager Fertilise at sowing: same as Validation.Growth Experiments.Greenthorpe.Greenethorpe2014_Ex1.Greenethorpe2014_Ex1.Paddock.Fertilise at sowing
              Manager Fertilise on fixed dates: same as Validation.Growth Experiments.Greenthorpe.Greenethorpe2014_Ex1.Greenethorpe2014_Ex1.Paddock.Fertilise on fixed dates
              Soil: SoilType=Greenethorpe; Site=Front paddock; NearestTown=Young; Region=Southern NSW; State=NSW; Latitude=0; Longitude=0; YearOfSampling=0; DataSource=Kirkegaard/Lilley
                Chemical: same as Validation.Growth Experiments.Wagga.Wagga2008.WaggaWagga2008.Paddock.Soil.Chemical
                Water: FilledFromTop=true
                  Thickness=[100, 100, 100, 100, 100, 100, 100, 100, 100, 100, 100, 100, 100, 100, 100, 100, 100, 100, 100, 100]
                  InitialValues=[0.225, 0.237, 0.262, 0.286, 0.338, 0.358, 0.354, 0.34, 0.31896, 0.264, 0.264, 0.266, 0.276, 0.271, 0.252, 0.252, 0.189, 0.189, 0.186, 0.186]
                Physical: same as Validation.Growth Experiments.Greenthorpe.Greenethorpe2013_Ex1.Greenethorpe2013_Ex1.Paddock.Soil.Physical
                WaterBalance SoilWater: same as Validation.Growth Experiments.Wagga.Wagga2008.WaggaWagga2008.Paddock.Soil.SoilWater
                Organic: same as Validation.Growth Experiments.Wagga.Wagga2008.WaggaWagga2008.Paddock.Soil.Organic
                Nutrient
                Solute NO3: InitialValuesUnits=ppm; WaterTableConcentration=0; D0=0; DepthConstant=0; MaxDepthSoluteAccessible=0; RunoffEffectivenessAtMovingSolute=0; MaxEffectiveRunoff=0
                  Thickness=[100, 100, 100, 100, 100, 100, 100, 100, 100, 100, 100, 100, 100, 100, 100, 100, 100, 100, 100, 100]
                  InitialValues=[43.333, 15.686, 4.487, 3.846, 3.896, 3.896, 3.896, 3.896, 1.875, 1.25, 1.235, 0.617, 0.585, 0.585, 0.592, 0.592, 0.565, 0.565, 0.552, 0.552]
                Solute NH4: InitialValuesUnits=ppm; WaterTableConcentration=0; D0=0; DepthConstant=0; MaxDepthSoluteAccessible=0; RunoffEffectivenessAtMovingSolute=0; MaxEffectiveRunoff=0
                  Thickness=[100, 100, 100, 100, 100, 100, 100, 100, 100, 100, 100, 100, 100, 100, 100, 100, 100, 100, 100, 100]
                  InitialValues=[1.595, 0.206, 0.139, 0.135, 0.099, 0.101, 0.103, 0.104, 0.122, 0.124, 0.131, 0.128, 0.129, 0.127, 0.128, 0.128, 0.079, 0.079, 0.12, 0.12]
                Solute Urea: same as Validation.Growth Experiments.Wagga.Wagga2008.WaggaWagga2008.Paddock.Soil.Urea
                SoilTemperature Temperature
              Report DailyReport: same as Validation.Growth Experiments.Greenthorpe.Greenethorpe2013_Ex2.Greenethorpe2013_Ex2.Paddock.DailyReport
              Report HarvestReport: same as Validation.Growth Experiments.Greenthorpe.Greenethorpe2013_Ex2.Greenethorpe2013_Ex2.Paddock.HarvestReport
              Report SowingReport: EventNames=[Canola].Sowing
                VariableNames:
                  [Clock].Today
                  [Canola].SowingData.Cultivar
                  [IWeather].Latitude
                  [IWeather].Longitude
              Manager codes: same as Validation.Growth Experiments.Greenthorpe.Greenethorpe2013_Ex1.Greenethorpe2013_Ex1.Paddock.codes
        Experiment Greenethorpe2014_Ex3
          Factors
            Permutation
              Factor Cv
                Specification=[SowingRule].Script.CultivarName=Hyola971_CL, ATR_Gem, 45Y88_CL, 44Y87_CL, Hyola559_TT, Hyola575_CL
              Memo
                [SowingRule].Script.CultivarName=Archer,ATR_Wahoo,
                [SowingRule].Script.CultivarName=44Y90_CL,45Y91_CL,Archer,Arazzo,ATR_Bonito,ATR_Stingray,ATR_Wahoo,AV_Zircon,Diamond,K50055,Sensation,Victory_7001_CL
              Factor TOS: Specification=[SowingRule].Script.SowDate=1-Apr,16-Apr,28-Apr,13-May
          Simulation Greenethorpe2014_Ex3
            Clock: Start=2014-03-17; End=2014-12-31
            Summary summaryfile
            Weather: FileName=met/greenethorpe_min_adjusted_LT_new1.met
            SoilArbitrator
            MicroClimate: a_interception=0; b_interception=1; c_interception=0; d_interception=0; SoilHeatFluxFraction=0.4; MinimumHeightDiffForNewLayer=0; NightInterceptionFraction=0.5; ReferenceHeight=2
            Zone Paddock: Area=1; Slope=0; AspectAngle=0; Altitude=50
              Irrigation
              Fertiliser
              SurfaceOrganicMatter: InitialResidueName=wheat_stubble; InitialResidueType=wheat; InitialResidueMass=1000; InitialStandingFraction=0; InitialCPR=0; InitialCNR=80
              Plant Canola
              Manager: same as Validation.Phenology Experiments.OCP Phenology.Gatton2015.Gatton2015Base.Paddock.manager
              Manager SowingRule
                SowDate = 15-mar
                CultivarName = Hyola971_CL
                SowingDepth = 30
                RowSpacing = 230
                Population = 35
                script: same as in Validation.Phenology Experiments.OCP Phenology.Gatton2015.Gatton2015Base.Paddock.SowingRule
              Manager Fertilise at sowing: same as Validation.Growth Experiments.Greenthorpe.Greenethorpe2014_Ex1.Greenethorpe2014_Ex1.Paddock.Fertilise at sowing
              Manager Fertilise on fixed dates: same as Validation.Growth Experiments.Greenthorpe.Greenethorpe2014_Ex1.Greenethorpe2014_Ex1.Paddock.Fertilise on fixed dates
              Report DailyReport: same as Validation.Growth Experiments.Greenthorpe.Greenethorpe2013_Ex2.Greenethorpe2013_Ex2.Paddock.DailyReport
              Report HarvestReport: same as Validation.Growth Experiments.Greenthorpe.Greenethorpe2013_Ex2.Greenethorpe2013_Ex2.Paddock.HarvestReport
              Report SowingReport: EventNames=[Canola].Sowing
                VariableNames:
                  [Clock].Today
                  [Canola].SowingData.Cultivar
                  [IWeather].Latitude
                  [IWeather].Longitude
              Manager HarvestAfterDate: same as Validation.Growth Experiments.Kojonup.Kojonup2013.Kojonup2013Base.paddock.HarvestAfterDate
              Soil: SoilType=sand; LocalName=Greenethorpe; Site=Front paddock; NearestTown=Young; Region=Southern NSW; State=NSW; Latitude=0; Longitude=0; YearOfSampling=0; DataSource=Kirkegaard/Lilley
                Chemical: same as Validation.Growth Experiments.Greenthorpe.Greenethorpe2013_Ex3.Greenethorpe2013Base.Paddock.Soil.Chemical
                Water: same as Validation.Growth Experiments.Greenthorpe.Greenethorpe2013_Ex3.Greenethorpe2013Base.Paddock.Soil.Water
                Physical: same as Validation.Growth Experiments.Greenthorpe.Greenethorpe2014_Ex1.Greenethorpe2014_Ex1.Paddock.Soil.Physical
                WaterBalance SoilWater: same as Validation.Growth Experiments.Greenthorpe.Greenethorpe2013_Ex3.Greenethorpe2013Base.Paddock.Soil.SoilWater
                Organic: same as Validation.Growth Experiments.Greenthorpe.Greenethorpe2013_Ex3.Greenethorpe2013Base.Paddock.Soil.Organic
                Nutrient
                Solute NO3: InitialValuesUnits=ppm; WaterTableConcentration=0; D0=0; DepthConstant=0; MaxDepthSoluteAccessible=0; RunoffEffectivenessAtMovingSolute=0; MaxEffectiveRunoff=0
                  Thickness=[100, 100, 100, 100, 100, 100, 100, 100, 100, 100, 100, 100, 100, 100, 100, 100, 100, 100, 100, 1100]
                  InitialValues=[43.333, 15.686, 5, 5, 5, 5, 5, 5, 5, 5, 5, 5, 5, 5, 5, 5, 5, 5, 5, 5]
                Solute NH4: same as Validation.Growth Experiments.Greenthorpe.Greenethorpe2013_Ex3.Greenethorpe2013Base.Paddock.Soil.NH4
                Solute Urea: same as Validation.Growth Experiments.Greenthorpe.Greenethorpe2013_Ex3.Greenethorpe2013Base.Paddock.Soil.Urea
                SoilTemperature Temperature
      Folder Merredin
        Experiment Merredin2014
          Factors
            Permutation
              Factor Cv
                Specification=[SowingRule].Script.CultivarName=43C80_CL,ATR_Stingray,ATR_Wahoo,AV_Garnet,Hyola559_TT,Hyola600_RR,Hyola635_CL,Hyola750_TT,Hyola971_CL,NS_Diamond
              Factor Fert
                CompositeFactor 0N
                  Specifications:
                    [Fertilise at sowing].Script.Amount = 0
                    [Fertilise on fixed dates].Script.Amount = 0
                CompositeFactor 80N
                  Specifications:
                    [Fertilise at sowing].Script.Amount = 20
                    [Fertilise on fixed dates].Script.Amount = 30
              Memo
                Actual Full list
                [SowingRule].Script.CultivarName=43C80_CL,44Y26_RR,44Y87_CL,45Y86_CL,ATR_Stingray,ATR_Wahoo,AV_Garnet,CB_Tango,GT_Cobra,GT_Viper,Hyola404_RR,Hyola450_TT,Hyola50,Hyola559_TT,Hyola577_CL,Hyola600_RR,Hyola635_CL,Hyola750_TT,Hyola971_CL,NS_Diamond

                [SowingRule].Script.CultivarName=43C80_CL,ATR_Stingray,ATR_Wahoo,AV_Garnet,Hyola559_TT,Hyola600_RR,Hyola635_CL,Hyola750_TT,Hyola971_CL,NS_Diamond
          Simulation Merredin2014
            Clock: Start=2014-05-08; End=2014-12-31
            Summary summaryfile
            Weather: FileName=met/merredin.met
            SoilArbitrator
            Zone paddock: Area=1; Slope=0; AspectAngle=0; Altitude=50
              Plant canola: ResourceName=Canola
              MicroClimate: a_interception=0; b_interception=0; c_interception=0; d_interception=0; SoilHeatFluxFraction=0; MinimumHeightDiffForNewLayer=0; NightInterceptionFraction=0; ReferenceHeight=2
              SurfaceOrganicMatter SurfaceOM: InitialResidueName=wheat; InitialResidueType=wheat; InitialResidueMass=6000; InitialStandingFraction=0; InitialCPR=0; InitialCNR=80
              Fertiliser
              Report DailyReport: same as Validation.Growth Experiments.Kojonup.Kojonup2013.Kojonup2013Base.paddock.DailyReport
              Report HarvestReport: EventNames=[canola].Harvesting
                VariableNames:
                  [Clock].Today
                  [Canola].SowingDate
                  [Canola].SowingData.Cultivar
                  [Canola].Phenology.CurrentStageName
                  [Canola].Phenology.EmergenceDAS
                  [Canola].Phenology.FloralInitiationDAS
                  [Canola].Phenology.GreenBudDAS
                  [Canola].Phenology.StartFloweringDAS
                  [Canola].Phenology.CumulativeVernalTime
                  [Canola].Grain.Wt
              Report DailyBiomass: same as Validation.Growth Experiments.Kojonup.Kojonup2014.Kojonup2014.paddock.DailyBiomass
              Soil: ASCOrder=Chromosol; ASCSubOrder=Hypercalcic Yellow; SoilType=Loamy duplex; LocalName=Clays & shallow loamy duplexes; Site=C-R2; NearestTown=Merredin; Region=Central Region; State=Western Australia; Country=Australia; ApsoilNumber=1204; Latitude=-31.4897; Longitude=118.2144; LocationAccuracy=+/- 2000m; YearOfSampling=1993; DataSource=DAFWA  Jeff Russell
                Comments=Shallow loamy duplex - Heavy land red-brown soil (s6) Table 19 in Russell (2005) Major soils of the Eastern Wheatbelt to characterise soil moisture availablity. Department of Agriculture Western Australia. Resource Management Technical Report 187.
                Physical
                  Thickness  ParticleSizeSand  ParticleSizeSilt  ParticleSizeClay  BD    AirDry  LL15  DUL   SAT
                  100        57.1              14.6              28.3              1.6   0.03    0.06  0.12  0.39
                  100        37.4              16.7              46                1.7   0.03    0.09  0.14  0.35
                  100        37                19.7              43.3              1.8   0.05    0.1   0.16  0.31
                  100        36.1              18.3              45.6              1.82  0.05    0.11  0.16  0.3
                  100        37.1              18.7              44.2              1.9   0.05    0.14  0.2   0.28
                  100        37.3              16.5              46.1              1.9   0.08    0.14  0.22  0.28
                  100        37.9              14.5              47.6              1.9   0.08    0.15  0.22  0.28
                  100        39.4              14.2              46.5              1.9   0.08    0.15  0.23  0.28
                  200        44                12.1              43.8              1.9   0.11    0.17  0.24  0.28
                  200        41.4              10.7              47.9              1.9   0.11    0.19  0.25  0.28
                  200        37.3              10.1              52.6              1.9   0.11    0.19  0.25  0.28
                  BD source: Field measured and checked for sensibility
                  AirDry, LL15 source: Estimated based on local knowledge
                  DUL source: Field measured and checked for sensibility, Estimated based on local knowledge
                  SAT source: Calculated from measured, estimated or calculated BD
                  SoilCrop CanolaSoil
                    LL=[0.06, 0.09, 0.1, 0.11, 0.14, 0.14, 0.15, 0.15, 0.17, 0.19, 0.19]
                    KL=[0.06, 0.05, 0.03, 0.03, 0.03, 0.03, 0.02, 0.02, 0.02, 0.01, 0.01]
                    XF=[0.1, 0.1, 0.1, 0.3, 0.3, 0.3, 0.3, 0.3, 0.3, 0.3, 0.3]
                WaterBalance SoilWater: SummerDate=1-Nov; SummerU=6; SummerCona=3.5; WinterDate=1-Apr; WinterU=2; WinterCona=2; DiffusConst=40; DiffusSlope=16; Salb=0.13; CN2Bare=73; CNRed=20; CNCov=0.8; PSIDul=-100; Thickness=[100, 100, 100, 100, 100, 100, 100, 100, 200, 200, 200]; SWCON=[0.5, 0.5, 0.5, 0.5, 0.5, 0.5, 0.5, 0.5, 0.5, 0.5, 0.5]
                Organic: FOMCNRatio=40; CarbonUnits=Total
                  Thickness  Carbon  SoilCNRatio  FBiom  FInert  FOM
                  100        1.12    12           0.035  0.4     219.6571
                  100        0.5     12           0.02   0.5     177.2891
                  100        0.1     12           0.02   0.7     143.0932
                  100        0.1     12           0.015  0.7     115.4931
                  100        0.1     12           0.015  0.95    93.2165
                  100        0.1     12           0.015  0.95    75.2367
                  100        0.1     12           0.015  0.95    60.7249
                  100        0.1     12           0.01   0.95    49.0121
                  200        0.1     12           0.01   0.95    31.9284
                  200        0.01    12           0.01   0.95    20.7994
                  200        0.01    12           0.01   0.95    13.5495
                Chemical: Thickness=[100, 100, 100, 100, 100, 100, 100, 100, 200, 200, 200]; PH=[5.5, 5.6, 5.6, 6.2, 6.2, 6.5, 6.8, 7, 7.2, 7.2, 7.4]; PHUnits=Water
                  PH source: Measured
                Water: Thickness=[100, 100, 200, 200, 200, 200]; InitialValues=[0.143, 0.136, 0.152, 0.164, 0.176, 0.139]; FilledFromTop=false
                Nutrient
                Solute NO3: Thickness=[100, 100, 100, 100, 100, 100, 100, 100, 200, 200, 200]; InitialValues=[20, 15, 10, 5, 1, 1, 1, 1, 1, 1, 1]; InitialValuesUnits=ppm; WaterTableConcentration=0; D0=0; DepthConstant=0; MaxDepthSoluteAccessible=0; RunoffEffectivenessAtMovingSolute=0; MaxEffectiveRunoff=0
                Solute NH4: Thickness=[100, 100, 100, 100, 100, 100, 100, 100, 200, 200, 200]; InitialValues=[0.5, 0.5, 0.5, 0.5, 0.5, 0.5, 0.5, 0.5, 0.5, 0.5, 0.5]; InitialValuesUnits=ppm; WaterTableConcentration=0; D0=0; DepthConstant=0; MaxDepthSoluteAccessible=0; RunoffEffectivenessAtMovingSolute=0; MaxEffectiveRunoff=0
                Solute Urea: Thickness=[100, 100, 100, 100, 100, 100, 100, 100, 200, 200, 200]; InitialValues=[0, 0, 0, 0, 0, 0, 0, 0, 0, 0, 0]; InitialValuesUnits=kg/ha; WaterTableConcentration=0; D0=0; DepthConstant=0; MaxDepthSoluteAccessible=0; RunoffEffectivenessAtMovingSolute=0; MaxEffectiveRunoff=0
                SoilTemperature Temperature
              Manager Reset on date
                ResetDate = 8-May
                ResetWater = Yes
                ResetN = Yes
                ResetSOM = No
                script: same as in Validation.Growth Experiments.Kojonup.Kojonup2014.Kojonup2014.paddock.Reset on date
              Manager Fertilise at sowing: same as Validation.Growth Experiments.Kojonup.Kojonup2013.Kojonup2013Base.paddock.Fertilise at sowing
              Manager SowingRule
                SowDate = 12-May
                CultivarName = Hyola600_RR
                SowingDepth = 20
                RowSpacing = 250
                Population = 71
                script: same as in Validation.Growth Experiments.Kojonup.Kojonup2013.Kojonup2013Base.paddock.SowingRule
              Manager Fertilise on fixed dates: same as Validation.Growth Experiments.Cunderdin.Cunderdin2013.Cunderdin2013.paddock.Fertilise on fixed dates
              Manager HarvestAfterDate
                HarvestDate = 22-Oct
                script: same as in Validation.Growth Experiments.Kojonup.Kojonup2013.Kojonup2013Base.paddock.HarvestAfterDate
              Report SowingReport: EventNames=[Canola].Sowing
                VariableNames:
                  [Clock].Today
                  [Canola].SowingData.Cultivar
                  [IWeather].Latitude
                  [IWeather].Longitude
  Folder Sensibility
    Experiment DetailedDynamics
      Memo
        This test demonstrates the detailed dynamics within a simple simulation of conola growth and resource use.  This includes:

        * Dry matter and Nitrogen supply and demand for individual organs
        * Dry matter and Nitrogen content for live and dead components of each organ
        * Light interception for live and dead components for each organ
      Factors
        Permutation
          Factor Cv: Specification=[SowingRule].Script.CultivarName=Hyola575_CL
      Simulation DetailedDynamicsBase
        Clock: Start=2013-02-19; End=2013-12-31
        Summary summaryfile
        Weather: FileName=met/greenethorpe_min_adjusted_LT_new1.met
        SoilArbitrator
        MicroClimate: a_interception=0; b_interception=1; c_interception=0; d_interception=0; SoilHeatFluxFraction=0.4; MinimumHeightDiffForNewLayer=0; NightInterceptionFraction=0.5; ReferenceHeight=2
        Zone Paddock: Area=1; Slope=0; AspectAngle=0; Altitude=50
          Irrigation
          Fertiliser
          SurfaceOrganicMatter: InitialResidueName=wheat_stubble; InitialResidueType=wheat; InitialResidueMass=1000; InitialStandingFraction=0; InitialCPR=0; InitialCNR=80
          Plant Canola
          Manager: same as Validation.Phenology Experiments.OCP Phenology.Gatton2015.Gatton2015Base.Paddock.manager
          Manager Harvesting: same as Validation.Phenology Experiments.OCP Phenology.Gatton2015.Gatton2015Base.Paddock.Harvesting
          Manager SowingRule: same as Validation.Growth Experiments.Greenthorpe.Greenethorpe2013_Ex3.Greenethorpe2013Base.Paddock.SowingRule
          Manager Fertilise at sowing: same as Validation.Growth Experiments.Greenthorpe.Greenethorpe2013_Ex1.Greenethorpe2013_Ex1.Paddock.Fertilise at sowing
          Soil: SoilType=Greenethorpe; Site=Front paddock; NearestTown=Young; Region=Southern NSW; State=NSW; Latitude=0; Longitude=0; YearOfSampling=0; DataSource=Kirkegaard/Lilley
            Chemical: same as Validation.Growth Experiments.Wagga.Wagga2008.WaggaWagga2008.Paddock.Soil.Chemical
            Water: same as Validation.Growth Experiments.Greenthorpe.Greenethorpe2013_Ex1.Greenethorpe2013_Ex1.Paddock.Soil.Water
            Physical: same as Validation.Growth Experiments.Greenthorpe.Greenethorpe2013_Ex1.Greenethorpe2013_Ex1.Paddock.Soil.Physical
            WaterBalance SoilWater: same as Validation.Growth Experiments.Wagga.Wagga2008.WaggaWagga2008.Paddock.Soil.SoilWater
            Organic: same as Validation.Growth Experiments.Wagga.Wagga2008.WaggaWagga2008.Paddock.Soil.Organic
            Nutrient
            Solute NO3: same as Validation.Growth Experiments.Wagga.Wagga2008.WaggaWagga2008.Paddock.Soil.NO3
            Solute NH4: same as Validation.Growth Experiments.Wagga.Wagga2008.WaggaWagga2008.Paddock.Soil.NH4
            Solute Urea: same as Validation.Growth Experiments.Wagga.Wagga2008.WaggaWagga2008.Paddock.Soil.Urea
            SoilTemperature Temperature
          Manager Fertilise on fixed dates: same as Validation.Growth Experiments.Greenthorpe.Greenethorpe2013_Ex1.Greenethorpe2013_Ex1.Paddock.Fertilise on fixed dates
          Manager Fertilise on fixed dates1: same as Validation.Growth Experiments.Greenthorpe.Greenethorpe2013_Ex2.Greenethorpe2013_Ex2.Paddock.Fertilise on fixed dates1
          Report DailyReport: same as Validation.Growth Experiments.Greenthorpe.Greenethorpe2013_Ex2.Greenethorpe2013_Ex2.Paddock.DailyReport
          Report HarvestReport: same as Validation.Growth Experiments.Greenthorpe.Greenethorpe2013_Ex2.Greenethorpe2013_Ex2.Paddock.HarvestReport
          Report DetailedReport: EventNames=[Clock].DoReport
            VariableNames:
              [Clock].Today
              [Canola].Phenology.CurrentStageName
              [Canola].Leaf.Wt
              [Canola].Leaf.N
              [Canola].Leaf.Total.StructuralWt
              [Canola].Leaf.Total.StructuralN
              [Canola].Leaf.Live.StructuralWt
              [Canola].Leaf.Live.StructuralN
              [Canola].Leaf.Live.Wt
              [Canola].Leaf.Live.StructuralWt
              [Canola].Leaf.Live.N
              [Canola].Leaf.Live.NConc
              [Canola].Leaf.NConc
              [Canola].Leaf.MinimumNConc
              [Canola].Leaf.CriticalNConc
              [Canola].Leaf.MaximumNConc
              [Canola].Leaf.Senesced.Wt
              [Canola].Leaf.LAI
              [Canola].Leaf.DMSupply.Fixation
              [Canola].Leaf.Transpiration
              [Canola].Stem.Wt
              [Canola].Stem.Live.Wt
              [Canola].Stem.Live.N
              [Canola].Stem.Total.StructuralWt
              [Canola].Stem.Total.StructuralN
              [Canola].Stem.Live.StructuralWt
              [Canola].Stem.Live.StructuralN
              [Canola].Stem.N
              [Canola].Stem.NConc
              [Canola].Stem.MinimumNConc
              [Canola].Stem.CriticalNConc
              [Canola].Stem.MaximumNConc
              [Canola].Shell.Wt
              [Canola].Shell.N
              [Canola].Shell.Total.StructuralWt
              [Canola].Shell.Total.StructuralN
              [Canola].Shell.Live.Wt
              [Canola].Shell.Live.N
              [Canola].Shell.Live.StructuralWt
              [Canola].Shell.Live.StructuralN
              [Canola].Shell.NConc
              [Canola].Shell.MinimumNConc
              [Canola].Shell.CriticalNConc
              [Canola].Shell.MaximumNConc
              [Canola].Shell.Area.Index
              [Canola].Shell.DMSupply.Fixation
              [Canola].Shell.EnergyBalance.Transpiration
              [Canola].Grain.Wt
              [Canola].Grain.N
              [Canola].Grain.NConc
              [Canola].Shell.Wt
              [Canola].Pod.Wt
              [Canola].Pod.N
              [Canola].Pod.NConc
              [Canola].Arbitrator.DM.TotalFixationSupply
              sum([Canola].Arbitrator.N.Fixation) as NFixed
              [Canola].Arbitrator.DM.TotalPlantDemand
              [Canola].Leaf.DMDemand.Total
              [Canola].Stem.DMDemand.Total
              [Canola].Shell.DMDemand.Total
              [Canola].Grain.DMDemand.Total
              [Canola].Root.DMDemand.Total
              [Canola].Shell.EnergyBalance.CoverTotal
              [Canola].Leaf.CoverTotal
              [Canola].CoverTotal
          Report SowingReport: EventNames=[Canola].Sowing
            VariableNames:
              [Clock].Today
              [Canola].SowingData.Cultivar
              [IWeather].Latitude
              [IWeather].Longitude
      Folder Leaf
        Memo
          These graphs demonstrate the development of live and dead leaf biomass over time, and the accumulation and retranslocation of N in the structural and non-structural pools as the plant develops.
      Folder Shell
        Memo
          These graphs demonstrate the development of live and dead shell biomass over time, and the accumulation and retranslocation of N in the structural and non-structural pools as the plant develops.
      Folder Stem
        Memo
          These graphs demonstrate the development of live and dead stem biomass over time, and the accumulation and retranslocation of N in the structural and non-structural pools as the plant develops.
      Folder Canopy
        Memo
          These graphs demonstrate the changing roles of leaf and pod in light interception, photosynthesis and transpiration over time
    Experiment CanolaGrazing
      Memo
        This sensibility test performs a livestock grazing simulation for canola planted in March, and grazed in late May as a dual-purpose crop.
      Factors
        Permutation
          Factor StockingRate: Specification=[GrazeForageCrop].Script.StockingRate = 0,50,100
      Simulation CanolaGrazingBase
        Clock: Start=2008-03-01; End=2008-12-31
        Summary SummaryFile
        Weather: FileName=met/wagga_-35.05_147.30.met
        SoilArbitrator Soil Arbitrator
        Stock: RandSeed=9999
        Forages
          Parameters:
            Name                          LiveDigestibility  DeadDigestibility  LiveFractionConsumable  DeadFractionConsumable  LiveMinimumBiomass  DeadMinimumBiomass
            SurfaceOrganicMatter.Residue  0                  0                  0                       0                       0                   0
            Canola.Root                   .7                 .3                 0                       0                       0                   0
            Canola.Leaf                   .7                 .3                 1                       1                       0                   0
            Canola.Grain                  0.7                0.3                0                       0                       0                   0
            Canola.Stem                   0.7                0.3                1                       1                       0                   0
            Canola.Shell                  0.7                0.3                0                       0                       0                   0
            SurfaceOrganicMatter.Residue  0.7                0.3                1                       1                       100                 0
            Canola.Root                   0.7                0.3                1                       1                       100                 0
            Canola.Leaf                   0.7                0.3                1                       1                       100                 0
            Canola.Grain                  0.7                0.3                1                       1                       100                 0
            Canola.Stem                   0.7                0.3                1                       1                       100                 0
            Canola.Shell                  0.7                0.3                1                       1                       100                 0
            SurfaceOrganicMatter.Residue  0.7                0.3                1                       1                       100                 0
            Canola.Root                   0.7                0.3                1                       1                       100                 0
            Canola.Leaf                   0.7                0.3                1                       1                       100                 0
            Canola.Grain                  0.7                0.3                1                       1                       100                 0
            Canola.Stem                   0.7                0.3                1                       1                       100                 0
            Canola.Shell                  0.7                0.3                1                       1                       100                 0
            SurfaceOrganicMatter.Residue  0.7                0.3                1                       1                       100                 0
            Canola.Root                   0.7                0.3                1                       1                       100                 0
            Canola.Leaf                   0.7                0.3                1                       1                       100                 0
            Canola.Grain                  0.7                0.3                1                       1                       100                 0
            Canola.Stem                   0.7                0.3                1                       1                       100                 0
            Canola.Shell                  0.7                0.3                1                       1                       100                 0
            SurfaceOrganicMatter.Residue  0.7                0.3                1                       1                       100                 0
            Canola.Root                   0.7                0.3                1                       1                       100                 0
            Canola.Leaf                   0.7                0.3                1                       1                       100                 0
            Canola.Grain                  0.7                0.3                1                       1                       100                 0
            Canola.Stem                   0.7                0.3                1                       1                       100                 0
            Canola.Shell                  0.7                0.3                1                       1                       100                 0
        Supplement: SpoilageTime=0
          Stores:
            {Name=fodder, Stored=0, IsRoughage=true, DMContent=0.85, DMD=0, MEContent=0, CPConc=0, ProtDg=0, PConc=0, SConc=0, EEConc=0, ADIP2CP=0, AshAlk=0, MaxPassage=0}
        Manager GrazeForageCrop
          Genotype = Large Merino
          Sex = Male
          Age = 12
          Weight = 100
          Pregnant = 0
          Lactating = 0
          YoungNumber = 0
          YoungWt = 0
          StockingRate = 20
          CurrentLocation = Away
          PreGrazingDM = 1000
          PostGrazingDM = 500
          MinGrazingDays = 0
          DoNoGrazingWindow = True
          NoGrazeStart = 1-jun
          NoGrazeEnd = 20-may
          SupplementName =
          SupplementFirst = False
          SupplementEveryDay = 0
          SupplementOnPastureMass = 0
          TriggerPastureMass = 2100
```csharp
using Models.PMF.Interfaces;
using System.Diagnostics;
using Models.AgPasture;
using System.Linq;
using System.Collections.Generic;
using System.Collections;
using Models.Soils;
using Models.PMF;
using System.Xml.Serialization;
using APSIM.Shared.Utilities;
using Models.GrazPlan;
using Models.Utilities;
using Models.Core;
using Models;
using Models.ForageDigestibility;
using System;

namespace Models
{

    [Serializable]
    public class Script : Model
    {
        [Link] Clock clock;
        [Link] Stock stock;
        [Link] Supplement supplement;
        [Link] List<Zone> paddocks;
        [Link] ISummary summary;
        [Link] Simulation farm;
        [Link] Forages forages;

        private int CurrentGroupNum = 1;    // animal group number
        private int CurrentLocationNum { get; set; }

        [Separator("Stock type info, the same type of stock are brought onto the paddock at each grazing")]

        [Description("Stock: genotype (e.g. Small Merino, Angus, Friesian):")] 
        [Display(Values="GetGenotypes")]
        public string Genotype { get; set; }

        [Description("Stock: sex (Female, Male, Castrate):")] 
        public ReproductiveType Sex { get; set; }

        [Description("Stock: age (months):")] 
        public double Age { get; set; }

        [Description("Stock: weight (kg liveweight /head):")] 
        public double Weight { get; set; }

        [Description("Stock: fertility status (0 if non-pregnant or days since conception):")] 
        public int Pregnant { get; set; }

        [Description("Stock: lactation status (0 if non-lactating or days since parturition):")]
        public int Lactating { get; set; }

        [Description("Stock: number of unweaned young:")]
        public int YoungNumber { get; set; }

        [Description("Stock: weight of unweaned young:")] 
        public double YoungWt { get; set; }

        [Separator("Grazing event information")]

        [Description("Paddock stocking rate (head/ha): ")] 
        public double StockingRate { get; set; }

        [Description("Initial location of the cows (give either the paddock name or 'Away'): ")] 
        public string CurrentLocation { get; set; }

        [Description("Standing biomass at which to bring the stock into the simulation (kg DM/ha): ")] 
        public double PreGrazingDM { get; set; }

        [Description("Standing biomass at which to exit  stock from the simulation (kg DM/ha): ")] 
        public double PostGrazingDM { get; set; }

        [Description("Don't move the stock onto the crop unless there is approx. X days of grazable forage available: ")] 
        public int MinGrazingDays { get; set; }

        [Description("Implement a no-grazing window? (tick for yes): ")] 
        public bool DoNoGrazingWindow { get; set; }

        [Description("Start of the no-grazing window (dd-MMM)")] 
        public string NoGrazeStart { get; set; }

        [Description("End of the no-grazing window (dd-MMM)")] 
        public string NoGrazeEnd { get; set; }

        [Separator("Supplementary feeding")]

        [Description("Name of the supplement to feed: ")] 
        public string SupplementName { get; set; }

        [Description("Feed the supplement first (i.e. before the new forage is available to the stock)?: ")] 
        public bool SupplementFirst { get; set; }

        [Description("Amount of supplementary feeding offered every day (kg DM /head /day): ")] 
        public double SupplementEveryDay { get; set; }

        [Description("Additional amount of supplement offered when available biomass is low (kg DM /head /day): ")] 
        public double SupplementOnPastureMass { get; set; }

        [Description("Trigger biomass for above rule (kg DM /ha): ")] 
        public double TriggerPastureMass { get; set; }

        public int NumStock { get; set; }
        public bool GrazingSeasonIsOpen { get; set; } // number of cows on the whole farm
        public double HarvestableBiomass { get; set; }

        // Return a list of genotypes to the properties tab.
        public string[] GetGenotypes()
        {
            if (stock != null)
                return stock.Genotypes.Names.ToArray();
            return null;
        }

        [EventSubscribe("StartOfSimulation")]
        private void OnStartOfSimulation(object sender, EventArgs e)
        {

            //Debugger.Break();

            summary.WriteMessage(this, "Initialising the paddock information", MessageType.Diagnostic);

            NumStock = (int)(Math.Round(StockingRate * farm.Area, 0));

            if ((CurrentLocation.ToLower() != "away") && (NumStock > 0))
            {
                BuyStock();
                stock.Move(CurrentLocation);
                summary.WriteMessage(this, " The Stock have been moved to " + CurrentLocation, MessageType.Diagnostic);
            }

            summary.WriteMessage(this, "     The number of animals has been rounded to " + NumStock + " from " + (StockingRate * farm.Area), MessageType.Diagnostic);
            summary.WriteMessage(this, "     The animals will begin in " + CurrentLocation + " which is paddock number " + CurrentLocationNum + " in the simulation", MessageType.Diagnostic);
            summary.WriteMessage(this, "     The area of the whole farm is " + farm.Area + " ha", MessageType.Diagnostic);

        }

        [EventSubscribe("DoManagement")]
        private void OnDoManagement(object sender, EventArgs e)
        {
            GrazingSeasonIsOpen = true;
            if (DoNoGrazingWindow)
                GrazingSeasonIsOpen = !DateUtilities.WithinDates(NoGrazeStart, clock.Today, NoGrazeEnd);

            bool sellSomeStock = false;
            if (!GrazingSeasonIsOpen)
                sellSomeStock = true;

            // Calculate forage mass in the paddock
            HarvestableBiomass = 0.0;
            foreach (var forage in forages.ModelsWithDigestibleBiomass)
                foreach (var forageMaterial in forage.Material)
                    HarvestableBiomass += forageMaterial.Consumable.Wt;
            HarvestableBiomass *= 10;  // Convert to kg/ha

            if (HarvestableBiomass <= PostGrazingDM)
                sellSomeStock = true;

            if (CurrentLocation == "Away")
                sellSomeStock = false;

            double minFodder = 0.03 * MinGrazingDays * NumStock * Weight; // The 0.03 is the propostion of body mass that the stock might eat
            if (CurrentLocation == "Away" && NumStock > 0 && (HarvestableBiomass >= PreGrazingDM) && HarvestableBiomass >= (PostGrazingDM + minFodder) && GrazingSeasonIsOpen)
            {
                CurrentLocation = paddocks[0].Name;
                CurrentLocationNum = paddocks[0].Index;
                BuyStock();
                stock.Move(CurrentLocation);
                summary.WriteMessage(this, "     Buying stock ", MessageType.Diagnostic);
            }

            if (sellSomeStock)
            {
                CurrentLocation = "Away";
                CurrentLocationNum = -1;
                SellStock();
                summary.WriteMessage(this, "     Selling stock ", MessageType.Diagnostic);
            }

            if (CurrentLocation != "Away")
            {
                if (SupplementEveryDay > 0)
                {
                    double silageOnHand = supplement.Stores[2 - 1].Stored;
                    if (silageOnHand < SupplementEveryDay * stock.NumberAll)
                    {
                        supplement.Buy(SupplementEveryDay * 30.0 * stock.NumberAll, SupplementName);  // i.e. 1 months worth
                        summary.WriteMessage(this, "SupplementEveryDay: Buying " + SupplementName + " of total amount : " + (SupplementEveryDay * 90 * stock.NumberAll) + " kg DM", MessageType.Diagnostic);
                    }
                    supplement.Feed(SupplementName, SupplementEveryDay * stock.NumberAll, CurrentLocation, SupplementFirst);
                }

                if (SupplementOnPastureMass > 0 && HarvestableBiomass <= TriggerPastureMass)
                {
                    double silageOnHand = supplement.Stores[2 - 1].Stored;
                    if (silageOnHand < SupplementOnPastureMass * stock.NumberAll)
                    {
                        supplement.Buy(SupplementOnPastureMass * 30.0 * stock.NumberAll, SupplementName);  // i.e. 1 months worth
                        summary.WriteMessage(this, "SupplementOnBiomass: Buying " + SupplementName + " of total amount : " + (SupplementOnPastureMass * 90 * stock.NumberAll) + " kg DM", MessageType.Diagnostic);
                    }
                    supplement.Feed(SupplementName, SupplementOnPastureMass * stock.NumberAll, CurrentLocation, SupplementFirst);
                }
            }
        }


        public void BuyStock()
        {
            CurrentGroupNum = stock.NoGroups + 1;
            StockBuy purchase = new StockBuy();
            purchase.Genotype = Genotype;
            purchase.Number = NumStock;
            purchase.Sex = Sex;
            purchase.Age = Age;       // age in months
            purchase.Weight = Weight;  // live weight in kg
            purchase.UseTag = CurrentGroupNum + 1;
            purchase.MatedTo = purchase.Genotype;
            purchase.Pregnant = Pregnant;  // days pregnant, 0 = non pregnant, 1 = pregnant
            purchase.Lactating = Lactating;  // 0 for dry, 1 for lactating
            purchase.NumYoung = YoungNumber;
            purchase.YoungWt = YoungWt;

            stock.Buy(purchase);
        }

        public void SellStock()
        {
            int NumGroups = stock.NoGroups;

            NumGroups = stock.NoGroups;
            for (int gg = 1; gg <= NumGroups; gg++)
            {
                stock.Sell(stock.Number[gg - 1]);
            }
        }
    }
}
```
        MicroClimate: a_interception=0; b_interception=0; c_interception=0; d_interception=0; SoilHeatFluxFraction=0.4; MinimumHeightDiffForNewLayer=0; NightInterceptionFraction=0.5; ReferenceHeight=2
        Zone: Area=1; Slope=0; AspectAngle=0; Altitude=50
          Soil: same as Validation.Growth Experiments.Wagga.Wagga2008.WaggaWagga2008.Paddock.Soil
          Report GrazingReport: EventNames=[Clock].DoReport
            VariableNames:
              [Clock].Today as Date
              [Stock].Paddock
              [Stock].NumberAll
              [Stock].WeightAll
              [Stock].IntakeAll.Weight
              [Canola].AboveGround.Wt
              [Canola].AboveGroundLive.Wt
              [Canola].Grain.Wt
              [Canola].Leaf.LAI
              [Canola].Leaf.Wt
              [Canola].Stem.Wt
              [SurfaceOrganicMatter].Wt
              [Canola].Leaf.Removed.StructuralWt
          Fertiliser
          SurfaceOrganicMatter: InitialResidueName=maize_stubble; InitialResidueType=maize; InitialResidueMass=0; InitialStandingFraction=0; InitialCPR=400; InitialCNR=60
          Plant Canola
          Manager SowingRule
            SowDate = 15-Mar
            CultivarName = Hyola971_CL
            SowingDepth = 25
            RowSpacing = 180
            Population = 45
            script: same as in Validation.Phenology Experiments.OCP Phenology.Gatton2015.Gatton2015Base.Paddock.SowingRule
          Manager Fertilise at sowing: same as Validation.Growth Experiments.Wagga.Wagga2008.WaggaWagga2008.Paddock.Fertilise at sowing
          Manager HarvestAfterDate: same as Validation.Growth Experiments.Wagga.Wagga2008.WaggaWagga2008.Paddock.HarvestAfterDate
    Experiment Wagga
      Memo
        This test demonstrates the effect of time of sowing and cultivar (generic early, late or winter cultivars) on yield, biomass and time to harvest for long term simulations at Wagga Wagga, NSW.
      Factors
        Permutation
          Factor Cv
            Specification=[SowingRule].Script.CultivarName=GenericEarly, GenericLate, GenericWinter
          Factor TOS: Specification=[SowingRule].Script.SowDate = 15-Mar, 15-May
      Simulation WaggaBase
        Clock: Start=1900-01-01; End=2021-12-31
        Summary summaryfile
        Weather: FileName=met/wagga_73127.met
        SoilArbitrator
        MicroClimate: a_interception=0; b_interception=1; c_interception=0; d_interception=0; SoilHeatFluxFraction=0.4; MinimumHeightDiffForNewLayer=0; NightInterceptionFraction=0.5; ReferenceHeight=2
        Zone Paddock: Area=1; Slope=0; AspectAngle=0; Altitude=50
          Irrigation
          Fertiliser
          SurfaceOrganicMatter: InitialResidueName=wheat_stubble; InitialResidueType=wheat; InitialResidueMass=1000; InitialStandingFraction=0; InitialCPR=0; InitialCNR=80
          Plant Canola
          Manager Reset on date
            ResetDate = 1-Mar
            ResetWater = Yes
            ResetNutrients = Yes
            ResetSOM = Yes
```csharp
using Models.Soils.Nutrients;
using APSIM.Shared.Utilities;
using Models.Surface;
using Models.Utilities;
using Models.Soils.Nutrients;
using Models.Soils;
using Models.PMF;
using Models.Core;
using System;
using Models.Interfaces;

namespace Models
{
    [Serializable]
    public class Script : Model
    {
        [Link] private Clock Clock;
        [Link] private Plant Wheat;
        [Link] private ISoilWater SoilWater;
        [Link] private Nutrient nutrient;
        [Link] private SurfaceOrganicMatter SOM;
        [Link] private Summary Summary;

        [Description("Date to reset on:")]
        public string ResetDate {get;set;}

        [Description("Reset Water? (Yes or No)")]
        public string ResetWater {get;set;}

        [Description("Reset Soil Nutrients ? (Yes or No)")]
        public string ResetNutrients {get;set;}

        [Description("Reset Surface Organic Matter? (Yes or No)")]
        public string ResetSOM {get;set;}

        [EventSubscribe("DoManagement")]
        private void OnDoManagement(object sender, EventArgs e)
        {
            if (DateUtilities.WithinDates(ResetDate, Clock.Today, ResetDate))
            {
                if (ResetWater == "Yes")
                {
                    Summary.WriteMessage(this, "Reset Water", MessageType.Diagnostic);
                    SoilWater.Reset();
                }
                if (ResetNutrients == "Yes")
                {
                    Summary.WriteMessage(this, "Reset Nitrogen", MessageType.Diagnostic);
                    nutrient.Reset();
                }
                if (ResetSOM == "Yes")
                {
                    Summary.WriteMessage(this, "Reset Surface OM", MessageType.Diagnostic);
                    SOM.Reset();
                }
            }
        }
    }
}
```
          Manager SowingRule
            Crop = [Canola]
            SowDate = 15-May
            CultivarName = GenericEarly
            SowingDepth = 30
            RowSpacing = 180
            Population = 46
```csharp
using APSIM.Shared.Utilities;
using Models.Utilities;
using Models.Soils;
using Models.PMF;
using Models.Core;
using System;

namespace Models
{
    [Serializable]
    public class Script : Model
    {
        [Link] Clock Clock;
        [Link] Fertiliser Fertiliser;
        [Link] Summary Summary;
        [Link] Soil Soil;
        
        [Description("Crop")]
        public IPlant Crop { get; set; }

        [Description("Sowing date (d-mmm)")]
        public string SowDate { get; set; }

        [Display(Type = DisplayType.CultivarName)]
        [Description("Cultivar to be sown")]
        public string CultivarName { get; set; }

        [Description("Sowing depth (mm)")]
        public double SowingDepth { get; set; }

        [Description("Row spacing (mm)")]
        public double RowSpacing { get; set; }

        [Description("Plant population (/m2)")]
        public double Population { get; set; }

        [EventSubscribe("DoManagement")]
        private void OnDoManagement(object sender, EventArgs e)
        {
            if (DateUtilities.WithinDates(SowDate, Clock.Today, SowDate))
            {
                Crop.Sow(population: Population, cultivar: CultivarName, depth: SowingDepth, rowSpacing: RowSpacing);    
            }
        }
    }
}
```
          Manager Fertilise at sowing
            Crop = [Canola]
            FertiliserType = NO3N
            Amount = 150
            script: same as in Validation.Growth Experiments.Wagga.Wagga2008.WaggaWagga2008.Paddock.Fertilise at sowing
          Manager Fertilise on fixed dates
            FertiliserType = NO3N
            FertiliserDates = 1-jul, 1-sep
            Amount = 100
            AmountType = False
            script: same as in Validation.Growth Experiments.Kojonup.Kojonup2013.Kojonup2013Base.paddock.Fertilise on fixed dates
          Manager HarvestingRule
            Crop = [Canola]
```csharp
using APSIM.Shared.Utilities;
using Models.Utilities;
using Models.Soils;
using Models.PMF;
using Models.Core;
using System;

namespace Models
{
    [Serializable] 
    public class Script : Model
    {
        [Description("Crop")]
        public IPlant Crop { get; set; }
        
        [EventSubscribe("DoManagement")]
        private void OnDoManagement(object sender, EventArgs e)
        {
            if (Crop.IsReadyForHarvesting)
            {
                Crop.Harvest();
                Crop.EndCrop();
            }
        }
    }
}
```
          Soil: SoilType=Greenethorpe; Site=Front paddock; NearestTown=Young; Region=Southern NSW; State=NSW; Latitude=0; Longitude=0; YearOfSampling=0; DataSource=Kirkegaard/Lilley
            Chemical: same as Validation.Growth Experiments.Wagga.Wagga2008.WaggaWagga2008.Paddock.Soil.Chemical
            Water: same as Validation.Growth Experiments.Greenthorpe.Greenethorpe2013_Ex1.Greenethorpe2013_Ex1.Paddock.Soil.Water
            Physical: same as Validation.Growth Experiments.Greenthorpe.Greenethorpe2013_Ex1.Greenethorpe2013_Ex1.Paddock.Soil.Physical
            WaterBalance SoilWater: same as Validation.Growth Experiments.Wagga.Wagga2008.WaggaWagga2008.Paddock.Soil.SoilWater
            Organic: same as Validation.Growth Experiments.Wagga.Wagga2008.WaggaWagga2008.Paddock.Soil.Organic
            Nutrient
            Solute NO3: InitialValuesUnits=ppm; WaterTableConcentration=0; D0=0; DepthConstant=0; MaxDepthSoluteAccessible=0; RunoffEffectivenessAtMovingSolute=0; MaxEffectiveRunoff=0
              Thickness=[100, 100, 100, 100, 100, 100, 100, 100, 100, 100, 100, 100, 100, 100, 100, 100, 100, 100, 100, 100]
              InitialValues=[40, 15, 2.8, 2.8, 1.32, 1.32, 0.9, 0.9, 0.58, 0.58, 0.46, 0.46, 0.47, 0.47, 0.56, 0.56, 0.79, 0.79, 0.95, 0.95]
            Solute NH4: same as Validation.Growth Experiments.Wagga.Wagga2008.WaggaWagga2008.Paddock.Soil.NH4
            Solute Urea: same as Validation.Growth Experiments.Wagga.Wagga2008.WaggaWagga2008.Paddock.Soil.Urea
            SoilTemperature Temperature
          Report WaggaHarvestReport: EventNames=[Canola].Harvesting
            VariableNames:
              [Clock].Today
              [Canola].AboveGround.Wt
              [Canola].Grain.Wt
              [Canola].Phenology.StartFloweringDAS
              [Canola].Phenology.MaturityDAS
          Manager AutomaticIrrigation
            allowIrrigation = False
            seasonStart = 1-sep
            seasonEnd = 30-nov
            seasonsAllocation = 10000
            triggerDeficit = 50
            targetDeficit = 95
            returndays = 3
            maximumAmount = 30
            depthPAWC = 650
```csharp
using Newtonsoft.Json;
using APSIM.Shared.Utilities;
using System.Xml.Serialization;
using Models.Soils;
using Models.PMF;
using Models.Core;
using System;
using Models.Interfaces;



        
namespace Models
{
    [Serializable] 
    [System.Xml.Serialization.XmlInclude(typeof(Model))]
    public class Script : Model
    {
        [Link] private ISummary summary;
        [Link] private Irrigation Irrigation;
        [Link] private Clock Clock;
        [Link] private Soil Soil;
        [Link(IsOptional = true)] private IPlant existingCrop;
        private DateTime StartDate;
        private DateTime EndDate;
        private double TopDUL;
        private double TopLL;
        private int nLayers;
        [Link]
        private IPhysical soilPhysical;
        [Link]
        private ISoilWater waterBalance;
        //Communication to other modules
       
        //User inputs from properties tab
        [Description("Turn irrigation on?")]
        public bool allowIrrigation { get; set; }
        [Description("Start of irrigation season (dd-MMM)")]
        public string seasonStart { get; set; }
        [Description("End of irrigation season (dd-MMM)")]
        public string seasonEnd { get; set; }
        [Description("Season allocation (mm)")]
        public double seasonsAllocation { get; set; }
        [Description("Deficit to trigger irrigation (% PAWC)")]
        public double triggerDeficit { get; set; }
        [Description("Deficit to stop irrigaton (% PAWC)")]
        public double targetDeficit { get; set; }
        [Description("Minimum days for irrigation to return")]
        public double returndays { get; set; }
        [Description("Maximum irrigation application (mm/day)")]
        public double maximumAmount { get; set; }
        [Description("Depth to calculate PAWC (mm)")]
        public double depthPAWC { get; set; }

        //Class members
        [JsonIgnore] public double TopSWdeficit { get; set; }
        [JsonIgnore] public double TopSWC { get; set; }
        [JsonIgnore] public double DaysSinceIrrigation { get; set; }
        [JsonIgnore] public double AmountToApply { get; set; }
        [JsonIgnore] public double SeasonAppliedAmount { get; set; }
        
        private bool IrrigationIsAllowed { get; set; }
        private bool SeasonIsOpen { get; set; }
        private bool CropIsActive { get; set; }
        private bool IrrigatorIsAvailable { get; set; }
        private bool SoilIsDry { get; set; }

    
        //Calculate static soil variables
        [EventSubscribe("StartOfSimulation")]
        private void OnStartOfSimulation(object sender, EventArgs e)
        {   
            //Set the season dates
            StartDate = DateTime.Parse(seasonStart + "-" + Clock.Today.Year.ToString());
            EndDate = DateTime.Parse(seasonEnd + "-" + Clock.Today.Year.ToString());
            
            //Can we irrigate at all?
            IrrigationIsAllowed = false; 
            if (allowIrrigation)
                IrrigationIsAllowed = true; 

            //Calculate soil water variables
            double depthFromSurface = 0.0;
            double fracLayer = 0.0;
            nLayers = soilPhysical.Thickness.Length;
            for (int layer = 0; layer < nLayers; layer++)
            {
                fracLayer = Math.Min(1.0, (depthPAWC - depthFromSurface) / soilPhysical.Thickness[layer]);
                TopLL += soilPhysical.LL15mm[layer] * fracLayer;
                TopDUL += soilPhysical.DULmm[layer] * fracLayer;
                depthFromSurface += soilPhysical.Thickness[layer];
                if (depthFromSurface >= depthPAWC)
                    layer = nLayers;
            }
        }
             
        //Determine daily requirement for irrigation
        [EventSubscribe("StartOfDay")]
        private void OnStartOfDay(object sender, EventArgs e)
        {
            //Can we irrigate today?          
            SeasonIsOpen = isBetween(Clock.Today, StartDate, EndDate);
            if (!SeasonIsOpen)
                SeasonAppliedAmount = 0;

            //Is there a crop in the ground that needs irrigation?
            CropIsActive = false;
            if ((existingCrop != null) && (existingCrop.IsAlive))
                CropIsActive = true;
            //if ((existingCrop.Phenology.Stage >= 3.0) && (existingCrop.Phenology.Stage < 6.0))
          
            //Is the irrigator available?
            IrrigatorIsAvailable = false;
            DaysSinceIrrigation += 1;
            if (DaysSinceIrrigation >= returndays)
                IrrigatorIsAvailable = true;
          
            //Is the soil dry enough to require irrigation?
            SoilIsDry = false;
            double depthFromSurface = 0.0;
            double fracLayer = 0.0;
            TopSWC = 0.0;
            for (int layer = 0; layer < nLayers; layer++)
            //for (int layer = 0; depthFromSurface < depthPAWC + soilPhysical.Thickness[layer]; layer++)
            {
                fracLayer = Math.Min(1.0, (depthPAWC - depthFromSurface) / soilPhysical.Thickness[layer]);
                TopSWC += waterBalance.SWmm[layer] * fracLayer;
                depthFromSurface += soilPhysical.Thickness[layer];
                if (depthFromSurface >= depthPAWC)
                    layer = nLayers;
            }
            
            TopSWdeficit = TopSWC - TopDUL;
            if (Math.Max(0.0, -TopSWdeficit) >= (TopDUL - TopLL) * (100 - triggerDeficit) / 100)
                SoilIsDry = true;
                
            //Are all the conditions ratifying irrigation
            if (IrrigationIsAllowed && SeasonIsOpen && CropIsActive && IrrigatorIsAvailable && SoilIsDry)
            {
                //Lets bloody well irrigate then!!!!
                AmountToApply = TopDUL * targetDeficit / 100 - TopSWC;
                AmountToApply = Math.Max(0.0, Math.Min(AmountToApply, seasonsAllocation - SeasonAppliedAmount));
                AmountToApply = Math.Min(AmountToApply,maximumAmount);
                Irrigation.Apply(AmountToApply);
                DaysSinceIrrigation = 0;
                SeasonAppliedAmount += AmountToApply;
            }
        }
        
        ///Checks whether theDate is between iniDate and endDate (non-year specific)
        private bool isBetween(DateTime theDay, DateTime iniDate, DateTime endDate)
        {
            bool result = false;
            if (iniDate.DayOfYear < endDate.DayOfYear)
            {
                // period is within one year, ex: summer in the northern hemisphere
                if ((theDay.DayOfYear >= iniDate.DayOfYear) && (theDay.DayOfYear <= endDate.DayOfYear))
                    result = true;
            }
            else
            {
                // period goes over the end of the year, ex: summer in the southern hemisphere
                if ((theDay.DayOfYear >= iniDate.DayOfYear) || (theDay.DayOfYear <= endDate.DayOfYear))
                    result = true;
            }
            
            return result;
        }
    }
}
```
  Folder Incomplete (disabled)
    Folder Southern NSW
      Simulation Ardlethan_03_S1
        Clock: Start=2003-01-01; End=2003-12-31
        Summary summaryfile
        Weather: FileName=met/Ardlethan_03.met
        Zone paddock: Area=1; Slope=0; AspectAngle=0; Altitude=50
          Report outputfile: EventNames=[Clock].DoReport
            VariableNames:
              year
              day
              [canola].stage
              [canola].plant_status
              [manager].event
              [canola].grain_n
              [canola].daysaftersowing
              [canola].ttaftersowing
              [canola].grain_wt
              [canola].yield units kg/ha
              [canola].biomass_wt
              [canola].plants
              [canola].leaf_no
              [canola].root_depth
              [canola].green_biomass_wt as green_biomass
              tracker1.avg@canola_swdef_pheno
              tracker1.avg@canola_swdef_photo
              tracker1.avg@canola_swdef_expan
              tracker1.avg@canola_nfact_photo
              tracker1.avg@canola_nfact_grain
              [canola].n_uptake
              [canola].n_uptake_stover as stover_n
              [canola].esw_layr()
              [canola].lai
              sw_dep() as total_sw
              no3() as total_no3
              tracker1.sum@canola_ep[]
              tracker1.sum@soilwat2_es
              esw as pesw
              tracker1.sum@soilwat2_runoff
              tracker1.sum@soilwat2_drain
              surfaceom.surfaceom_wt
              [canola].flowering_das as flow_das
              [canola].flowering_date as flow_date
              day_length
              [canola].maturity_das as mat_das
              [canola].maturity_date as mat_date
              [canola].cover_green
              tracker1.avg@met_maxt
              tracker1.avg@met_mint
              tracker1.avg@met_radn
              tracker1.sum@met_rain
              [canola].height
              [canola].node_no
              [manager].oil_conc
              [manager].avg_temp
              [canola].leafgreenwt
              [canola].stemgreenwt
              [canola].podgreenwt
              [canola].pai
              [Clock].Today
              [canola].green_biomass_n as green_n
              [canola].leafgreenn
              [canola].stemgreenn
              [canola].podgreenn
              [canola].tlai
              [canola].mealgreenwt
              [canola].oilgreenwt
              [canola].dlt_dm_grain_demand
              [canola].grain_oil_conc
              [canola].dlt_dm_oil_conv
              [canola].dlt_dm_oil_conv_retrans
              [canola].growthn
              [canola].retranslocationn
              [canola].leafgreennconc
              [canola].stemgreennconc
              [canola].n_conc_grain
              [canola].mealgreennconc
              [canola].n_conc_crit
              [canola].n_conc_min
              [manager].avg_swdef
          Operations
            2003-05-01  Fertiliser.Apply(49, Fertiliser.Types., 30);
            2003-06-14  // canola sow cultivar = rainbow, plants = 20 (/m2), sowing_depth = 10 (mm), row_spacing = 300
            2003-05-10  // 'soil water' set sw = 0.101 0.223 0.341 0.353 0.270 0.254 0.254 0.251 0.256 0.256
            2003-05-31  Fertiliser.Apply(35, Fertiliser.Types., 30);
          Manager
```csharp
using Models.Soils;
using System;
using Models.Core;
using Models.PMF;
namespace Models
{
    [Serializable]
    [System.Xml.Serialization.XmlInclude(typeof(Model))]
    public class Script : Model
    {
        [Link] Clock Clock;

        [EventSubscribe("StartOfSimulation")]
        private void OnSimulationCommencing(object sender, EventArgs e)
        {
            /*
                
            samp_start_sw = 0
            rain_samp_start_sw = 0
            rain_samp_finish_sw = 0
            sim_start_sw = 0
            sim_finish_sw = 0
            cum_days = 0
            pre_sow_rain = 0
            flower_flag = 0
            grain_fill_rain = 0
            sum_rain = 0
            in_crop_rain = 0
            num_rain_events = 0
            
            */
        }
        [EventSubscribe("DoManagement")]
        private void OnDoManagement(object sender, EventArgs e)
        {
            /*
                
               if (daysaftersowing = 1) then
                  cum_temp = 0
                  cum_swdef = 0
                  cum_days = 0
               elseif (stagename = 'start_grain_fill' or
                             stagename = 'end_grain_fill' or
                             stagename = 'maturity' or
                             stagename = 'harvest_ripe') then
                  cum_temp = cum_temp + (maxt + mint) / 2
                  cum_swdef = cum_swdef + swdef_photo
                  cum_days = cum_days + 1
               endif
               ! calculate canola oil content
               if (cum_days > 0) then
                  avg_temp = cum_temp / cum_days
                  avg_swdef = cum_swdef / cum_days
                  if (avg_temp <= 14) then
                     oil_conc =  47
                  else
                     oil_conc = (47 - ((avg_temp - 14)*1.21)) - (1.91*(1 - avg_swdef^2))
                  endif
               else
                  oil_conc = 0
               endif
            
            */
            /*
                
            if year = 2003 and day = 129 then
              sim_start_sw = esw
            endif
            
            */
        }
        [EventSubscribe("DoCalculations")]
        private void OnDoCalculations(object sender, EventArgs e)
        {
            /*
                
            if day = 100 then
                 accum_es = 0
            endif
            if canola.daysaftersowing = 1 then
               start_esw = esw
               sow_day = day
            endif
            if canola.plant_status = 'out' then
               pre_sow_rain = pre_sow_rain + rain
            endif
            if canola.daysaftersowing > 0 then
                 accum_es = accum_es + es
                 in_crop_rain = in_crop_rain + rain
            endif
            if canola.daysaftersowing > 0 and rain > 3 then
                 num_rain_events = num_rain_events + 1
            endif
            if canola.stagename = 'flowering' and flower_flag = 0 then
               pre_flower_rain = in_crop_rain
               pre_flower_rain_events = num_rain_events
               flower_lai = lai
               flower_flag = 1
               grain_fill_rain = 0
            endif
            grain_fill_rain = grain_fill_rain + rain
            if canola.stagename = 'harvest_ripe' or canola.plant_status = 'dead' then
               total_rain_events = num_rain_events
               end_esw = esw
               canola harvest
               canola kill_crop
               canola end_crop
               in_crop_rain = 0
               crop_in = 0
               flower_flag = 0
               pre_sow_rain = 0
            endif
            if month = 1 and is_end_month = 1 then
              jan_rain = sum_rain
              sum_rain = 0
            endif
            if month = 2 and is_end_month = 1 then
              feb_rain = sum_rain
              sum_rain = 0
            endif
            if month = 3 and is_end_month = 1 then
              mar_rain = sum_rain
              sum_rain = 0
            endif
            if month = 4 and is_end_month = 1 then
              apr_rain = sum_rain
              sum_rain = 0
            endif
            if month = 5 and is_end_month = 1 then
              may_rain = sum_rain
              sum_rain = 0
            endif
            if month = 6 and is_end_month = 1 then
              jun_rain = sum_rain
              sum_rain = 0
            endif
            if month = 7 and is_end_month = 1 then
              jul_rain = sum_rain
              sum_rain = 0
            endif
            if month = 8 and is_end_month = 1 then
              aug_rain = sum_rain
              sum_rain = 0
            endif
            if month = 9 and is_end_month = 1 then
              sep_rain = sum_rain
              sum_rain = 0
            endif
            if month = 10 and is_end_month = 1 then
              oct_rain = sum_rain
              sum_rain = 0
            endif
            if month = 11 and is_end_month = 1 then
              nov_rain = sum_rain
              sum_rain = 0
            endif
            if month = 12 and is_end_month = 1 then
              dec_rain = sum_rain
              sum_rain = 0
            endif
            sum_rain = sum_rain + rain
            !!!!!!!!!!!!!!!!!!!!!!!!!!!!!!!!!!  residue  !!!!!!!!!!!!!!!!!!!!!!!!!!!!!!!!!!
            
            */
            /*
                
            if year = 2003 and day = 130 then
              samp_start_sw = esw
              rain_samp_start_sw = pre_sow_rain
            endif
            
            */
        }
    }
}
```
          Soil: Latitude=0; Longitude=0
            Physical
              Thickness  BD    AirDry  LL15   DUL    SAT
              100        1.3   0.066   0.096  0.222  0.479
              100        1.4   0.12    0.15   0.273  0.442
              100        1.45  0.27    0.311  0.4    0.423
              150        1.45  0.299   0.341  0.42   0.423
              200        1.45  0.25    0.311  0.42   0.423
              200        1.45  0.25    0.291  0.42   0.423
              200        1.45  0.25    0.282  0.42   0.423
              200        1.45  0.25    0.291  0.42   0.423
              200        1.45  0.25    0.294  0.42   0.423
              200        1.45  0.25    0.282  0.42   0.423
              SoilCrop canola
                LL=[0.096, 0.15, 0.311, 0.341, 0.311, 0.291, 0.282, 0.291, 0.294, 0.282]
                KL=[0.08, 0.08, 0.08, 0.08, 0.08, 0.07, 0.06, 0.05, 0.03, 0.01]
                XF=[1, 1, 1, 1, 1, 1, 1, 1, 1, 1]
            WaterBalance SoilWater: SummerDate=1-Nov; SummerU=6; SummerCona=3.5; WinterDate=1-Apr; WinterU=6; WinterCona=3.5; DiffusConst=88; DiffusSlope=35.4; Salb=0.13; CN2Bare=72; CNRed=20; CNCov=0.8; PSIDul=-100; Thickness=[100, 100, 100, 150, 200, 200, 200, 200, 200, 200]; SWCON=[0.4, 0.4, 0.4, 0.4, 0.4, 0.4, 0.4, 0.4, 0.4, 0.4]
            Organic: FOMCNRatio=30; CarbonUnits=Total
              Thickness  Carbon  SoilCNRatio  FBiom  FInert  FOM
              100        1.3     14.5         0.04   0.45    484.4165
              100        1       14.5         0.02   0.47    403.8836
              100        0.8     14.5         0.02   0.5     336.7392
              150        0.62    14.5         0.01   0.55    256.3597
              200        0.42    14.5         0.01   0.59    178.2069
              200        0.22    14.5         0.01   0.6     123.8794
              200        0.19    14.5         0.01   0.84    86.114
              200        0.17    14.5         0.01   0.8     59.8616
              200        0.15    14.5         0.01   0.8     41.6125
              200        0.12    14.5         0.01   0.99    28.9266
            Chemical: Thickness=[100, 100, 100, 150, 200, 200, 200, 200, 200, 200]; PH=[5.8, 5.9, 6.6, 6.8, 7, 7.1, 7.2, 7.3, 7.4, 7.4]; PHUnits=Water
            Water: Thickness=[100, 100, 100, 150, 200, 200, 200, 200, 200, 200]; FilledFromTop=false
              InitialValues=[0.096, 0.15, 0.311, 0.341, 0.311, 0.291, 0.282, 0.291, 0.294, 0.282]
            Nutrient
            Solute NO3: Thickness=[100, 100, 100, 150, 200, 200, 200, 200, 200, 200]; InitialValues=[26.4, 7.1, 6.2, 4.7, 1, 0.5, 0.4, 0.5, 0.6, 0.7]; InitialValuesUnits=ppm; WaterTableConcentration=0; D0=0; DepthConstant=0; MaxDepthSoluteAccessible=0; RunoffEffectivenessAtMovingSolute=0; MaxEffectiveRunoff=0
            Solute NH4: Thickness=[100, 100, 100, 150, 200, 200, 200, 200, 200, 200]; InitialValues=[0, 0, 0, 0, 0, 0, 0, 0, 0, 0]; InitialValuesUnits=ppm; WaterTableConcentration=0; D0=0; DepthConstant=0; MaxDepthSoluteAccessible=0; RunoffEffectivenessAtMovingSolute=0; MaxEffectiveRunoff=0
            Solute Urea: Thickness=[100, 100, 100, 150, 200, 200, 200, 200, 200, 200]; InitialValues=[0, 0, 0, 0, 0, 0, 0, 0, 0, 0]; InitialValuesUnits=kg/ha; WaterTableConcentration=0; D0=0; DepthConstant=0; MaxDepthSoluteAccessible=0; RunoffEffectivenessAtMovingSolute=0; MaxEffectiveRunoff=0
            SoilTemperature Temperature
          SurfaceOrganicMatter SurfaceOM: InitialResidueName=wheat; InitialResidueType=wheat; InitialResidueMass=2000; InitialStandingFraction=0; InitialCPR=0; InitialCNR=76
          Plant canola: ResourceName=Canola
          MicroClimate: a_interception=0; b_interception=1; c_interception=0; d_interception=0; SoilHeatFluxFraction=0.4; MinimumHeightDiffForNewLayer=0; NightInterceptionFraction=0.5; ReferenceHeight=2
          Report SowingReport: EventNames=[Canola].Sowing
            VariableNames:
              [Clock].Today
              [Canola].SowingData.Cultivar
              [IWeather].Latitude
              [IWeather].Longitude
        SoilArbitrator
      Simulation Ardlethan_03_S2
        Clock: Start=2003-01-01; End=2003-12-31
        Summary summaryfile
        Weather: FileName=met/Ardlethan_03.met
        Zone paddock: Area=1; Slope=0; AspectAngle=0; Altitude=50
          Report outputfile: same as Incomplete.Southern NSW.Ardlethan_03_S1.paddock.outputfile
          Operations
            2003-06-25  Fertiliser.Apply(49, Fertiliser.Types., 30);
            2003-06-25  // canola sow cultivar = rainbow, plants = 20 (/m2), sowing_depth = 10 (mm), row_spacing = 300
            2003-05-10  // 'soil water' set sw = 0.101 0.223 0.341 0.353 0.270 0.254 0.254 0.251 0.256 0.256
            2003-05-31  Fertiliser.Apply(35, Fertiliser.Types., 30);
          Manager: same as Incomplete.Southern NSW.Ardlethan_03_S1.paddock.manager
          Soil: same as Incomplete.Southern NSW.Ardlethan_03_S1.paddock.soil
          SurfaceOrganicMatter SurfaceOM: InitialResidueName=wheat; InitialResidueType=wheat; InitialResidueMass=2000; InitialStandingFraction=0; InitialCPR=0; InitialCNR=76
          Plant canola: ResourceName=Canola
          MicroClimate: a_interception=0; b_interception=1; c_interception=0; d_interception=0; SoilHeatFluxFraction=0.4; MinimumHeightDiffForNewLayer=0; NightInterceptionFraction=0.5; ReferenceHeight=2
          Report SowingReport: EventNames=[Canola].Sowing
            VariableNames:
              [Clock].Today
              [Canola].SowingData.Cultivar
              [IWeather].Latitude
              [IWeather].Longitude
        SoilArbitrator
      Simulation Ardlethan_03_S3
        Clock: Start=2003-01-01; End=2003-12-31
        Summary summaryfile
        Weather: FileName=met/Ardlethan_03.met
        Zone paddock: Area=1; Slope=0; AspectAngle=0; Altitude=50
          Report outputfile: same as Incomplete.Southern NSW.Ardlethan_03_S1.paddock.outputfile
          Operations
            2003-07-04  Fertiliser.Apply(49, Fertiliser.Types., 30);
            2003-07-04  // canola sow cultivar = rainbow, plants = 20 (/m2), sowing_depth = 10 (mm), row_spacing = 300
            2003-05-10  // 'soil water' set sw = 0.101 0.223 0.341 0.353 0.270 0.254 0.254 0.251 0.256 0.256
            2003-05-31  Fertiliser.Apply(35, Fertiliser.Types., 30);
          Manager: same as Incomplete.Southern NSW.Ardlethan_03_S1.paddock.manager
          Soil: same as Incomplete.Southern NSW.Ardlethan_03_S1.paddock.soil
          SurfaceOrganicMatter SurfaceOM: InitialResidueName=wheat; InitialResidueType=wheat; InitialResidueMass=2000; InitialStandingFraction=0; InitialCPR=0; InitialCNR=76
          Plant canola: ResourceName=Canola
          MicroClimate: a_interception=0; b_interception=1; c_interception=0; d_interception=0; SoilHeatFluxFraction=0.4; MinimumHeightDiffForNewLayer=0; NightInterceptionFraction=0.5; ReferenceHeight=2
          Report SowingReport: EventNames=[Canola].Sowing
            VariableNames:
              [Clock].Today
              [Canola].SowingData.Cultivar
              [IWeather].Latitude
              [IWeather].Longitude
        SoilArbitrator
      Simulation Condo_91_S1_75N
        Clock: Start=1991-01-01; End=1991-12-31
        Summary summaryfile
        Weather: FileName=met/condo.met
        Zone paddock: Area=1; Slope=0; AspectAngle=0; Altitude=50
          Report outputfile: same as Incomplete.Southern NSW.Ardlethan_03_S1.paddock.outputfile
          Operations
            1991-05-10  Fertiliser.Apply(75, Fertiliser.Types., 50);
            1991-05-24  // canola sow plants = 55, row_spacing = 200, sowing_depth = 20, cultivar = oscar
            1991-07-19  // 'soil water' set sw = 0.237 0.334 0.321 0.350 0.359 0.346 0.334 0.322 0.318 0.313 0.313 0.313 0.303 0.292 0.292 0.292
          Manager
```csharp
using Models.Soils;
using System;
using Models.Core;
using Models.PMF;
namespace Models
{
    [Serializable]
    [System.Xml.Serialization.XmlInclude(typeof(Model))]
    public class Script : Model
    {
        [Link] Clock Clock;

        [EventSubscribe("StartOfSimulation")]
        private void OnSimulationCommencing(object sender, EventArgs e)
        {
            /*
                
            samp_start_sw = 0
            rain_samp_start_sw = 0
            rain_samp_finish_sw = 0
            sim_start_sw = 0
            sim_finish_sw = 0
            cum_days = 0
            pre_sow_rain = 0
            flower_flag = 0
            grain_fill_rain = 0
            sum_rain = 0
            in_crop_rain = 0
            num_rain_events = 0
            
            */
        }
        [EventSubscribe("DoManagement")]
        private void OnDoManagement(object sender, EventArgs e)
        {
            /*
                
               if (daysaftersowing = 1) then
                  cum_temp = 0
                  cum_swdef = 0
                  cum_days = 0
               elseif (stagename = 'start_grain_fill' or
                             stagename = 'end_grain_fill' or
                             stagename = 'maturity' or
                             stagename = 'harvest_ripe') then
                  cum_temp = cum_temp + (maxt + mint) / 2
                  cum_swdef = cum_swdef + swdef_photo
                  cum_days = cum_days + 1
               endif
               ! calculate canola oil content
               if (cum_days > 0) then
                  avg_temp = cum_temp / cum_days
                  avg_swdef = cum_swdef / cum_days
                  if (avg_temp <= 14) then
                     oil_conc =  47
                  else
                     oil_conc = (47 - ((avg_temp - 14)*1.21)) - (1.91*(1 - avg_swdef^2))
                  endif
               else
                  oil_conc = 0
               endif
            
            */
            /*
                
            if year = 1991 and day = 199 then
              sim_start_sw = esw
            endif
            
            */
        }
        [EventSubscribe("DoCalculations")]
        private void OnDoCalculations(object sender, EventArgs e)
        {
            /*
                
            if day = 100 then
                 accum_es = 0
            endif
            if canola.daysaftersowing = 1 then
               start_esw = esw
               sow_day = day
            endif
            if canola.plant_status = 'out' then
               pre_sow_rain = pre_sow_rain + rain
            endif
            if canola.daysaftersowing > 0 then
                 accum_es = accum_es + es
                 in_crop_rain = in_crop_rain + rain
            endif
            if canola.daysaftersowing > 0 and rain > 3 then
                 num_rain_events = num_rain_events + 1
            endif
            if canola.stagename = 'flowering' and flower_flag = 0 then
               pre_flower_rain = in_crop_rain
               pre_flower_rain_events = num_rain_events
               flower_lai = lai
               flower_flag = 1
               grain_fill_rain = 0
            endif
            grain_fill_rain = grain_fill_rain + rain
            if canola.stagename = 'harvest_ripe' or canola.plant_status = 'dead' then
               total_rain_events = num_rain_events
               end_esw = esw
               canola harvest
               canola kill_crop
               canola end_crop
               in_crop_rain = 0
               crop_in = 0
               flower_flag = 0
               pre_sow_rain = 0
            endif
            if month = 1 and is_end_month = 1 then
              jan_rain = sum_rain
              sum_rain = 0
            endif
            if month = 2 and is_end_month = 1 then
              feb_rain = sum_rain
              sum_rain = 0
            endif
            if month = 3 and is_end_month = 1 then
              mar_rain = sum_rain
              sum_rain = 0
            endif
            if month = 4 and is_end_month = 1 then
              apr_rain = sum_rain
              sum_rain = 0
            endif
            if month = 5 and is_end_month = 1 then
              may_rain = sum_rain
              sum_rain = 0
            endif
            if month = 6 and is_end_month = 1 then
              jun_rain = sum_rain
              sum_rain = 0
            endif
            if month = 7 and is_end_month = 1 then
              jul_rain = sum_rain
              sum_rain = 0
            endif
            if month = 8 and is_end_month = 1 then
              aug_rain = sum_rain
              sum_rain = 0
            endif
            if month = 9 and is_end_month = 1 then
              sep_rain = sum_rain
              sum_rain = 0
            endif
            if month = 10 and is_end_month = 1 then
              oct_rain = sum_rain
              sum_rain = 0
            endif
            if month = 11 and is_end_month = 1 then
              nov_rain = sum_rain
              sum_rain = 0
            endif
            if month = 12 and is_end_month = 1 then
              dec_rain = sum_rain
              sum_rain = 0
            endif
            sum_rain = sum_rain + rain
            !!!!!!!!!!!!!!!!!!!!!!!!!!!!!!!!!!  residue  !!!!!!!!!!!!!!!!!!!!!!!!!!!!!!!!!!
            
            */
            /*
                
            if year = 1991 and day = 200 then
              samp_start_sw = esw
              rain_samp_start_sw = pre_sow_rain
            endif
            if year = 1991 and day = 332 then
              sim_finish_sw = esw
              rain_samp_finish_sw = grain_fill_rain
            endif
            
            */
        }
    }
}
```
          Soil: Latitude=0; Longitude=0
            Physical
              Thickness  BD    AirDry  LL15  DUL    SAT
              100        1.32  0.03    0.15  0.3    0.35
              100        1.7   0.03    0.15  0.3    0.36
              100        1.68  0.03    0.15  0.3    0.36
              100        1.68  0.03    0.25  0.35   0.36
              100        1.7   0.05    0.3   0.35   0.36
              100        1.6   0.05    0.3   0.371  0.393
              100        1.6   0.05    0.3   0.36   0.39
              100        1.6   0.05    0.3   0.373  0.39
              100        1.6   0.05    0.3   0.373  0.39
              100        1.6   0.05    0.3   0.373  0.39
              100        1.6   0.04    0.3   0.373  0.39
              100        1.6   0.05    0.3   0.37   0.39
              100        1.6   0.05    0.3   0.37   0.39
              100        1.6   0.05    0.3   0.37   0.39
              100        1.6   0.05    0.3   0.37   0.39
              100        1.6   0.04    0.3   0.37   0.39
              SoilCrop canola
                LL=[0.15, 0.15, 0.15, 0.25, 0.3, 0.3, 0.3, 0.3, 0.3, 0.3, 0.3, 0.3, 0.3, 0.3, 0.3, 0.3]
                KL=[0.08, 0.08, 0.08, 0.08, 0.08, 0.07, 0.06, 0.05, 0.05, 0.05, 0.05, 0.05, 0.05, 0.05, 0.05, 0.05]
                XF=[1, 1, 1, 1, 1, 1, 1, 1, 1, 1, 1, 1, 1, 1, 1, 1]
            WaterBalance SoilWater: SummerDate=1-Nov; SummerU=6; SummerCona=3.5; WinterDate=1-Apr; WinterU=6; WinterCona=3.5; DiffusConst=88; DiffusSlope=35.4; Salb=0.13; CN2Bare=65; CNRed=20; CNCov=0.8; PSIDul=-100
              Thickness=[100, 100, 100, 100, 100, 100, 100, 100, 100, 100, 100, 100, 100, 100, 100, 100]
              SWCON=[0.4, 0.4, 0.4, 0.4, 0.4, 0.4, 0.4, 0.4, 0.4, 0.4, 0.4, 0.4, 0.4, 0.4, 0.4, 0.4]
            Organic: FOMCNRatio=18; CarbonUnits=Total
              Thickness  Carbon  SoilCNRatio  FBiom  FInert  FOM
              100        1.3     14.5         0.03   0.45    2698.9353
              100        1       14.5         0.02   0.47    2237.496
              100        0.8     14.5         0.02   0.5     1854.9493
              100        0.62    14.5         0.01   0.55    1537.807
              100        0.42    14.5         0.01   0.59    1274.8868
              100        0.22    14.5         0.01   0.6     1056.9183
              100        0.19    14.5         0.01   0.84    876.216
              100        0.17    14.5         0.01   0.8     726.4086
              100        0.15    14.5         0.01   0.8     602.2139
              100        0.12    14.5         0.01   0.99    499.2528
              100        0.11    14.5         0.01   0.99    413.8951
              100        0.1     14.5         0.01   0.99    343.1311
              100        0.1     14.5         0.01   0.99    284.4657
              100        0.1     14.5         0.01   0.99    235.8303
              100        0.1     14.5         0.01   0.99    195.5102
              100        0.1     14.5         0.01   0.99    162.0837
            Chemical: PHUnits=Water
              Thickness=[100, 100, 100, 100, 100, 100, 100, 100, 100, 100, 100, 100, 100, 100, 100, 100]
              PH=[5.8, 5.9, 6.6, 6.8, 7, 7.1, 7.2, 7.3, 7.4, 7.4, 7.6, 7.6, 7.6, 7.6, 7.6, 7.6]
            Water: FilledFromTop=false
              Thickness=[100, 100, 100, 100, 100, 100, 100, 100, 100, 100, 100, 100, 100, 100, 100, 100]
              InitialValues=[0.15, 0.15, 0.15, 0.25, 0.29, 0.28, 0.27, 0.26, 0.26, 0.26, 0.26, 0.26, 0.26, 0.26, 0.26, 0.26]
            Nutrient
            Solute NO3: InitialValues=[4, 4, 4, 4, 4, 4, 4, 4, 4, 4, 4, 4, 4, 4, 4, 4]; InitialValuesUnits=ppm; WaterTableConcentration=0; D0=0; DepthConstant=0; MaxDepthSoluteAccessible=0; RunoffEffectivenessAtMovingSolute=0; MaxEffectiveRunoff=0
              Thickness=[100, 100, 100, 100, 100, 100, 100, 100, 100, 100, 100, 100, 100, 100, 100, 100]
            Solute NH4: InitialValues=[1, 1, 1, 1, 1, 1, 1, 1, 1, 1, 1, 1, 1, 1, 1, 1]; InitialValuesUnits=ppm; WaterTableConcentration=0; D0=0; DepthConstant=0; MaxDepthSoluteAccessible=0; RunoffEffectivenessAtMovingSolute=0; MaxEffectiveRunoff=0
              Thickness=[100, 100, 100, 100, 100, 100, 100, 100, 100, 100, 100, 100, 100, 100, 100, 100]
            Solute Urea: same as Validation.Growth Experiments.Harden.Harden1999.Harden1999.Paddock.Soil.Urea
            SoilTemperature Temperature
          SurfaceOrganicMatter SurfaceOM: InitialResidueName=lucerne; InitialResidueType=lucerne; InitialResidueMass=1000; InitialStandingFraction=0; InitialCPR=0; InitialCNR=20
          Plant canola: ResourceName=Canola
          MicroClimate: a_interception=0; b_interception=1; c_interception=0; d_interception=0; SoilHeatFluxFraction=0.4; MinimumHeightDiffForNewLayer=0; NightInterceptionFraction=0.5; ReferenceHeight=2
          Report SowingReport: EventNames=[Canola].Sowing
            VariableNames:
              [Clock].Today
              [Canola].SowingData.Cultivar
              [IWeather].Latitude
              [IWeather].Longitude
        SoilArbitrator
      Simulation Condo_92_S1_75N
        Clock: Start=1991-11-01; End=1992-12-31
        Summary summaryfile
        Weather: FileName=met/condo.met
        Zone paddock: Area=1; Slope=0; AspectAngle=0; Altitude=50
          Report outputfile: same as Incomplete.Southern NSW.Ardlethan_03_S1.paddock.outputfile
          Operations
            1992-04-08  Fertiliser.Apply(75, Fertiliser.Types., 50);
            1992-04-22  // canola sow plants = 55, row_spacing = 200, sowing_depth = 20, cultivar = oscar
            1992-05-14  // 'soil water' set sw = 0.154 0.210 0.284 0.335 0.396 0.429 0.410 0.390 0.380 0.370 0.369 0.368 0.355 0.343 0.340 0.336
            1992-05-14  // 'soil nitrogen' set no3ppm = 20 14 2 2 2 2 2 2 2 2 2 2 2 2 2 2
          Manager
```csharp
using Models.Soils;
using System;
using Models.Core;
using Models.PMF;
namespace Models
{
    [Serializable]
    [System.Xml.Serialization.XmlInclude(typeof(Model))]
    public class Script : Model
    {
        [Link] Clock Clock;

        [EventSubscribe("StartOfSimulation")]
        private void OnSimulationCommencing(object sender, EventArgs e)
        {
            /*
                
            samp_start_sw = 0
            rain_samp_start_sw = 0
            rain_samp_finish_sw = 0
            sim_start_sw = 0
            sim_finish_sw = 0
            cum_days = 0
            pre_sow_rain = 0
            flower_flag = 0
            grain_fill_rain = 0
            sum_rain = 0
            in_crop_rain = 0
            num_rain_events = 0
            
            */
        }
        [EventSubscribe("DoManagement")]
        private void OnDoManagement(object sender, EventArgs e)
        {
            /*
                
               if (daysaftersowing = 1) then
                  cum_temp = 0
                  cum_swdef = 0
                  cum_days = 0
               elseif (stagename = 'start_grain_fill' or
                             stagename = 'end_grain_fill' or
                             stagename = 'maturity' or
                             stagename = 'harvest_ripe') then
                  cum_temp = cum_temp + (maxt + mint) / 2
                  cum_swdef = cum_swdef + swdef_photo
                  cum_days = cum_days + 1
               endif
               ! calculate canola oil content
               if (cum_days > 0) then
                  avg_temp = cum_temp / cum_days
                  avg_swdef = cum_swdef / cum_days
                  if (avg_temp <= 14) then
                     oil_conc =  47
                  else
                     oil_conc = (47 - ((avg_temp - 14)*1.21)) - (1.91*(1 - avg_swdef^2))
                  endif
               else
                  oil_conc = 0
               endif
            
            */
            /*
                
            if year = 1992 and day = 134 then
              sim_start_sw = esw
            endif
            
            */
        }
        [EventSubscribe("DoCalculations")]
        private void OnDoCalculations(object sender, EventArgs e)
        {
            /*
                
            if day = 100 then
                 accum_es = 0
            endif
            if canola.daysaftersowing = 1 then
               start_esw = esw
               sow_day = day
            endif
            if canola.plant_status = 'out' then
               pre_sow_rain = pre_sow_rain + rain
            endif
            if canola.daysaftersowing > 0 then
                 accum_es = accum_es + es
                 in_crop_rain = in_crop_rain + rain
            endif
            if canola.daysaftersowing > 0 and rain > 3 then
                 num_rain_events = num_rain_events + 1
            endif
            if canola.stagename = 'flowering' and flower_flag = 0 then
               pre_flower_rain = in_crop_rain
               pre_flower_rain_events = num_rain_events
               flower_lai = lai
               flower_flag = 1
               grain_fill_rain = 0
            endif
            grain_fill_rain = grain_fill_rain + rain
            if canola.stagename = 'harvest_ripe' or canola.plant_status = 'dead' then
               total_rain_events = num_rain_events
               end_esw = esw
               canola harvest
               canola kill_crop
               canola end_crop
               in_crop_rain = 0
               crop_in = 0
               flower_flag = 0
               pre_sow_rain = 0
            endif
            if month = 1 and is_end_month = 1 then
              jan_rain = sum_rain
              sum_rain = 0
            endif
            if month = 2 and is_end_month = 1 then
              feb_rain = sum_rain
              sum_rain = 0
            endif
            if month = 3 and is_end_month = 1 then
              mar_rain = sum_rain
              sum_rain = 0
            endif
            if month = 4 and is_end_month = 1 then
              apr_rain = sum_rain
              sum_rain = 0
            endif
            if month = 5 and is_end_month = 1 then
              may_rain = sum_rain
              sum_rain = 0
            endif
            if month = 6 and is_end_month = 1 then
              jun_rain = sum_rain
              sum_rain = 0
            endif
            if month = 7 and is_end_month = 1 then
              jul_rain = sum_rain
              sum_rain = 0
            endif
            if month = 8 and is_end_month = 1 then
              aug_rain = sum_rain
              sum_rain = 0
            endif
            if month = 9 and is_end_month = 1 then
              sep_rain = sum_rain
              sum_rain = 0
            endif
            if month = 10 and is_end_month = 1 then
              oct_rain = sum_rain
              sum_rain = 0
            endif
            if month = 11 and is_end_month = 1 then
              nov_rain = sum_rain
              sum_rain = 0
            endif
            if month = 12 and is_end_month = 1 then
              dec_rain = sum_rain
              sum_rain = 0
            endif
            sum_rain = sum_rain + rain
            !!!!!!!!!!!!!!!!!!!!!!!!!!!!!!!!!!  residue  !!!!!!!!!!!!!!!!!!!!!!!!!!!!!!!!!!
            
            */
            /*
                
            if year = 1992 and day = 135 then
              samp_start_sw = esw
              rain_samp_start_sw = pre_sow_rain
            endif
            if year = 1992 and day = 315 then
              sim_finish_sw = esw
              rain_samp_finish_sw = grain_fill_rain
            endif
            
            */
        }
    }
}
```
          Soil: Latitude=0; Longitude=0
            Water: FilledFromTop=false
              Thickness=[100, 100, 100, 100, 100, 100, 100, 100, 100, 100, 100, 100, 100, 100, 100, 100]
              InitialValues=[0.15, 0.15, 0.15, 0.25, 0.3, 0.3, 0.3, 0.3, 0.3, 0.3, 0.3, 0.3, 0.3, 0.3, 0.3, 0.3]
            Physical: same as Incomplete.Southern NSW.Condo_91_S1_75N.paddock.soil.Physical
            WaterBalance SoilWater: same as Incomplete.Southern NSW.Condo_91_S1_75N.paddock.soil.SoilWater
            Organic: same as Incomplete.Southern NSW.Condo_91_S1_75N.paddock.soil.Organic
            Chemical: same as Incomplete.Southern NSW.Condo_91_S1_75N.paddock.soil.Chemical
            Nutrient
            Solute NO3: same as Incomplete.Southern NSW.Condo_91_S1_75N.paddock.soil.NO3
            Solute NH4: same as Incomplete.Southern NSW.Condo_91_S1_75N.paddock.soil.NH4
            Solute Urea: same as Validation.Growth Experiments.Harden.Harden1999.Harden1999.Paddock.Soil.Urea
            SoilTemperature Temperature
          SurfaceOrganicMatter SurfaceOM: InitialResidueName=lucerne; InitialResidueType=lucerne; InitialResidueMass=1000; InitialStandingFraction=0; InitialCPR=0; InitialCNR=20
          Plant canola: ResourceName=Canola
          MicroClimate: a_interception=0; b_interception=1; c_interception=0; d_interception=0; SoilHeatFluxFraction=0.4; MinimumHeightDiffForNewLayer=0; NightInterceptionFraction=0.5; ReferenceHeight=2
          Report SowingReport: EventNames=[Canola].Sowing
            VariableNames:
              [Clock].Today
              [Canola].SowingData.Cultivar
              [IWeather].Latitude
              [IWeather].Longitude
        SoilArbitrator
      Simulation Dirnaseer_03_S1
        Clock: Start=2003-01-01; End=2003-12-31
        Summary summaryfile
        Weather: FileName=met/Dirnaseer_03.met
        Zone paddock: Area=1; Slope=0; AspectAngle=0; Altitude=50
          Report outputfile: same as Incomplete.Southern NSW.Ardlethan_03_S1.paddock.outputfile
          Operations
            2003-05-24  Fertiliser.Apply(42, Fertiliser.Types., 30);
            2003-05-24  // canola sow cultivar = oscar, crop_class = triazine, plants = 30 (/m2), sowing_depth = 10 (mm), row_spacing = 300
            2003-05-20  // 'soil water' set sw = 0.103 0.255 0.377 0.390 0.297 0.273 0.280 0.277 0.282 0.273
            2003-08-28  Fertiliser.Apply(55, Fertiliser.Types., 30);
          Manager
```csharp
using Models.Soils;
using System;
using Models.Core;
using Models.PMF;
namespace Models
{
    [Serializable]
    [System.Xml.Serialization.XmlInclude(typeof(Model))]
    public class Script : Model
    {
        [Link] Clock Clock;

        [EventSubscribe("StartOfSimulation")]
        private void OnSimulationCommencing(object sender, EventArgs e)
        {
            /*
                
            samp_start_sw = 0
            rain_samp_start_sw = 0
            rain_samp_finish_sw = 0
            sim_start_sw = 0
            sim_finish_sw = 0
            cum_days = 0
            pre_sow_rain = 0
            flower_flag = 0
            grain_fill_rain = 0
            sum_rain = 0
            in_crop_rain = 0
            num_rain_events = 0
            
            */
        }
        [EventSubscribe("DoManagement")]
        private void OnDoManagement(object sender, EventArgs e)
        {
            /*
                
               if (daysaftersowing = 1) then
                  cum_temp = 0
                  cum_swdef = 0
                  cum_days = 0
               elseif (stagename = 'start_grain_fill' or
                             stagename = 'end_grain_fill' or
                             stagename = 'maturity' or
                             stagename = 'harvest_ripe') then
                  cum_temp = cum_temp + (maxt + mint) / 2
                  cum_swdef = cum_swdef + swdef_photo
                  cum_days = cum_days + 1
               endif
               ! calculate canola oil content
               if (cum_days > 0) then
                  avg_temp = cum_temp / cum_days
                  avg_swdef = cum_swdef / cum_days
                  if (avg_temp <= 14) then
                     oil_conc =  47
                  else
                     oil_conc = (47 - ((avg_temp - 14)*1.21)) - (1.91*(1 - avg_swdef^2))
                  endif
               else
                  oil_conc = 0
               endif
            
            */
            /*
                
            if year = 2003 and day = 139 then
              sim_start_sw = esw
            endif
            
            */
        }
        [EventSubscribe("DoCalculations")]
        private void OnDoCalculations(object sender, EventArgs e)
        {
            /*
                
            if day = 100 then
                 accum_es = 0
            endif
            if canola.daysaftersowing = 1 then
               start_esw = esw
               sow_day = day
            endif
            if canola.plant_status = 'out' then
               pre_sow_rain = pre_sow_rain + rain
            endif
            if canola.daysaftersowing > 0 then
                 accum_es = accum_es + es
                 in_crop_rain = in_crop_rain + rain
            endif
            if canola.daysaftersowing > 0 and rain > 3 then
                 num_rain_events = num_rain_events + 1
            endif
            if canola.stagename = 'flowering' and flower_flag = 0 then
               pre_flower_rain = in_crop_rain
               pre_flower_rain_events = num_rain_events
               flower_lai = lai
               flower_flag = 1
               grain_fill_rain = 0
            endif
            grain_fill_rain = grain_fill_rain + rain
            if canola.stagename = 'harvest_ripe' or canola.plant_status = 'dead' then
               total_rain_events = num_rain_events
               end_esw = esw
               canola harvest
               canola kill_crop
               canola end_crop
               in_crop_rain = 0
               crop_in = 0
               flower_flag = 0
               pre_sow_rain = 0
            endif
            if month = 1 and is_end_month = 1 then
              jan_rain = sum_rain
              sum_rain = 0
            endif
            if month = 2 and is_end_month = 1 then
              feb_rain = sum_rain
              sum_rain = 0
            endif
            if month = 3 and is_end_month = 1 then
              mar_rain = sum_rain
              sum_rain = 0
            endif
            if month = 4 and is_end_month = 1 then
              apr_rain = sum_rain
              sum_rain = 0
            endif
            if month = 5 and is_end_month = 1 then
              may_rain = sum_rain
              sum_rain = 0
            endif
            if month = 6 and is_end_month = 1 then
              jun_rain = sum_rain
              sum_rain = 0
            endif
            if month = 7 and is_end_month = 1 then
              jul_rain = sum_rain
              sum_rain = 0
            endif
            if month = 8 and is_end_month = 1 then
              aug_rain = sum_rain
              sum_rain = 0
            endif
            if month = 9 and is_end_month = 1 then
              sep_rain = sum_rain
              sum_rain = 0
            endif
            if month = 10 and is_end_month = 1 then
              oct_rain = sum_rain
              sum_rain = 0
            endif
            if month = 11 and is_end_month = 1 then
              nov_rain = sum_rain
              sum_rain = 0
            endif
            if month = 12 and is_end_month = 1 then
              dec_rain = sum_rain
              sum_rain = 0
            endif
            sum_rain = sum_rain + rain
            !!!!!!!!!!!!!!!!!!!!!!!!!!!!!!!!!!  residue  !!!!!!!!!!!!!!!!!!!!!!!!!!!!!!!!!!
            
            */
            /*
                
            if year = 2003 and day = 140 then
              samp_start_sw = esw
              rain_samp_start_sw = pre_sow_rain
            endif
            
            */
        }
    }
}
```
          Soil: Latitude=0; Longitude=0
            Water: Thickness=[100, 100, 100, 150, 200, 200, 200, 200, 200, 200]; FilledFromTop=false
              InitialValues=[0.116, 0.157, 0.182, 0.22, 0.258, 0.263, 0.266, 0.264, 0.274, 0.273]
            Physical
              Thickness  BD    AirDry  LL15   DUL    SAT
              100        1.32  0.086   0.116  0.236  0.472
              100        1.45  0.127   0.157  0.278  0.423
              100        1.5   0.152   0.182  0.36   0.404
              150        1.5   0.19    0.22   0.39   0.404
              200        1.5   0.228   0.258  0.39   0.404
              200        1.5   0.233   0.263  0.395  0.404
              200        1.5   0.236   0.266  0.379  0.404
              200        1.5   0.234   0.264  0.397  0.404
              200        1.5   0.244   0.274  0.374  0.404
              200        1.5   0.243   0.273  0.385  0.404
              SoilCrop canola
                LL=[0.116, 0.157, 0.182, 0.22, 0.258, 0.263, 0.266, 0.264, 0.274, 0.273]
                KL=[0.08, 0.08, 0.08, 0.08, 0.08, 0.07, 0.06, 0.05, 0.03, 0.01]
                XF=[1, 1, 1, 1, 1, 1, 1, 1, 1, 1]
            WaterBalance SoilWater: same as Incomplete.Southern NSW.Ardlethan_03_S1.paddock.soil.SoilWater
            Organic: same as Incomplete.Southern NSW.Ardlethan_03_S1.paddock.soil.Organic
            Chemical: Thickness=[100, 100, 100, 150, 200, 200, 200, 200, 200, 200]; PH=[5.8, 5.9, 6.6, 6.8, 7, 7.1, 7.2, 7.3, 7.4, 7.4]; PHUnits=Water
            Nutrient
            Solute NO3: Thickness=[100, 100, 100, 150, 200, 200, 200, 200, 200, 200]; InitialValues=[29, 5.4, 3, 1.9, 0.9, 1.5, 1.7, 1.6, 1.4, 1.4]; InitialValuesUnits=ppm; WaterTableConcentration=0; D0=0; DepthConstant=0; MaxDepthSoluteAccessible=0; RunoffEffectivenessAtMovingSolute=0; MaxEffectiveRunoff=0
            Solute NH4: same as Incomplete.Southern NSW.Ardlethan_03_S1.paddock.soil.NH4
            Solute Urea: same as Incomplete.Southern NSW.Ardlethan_03_S1.paddock.soil.Urea
            SoilTemperature Temperature
          SurfaceOrganicMatter SurfaceOM: InitialResidueName=wheat; InitialResidueType=wheat; InitialResidueMass=2000; InitialStandingFraction=0; InitialCPR=0; InitialCNR=76
          Plant canola: ResourceName=Canola
          MicroClimate: a_interception=0; b_interception=1; c_interception=0; d_interception=0; SoilHeatFluxFraction=0.4; MinimumHeightDiffForNewLayer=0; NightInterceptionFraction=0.5; ReferenceHeight=2
          Report SowingReport: EventNames=[Canola].Sowing
            VariableNames:
              [Clock].Today
              [Canola].SowingData.Cultivar
              [IWeather].Latitude
              [IWeather].Longitude
        SoilArbitrator
      Simulation Dirnaseer_03_S2
        Clock: Start=2003-01-01; End=2003-12-31
        Summary summaryfile
        Weather: FileName=met/Dirnaseer_03.met
        Zone paddock: Area=1; Slope=0; AspectAngle=0; Altitude=50
          Report outputfile: same as Incomplete.Southern NSW.Ardlethan_03_S1.paddock.outputfile
          Operations
            2003-06-04  Fertiliser.Apply(42, Fertiliser.Types., 30);
            2003-06-04  // canola sow cultivar = oscar, crop_class = triazine, plants = 30 (/m2), sowing_depth = 10 (mm), row_spacing = 300
            2003-05-20  // 'soil water' set sw = 0.103 0.255 0.377 0.390 0.297 0.273 0.280 0.277 0.282 0.273
            2003-08-28  Fertiliser.Apply(55, Fertiliser.Types., 30);
          Manager: same as Incomplete.Southern NSW.Dirnaseer_03_S1.paddock.manager
          Soil: same as Incomplete.Southern NSW.Dirnaseer_03_S1.paddock.soil
          SurfaceOrganicMatter SurfaceOM: InitialResidueName=wheat; InitialResidueType=wheat; InitialResidueMass=2000; InitialStandingFraction=0; InitialCPR=0; InitialCNR=76
          Plant canola: ResourceName=Canola
          MicroClimate: a_interception=0; b_interception=1; c_interception=0; d_interception=0; SoilHeatFluxFraction=0.4; MinimumHeightDiffForNewLayer=0; NightInterceptionFraction=0.5; ReferenceHeight=2
          Report SowingReport: EventNames=[Canola].Sowing
            VariableNames:
              [Clock].Today
              [Canola].SowingData.Cultivar
              [IWeather].Latitude
              [IWeather].Longitude
        SoilArbitrator
      Simulation Dirnaseer_03_S3
        Clock: Start=2003-01-01; End=2003-12-31
        Summary summaryfile
        Weather: FileName=met/Dirnaseer_03.met
        Zone paddock: Area=1; Slope=0; AspectAngle=0; Altitude=50
          Report outputfile: same as Incomplete.Southern NSW.Ardlethan_03_S1.paddock.outputfile
          Operations
            2003-06-18  Fertiliser.Apply(42, Fertiliser.Types., 30);
            2003-06-18  // canola sow cultivar = oscar, crop_class = triazine, plants = 30 (/m2), sowing_depth = 10 (mm), row_spacing = 300
            2003-05-20  // 'soil water' set sw = 0.103 0.255 0.377 0.390 0.297 0.273 0.280 0.277 0.282 0.273
            2003-08-28  Fertiliser.Apply(55, Fertiliser.Types., 30);
          Manager: same as Incomplete.Southern NSW.Dirnaseer_03_S1.paddock.manager
          Soil: same as Incomplete.Southern NSW.Dirnaseer_03_S1.paddock.soil
          SurfaceOrganicMatter SurfaceOM: InitialResidueName=wheat; InitialResidueType=wheat; InitialResidueMass=2000; InitialStandingFraction=0; InitialCPR=0; InitialCNR=76
          Plant canola: ResourceName=Canola
          MicroClimate: a_interception=0; b_interception=1; c_interception=0; d_interception=0; SoilHeatFluxFraction=0.4; MinimumHeightDiffForNewLayer=0; NightInterceptionFraction=0.5; ReferenceHeight=2
          Report SowingReport: EventNames=[Canola].Sowing
            VariableNames:
              [Clock].Today
              [Canola].SowingData.Cultivar
              [IWeather].Latitude
              [IWeather].Longitude
        SoilArbitrator
      Simulation Dirn_91_S1_150N
        Clock: Start=1991-01-01; End=1991-12-31
        Summary summaryfile
        Weather: FileName=met/dirnaseer.met
        Zone paddock: Area=1; Slope=0; AspectAngle=0; Altitude=50
          Report outputfile: same as Incomplete.Southern NSW.Ardlethan_03_S1.paddock.outputfile
          Operations
            1991-05-27  // canola sow plants = 55, row_spacing = 200, sowing_depth = 20, cultivar = oscar
            1991-06-07  // 'soil nitrogen' set no3ppm = 35.0 25.0 7.0 3.5 2.0 1.1 1.8 1.8 2.5 2.5 2.0 2 2 2 2 2 2 2 2 2
            1991-06-07  // 'soil water' set sw = 0.148 0.173 0.183 0.198 0.232 0.250 0.230 0.211 0.209 0.207 0.207 0.207 0.222 0.237 0.237 0.237 0.241 0.250 0.250 0.250
            1991-05-14  // fertilise apply amount = 150, depth = 50, type = urea_n
          Manager
```csharp
using Models.Soils;
using System;
using Models.Core;
using Models.PMF;
namespace Models
{
    [Serializable]
    [System.Xml.Serialization.XmlInclude(typeof(Model))]
    public class Script : Model
    {
        [Link] Clock Clock;

        [EventSubscribe("StartOfSimulation")]
        private void OnSimulationCommencing(object sender, EventArgs e)
        {
            /*
                
            samp_start_sw = 0
            rain_samp_start_sw = 0
            rain_samp_finish_sw = 0
            sim_start_sw = 0
            sim_finish_sw = 0
            cum_days = 0
            pre_sow_rain = 0
            flower_flag = 0
            grain_fill_rain = 0
            sum_rain = 0
            in_crop_rain = 0
            num_rain_events = 0
            
            */
        }
        [EventSubscribe("DoManagement")]
        private void OnDoManagement(object sender, EventArgs e)
        {
            /*
                
               if (daysaftersowing = 1) then
                  cum_temp = 0
                  cum_swdef = 0
                  cum_days = 0
               elseif (stagename = 'start_grain_fill' or
                             stagename = 'end_grain_fill' or
                             stagename = 'maturity' or
                             stagename = 'harvest_ripe') then
                  cum_temp = cum_temp + (maxt + mint) / 2
                  cum_swdef = cum_swdef + swdef_photo
                  cum_days = cum_days + 1
               endif
               ! calculate canola oil content
               if (cum_days > 0) then
                  avg_temp = cum_temp / cum_days
                  avg_swdef = cum_swdef / cum_days
                  if (avg_temp <= 14) then
                     oil_conc =  47
                  else
                     oil_conc = (47 - ((avg_temp - 14)*1.21)) - (1.91*(1 - avg_swdef^2))
                  endif
               else
                  oil_conc = 0
               endif
            
            */
            /*
                
            if year = 1991 and day = 157 then
              sim_start_sw = esw
            endif
            
            */
        }
        [EventSubscribe("DoCalculations")]
        private void OnDoCalculations(object sender, EventArgs e)
        {
            /*
                
            if day = 100 then
                 accum_es = 0
            endif
            if canola.daysaftersowing = 1 then
               start_esw = esw
               sow_day = day
            endif
            if canola.plant_status = 'out' then
               pre_sow_rain = pre_sow_rain + rain
            endif
            if canola.daysaftersowing > 0 then
                 accum_es = accum_es + es
                 in_crop_rain = in_crop_rain + rain
            endif
            if canola.daysaftersowing > 0 and rain > 3 then
                 num_rain_events = num_rain_events + 1
            endif
            if canola.stagename = 'flowering' and flower_flag = 0 then
               pre_flower_rain = in_crop_rain
               pre_flower_rain_events = num_rain_events
               flower_lai = lai
               flower_flag = 1
               grain_fill_rain = 0
            endif
            grain_fill_rain = grain_fill_rain + rain
            if canola.stagename = 'harvest_ripe' or canola.plant_status = 'dead' then
               total_rain_events = num_rain_events
               end_esw = esw
               canola harvest
               canola kill_crop
               canola end_crop
               in_crop_rain = 0
               crop_in = 0
               flower_flag = 0
               pre_sow_rain = 0
            endif
            if month = 1 and is_end_month = 1 then
              jan_rain = sum_rain
              sum_rain = 0
            endif
            if month = 2 and is_end_month = 1 then
              feb_rain = sum_rain
              sum_rain = 0
            endif
            if month = 3 and is_end_month = 1 then
              mar_rain = sum_rain
              sum_rain = 0
            endif
            if month = 4 and is_end_month = 1 then
              apr_rain = sum_rain
              sum_rain = 0
            endif
            if month = 5 and is_end_month = 1 then
              may_rain = sum_rain
              sum_rain = 0
            endif
            if month = 6 and is_end_month = 1 then
              jun_rain = sum_rain
              sum_rain = 0
            endif
            if month = 7 and is_end_month = 1 then
              jul_rain = sum_rain
              sum_rain = 0
            endif
            if month = 8 and is_end_month = 1 then
              aug_rain = sum_rain
              sum_rain = 0
            endif
            if month = 9 and is_end_month = 1 then
              sep_rain = sum_rain
              sum_rain = 0
            endif
            if month = 10 and is_end_month = 1 then
              oct_rain = sum_rain
              sum_rain = 0
            endif
            if month = 11 and is_end_month = 1 then
              nov_rain = sum_rain
              sum_rain = 0
            endif
            if month = 12 and is_end_month = 1 then
              dec_rain = sum_rain
              sum_rain = 0
            endif
            sum_rain = sum_rain + rain
            !!!!!!!!!!!!!!!!!!!!!!!!!!!!!!!!!!  residue  !!!!!!!!!!!!!!!!!!!!!!!!!!!!!!!!!!
            
            */
            /*
                
            if year = 1991 and day = 158 then
              samp_start_sw = esw
              rain_samp_start_sw = pre_sow_rain + in_crop_rain
            endif
            if year = 1991 and day = 341 then
              sim_finish_sw = esw
              rain_samp_finish_sw = grain_fill_rain
            endif
            
            */
        }
    }
}
```
          Soil: Latitude=0; Longitude=0
            Water: FilledFromTop=false
              Thickness=[100, 100, 100, 100, 100, 100, 100, 100, 100, 100, 100, 100, 100, 100, 100, 100, 100, 100, 100, 100]
              InitialValues=[0.11, 0.11, 0.13, 0.2, 0.2, 0.2, 0.2, 0.2, 0.2, 0.2, 0.2, 0.2, 0.2, 0.2, 0.2, 0.21, 0.22, 0.22, 0.22, 0.22]
            Physical
              Thickness  BD    AirDry  LL15  DUL    SAT
              100        1.32  0.03    0.11  0.155  0.452
              100        1.7   0.03    0.11  0.175  0.308
              100        1.7   0.03    0.13  0.213  0.316
              100        1.7   0.03    0.2   0.32   0.33
              100        1.6   0.05    0.2   0.332  0.34
              100        1.6   0.05    0.2   0.32   0.393
              100        1.6   0.05    0.2   0.32   0.375
              100        1.6   0.05    0.2   0.32   0.39
              100        1.6   0.05    0.2   0.32   0.348
              100        1.6   0.05    0.2   0.32   0.356
              100        1.6   0.05    0.2   0.32   0.4
              100        1.6   0.05    0.2   0.32   0.4
              100        1.6   0.05    0.2   0.32   0.4
              100        1.6   0.05    0.2   0.32   0.4
              100        1.6   0.05    0.2   0.32   0.4
              100        1.6   0.05    0.21  0.32   0.4
              100        1.6   0.05    0.22  0.32   0.4
              100        1.6   0.05    0.22  0.32   0.4
              100        1.6   0.05    0.22  0.32   0.4
              100        1.6   0.05    0.22  0.32   0.4
              SoilCrop canola
                LL=[0.11, 0.11, 0.13, 0.2, 0.2, 0.2, 0.2, 0.2, 0.2, 0.2, 0.2, 0.2, 0.2, 0.2, 0.2, 0.21, 0.22, 0.22, 0.22, 0.22]
                KL=[0.08, 0.08, 0.08, 0.08, 0.08, 0.07, 0.06, 0.06, 0.06, 0.06, 0.06, 0.06, 0.05, 0.05, 0.05, 0.05, 0.05, 0.05, 0.05, 0.05]
                XF=[1, 1, 1, 1, 1, 1, 1, 1, 1, 1, 1, 1, 1, 1, 1, 1, 1, 1, 1, 1]
            WaterBalance SoilWater: SummerDate=1-Nov; SummerU=6; SummerCona=3.5; WinterDate=1-Apr; WinterU=6; WinterCona=3.5; DiffusConst=88; DiffusSlope=35.4; Salb=0.13; CN2Bare=65; CNRed=20; CNCov=0.8; PSIDul=-100
              Thickness=[100, 100, 100, 100, 100, 100, 100, 100, 100, 100, 100, 100, 100, 100, 100, 100, 100, 100, 100, 100]
              SWCON=[0.4, 0.4, 0.4, 0.4, 0.4, 0.4, 0.4, 0.4, 0.4, 0.4, 0.4, 0.4, 0.4, 0.4, 0.4, 0.4, 0.4, 0.4, 0.4, 0.4]
            Organic: FOMCNRatio=18; CarbonUnits=Total
              Thickness  Carbon  SoilCNRatio  FBiom  FInert  FOM
              100        1.3     14.5         0.04   0.45    2198.8549
              100        1       14.5         0.02   0.47    1892.5719
              100        0.8     14.5         0.02   0.5     1628.9518
              100        0.62    14.5         0.01   0.55    1402.0518
              100        0.42    14.5         0.01   0.59    1206.7572
              100        0.22    14.5         0.01   0.6     1038.6655
              100        0.19    14.5         0.01   0.84    893.9877
              100        0.17    14.5         0.01   0.8     769.4623
              100        0.15    14.5         0.01   0.8     662.2824
              100        0.12    14.5         0.01   0.99    570.0317
              100        0.11    14.5         0.01   0.99    490.6308
              100        0.11    14.5         0.01   0.99    422.2899
              100        0.11    14.5         0.01   0.99    363.4683
              100        0.11    14.5         0.01   0.99    312.84
              100        0.11    14.5         0.01   0.99    269.2639
              100        0.11    14.5         0.01   0.99    231.7576
              100        0.11    14.5         0.01   0.99    199.4756
              100        0.11    14.5         0.01   0.99    171.6903
              100        0.11    14.5         0.01   0.99    147.7752
              100        0.11    14.5         0.01   0.99    127.1913
            Chemical: PHUnits=Water
              Thickness=[100, 100, 100, 100, 100, 100, 100, 100, 100, 100, 100, 100, 100, 100, 100, 100, 100, 100, 100, 100]
              PH=[5.8, 5.9, 6.6, 6.8, 7, 7.1, 7.2, 7.3, 7.4, 7.4, 7.6, 7.6, 7.6, 7.6, 7.6, 7.6, 7.6, 7.6, 7.6, 7.6]
            Nutrient
            Solute NO3: InitialValuesUnits=ppm; WaterTableConcentration=0; D0=0; DepthConstant=0; MaxDepthSoluteAccessible=0; RunoffEffectivenessAtMovingSolute=0; MaxEffectiveRunoff=0
              Thickness=[100, 100, 100, 100, 100, 100, 100, 100, 100, 100, 100, 100, 100, 100, 100, 100, 100, 100, 100, 100]
              InitialValues=[4, 4, 4, 4, 4, 4, 4, 4, 4, 4, 4, 4, 4, 4, 4, 4, 4, 4, 4, 4]
            Solute NH4: InitialValuesUnits=ppm; WaterTableConcentration=0; D0=0; DepthConstant=0; MaxDepthSoluteAccessible=0; RunoffEffectivenessAtMovingSolute=0; MaxEffectiveRunoff=0
              Thickness=[100, 100, 100, 100, 100, 100, 100, 100, 100, 100, 100, 100, 100, 100, 100, 100, 100, 100, 100, 100]
              InitialValues=[1, 1, 1, 1, 1, 1, 1, 1, 1, 1, 1, 1, 1, 1, 1, 1, 1, 1, 1, 1]
            Solute Urea: same as Validation.Growth Experiments.Wagga.Wagga2008.WaggaWagga2008.Paddock.Soil.Urea
            SoilTemperature Temperature
          SurfaceOrganicMatter SurfaceOM: InitialResidueName=lucerne; InitialResidueType=lucerne; InitialResidueMass=1000; InitialStandingFraction=0; InitialCPR=0; InitialCNR=20
          Plant canola: ResourceName=Canola
          MicroClimate: a_interception=0; b_interception=1; c_interception=0; d_interception=0; SoilHeatFluxFraction=0.4; MinimumHeightDiffForNewLayer=0; NightInterceptionFraction=0.5; ReferenceHeight=2
          Report SowingReport: EventNames=[Canola].Sowing
            VariableNames:
              [Clock].Today
              [Canola].SowingData.Cultivar
              [IWeather].Latitude
              [IWeather].Longitude
        SoilArbitrator
      Simulation Dirn_92_S1_150N
        Clock: Start=1991-11-01; End=1992-12-31
        Summary summaryfile
        Weather: FileName=met/dirnaseer.met
        Zone paddock: Area=1; Slope=0; AspectAngle=0; Altitude=50
          Report outputfile: same as Incomplete.Southern NSW.Ardlethan_03_S1.paddock.outputfile
          Operations
            1992-05-26  // canola sow plants = 55, row_spacing = 200, sowing_depth = 20, cultivar = oscar
            1992-05-26  // 'soil nitrogen' set no3ppm = 35.0 25.0 7.0 3.5 2.0 1.1 1.8 1.8 2.5 2.5 2.0 2 2 2 2 2 2 2 2 2
            1992-05-26  // 'soil water' set sw = 0.179 0.205 0.195 0.240 0.267 0.276 0.258 0.239 0.231 0.222 0.222 0.222 0.223 0.224 0.224 0.224 0.236 0.248 0.248 0.248
            1992-05-13  Fertiliser.Apply(150, Fertiliser.Types., 50);
          Manager
```csharp
using Models.Soils;
using System;
using Models.Core;
using Models.PMF;
namespace Models
{
    [Serializable]
    [System.Xml.Serialization.XmlInclude(typeof(Model))]
    public class Script : Model
    {
        [Link] Clock Clock;

        [EventSubscribe("StartOfSimulation")]
        private void OnSimulationCommencing(object sender, EventArgs e)
        {
            /*
                
            samp_start_sw = 0
            rain_samp_start_sw = 0
            rain_samp_finish_sw = 0
            sim_start_sw = 0
            sim_finish_sw = 0
            cum_days = 0
            pre_sow_rain = 0
            flower_flag = 0
            grain_fill_rain = 0
            sum_rain = 0
            in_crop_rain = 0
            num_rain_events = 0
            
            */
        }
        [EventSubscribe("DoManagement")]
        private void OnDoManagement(object sender, EventArgs e)
        {
            /*
                
               if (daysaftersowing = 1) then
                  cum_temp = 0
                  cum_swdef = 0
                  cum_days = 0
               elseif (stagename = 'start_grain_fill' or
                             stagename = 'end_grain_fill' or
                             stagename = 'maturity' or
                             stagename = 'harvest_ripe') then
                  cum_temp = cum_temp + (maxt + mint) / 2
                  cum_swdef = cum_swdef + swdef_photo
                  cum_days = cum_days + 1
               endif
               ! calculate canola oil content
               if (cum_days > 0) then
                  avg_temp = cum_temp / cum_days
                  avg_swdef = cum_swdef / cum_days
                  if (avg_temp <= 14) then
                     oil_conc =  47
                  else
                     oil_conc = (47 - ((avg_temp - 14)*1.21)) - (1.91*(1 - avg_swdef^2))
                  endif
               else
                  oil_conc = 0
               endif
            
            */
            /*
                
            if year = 1992 and day = 146 then
              sim_start_sw = esw
            endif
            
            */
        }
        [EventSubscribe("DoCalculations")]
        private void OnDoCalculations(object sender, EventArgs e)
        {
            /*
                
            if day = 100 then
                 accum_es = 0
            endif
            if canola.daysaftersowing = 1 then
               start_esw = esw
               sow_day = day
            endif
            if canola.plant_status = 'out' then
               pre_sow_rain = pre_sow_rain + rain
            endif
            if canola.daysaftersowing > 0 then
                 accum_es = accum_es + es
                 in_crop_rain = in_crop_rain + rain
            endif
            if canola.daysaftersowing > 0 and rain > 3 then
                 num_rain_events = num_rain_events + 1
            endif
            if canola.stagename = 'flowering' and flower_flag = 0 then
               pre_flower_rain = in_crop_rain
               pre_flower_rain_events = num_rain_events
               flower_lai = lai
               flower_flag = 1
               grain_fill_rain = 0
            endif
            grain_fill_rain = grain_fill_rain + rain
            if canola.stagename = 'harvest_ripe' or canola.plant_status = 'dead' then
               total_rain_events = num_rain_events
               end_esw = esw
               canola harvest
               canola kill_crop
               canola end_crop
               in_crop_rain = 0
               crop_in = 0
               flower_flag = 0
               pre_sow_rain = 0
            endif
            if month = 1 and is_end_month = 1 then
              jan_rain = sum_rain
              sum_rain = 0
            endif
            if month = 2 and is_end_month = 1 then
              feb_rain = sum_rain
              sum_rain = 0
            endif
            if month = 3 and is_end_month = 1 then
              mar_rain = sum_rain
              sum_rain = 0
            endif
            if month = 4 and is_end_month = 1 then
              apr_rain = sum_rain
              sum_rain = 0
            endif
            if month = 5 and is_end_month = 1 then
              may_rain = sum_rain
              sum_rain = 0
            endif
            if month = 6 and is_end_month = 1 then
              jun_rain = sum_rain
              sum_rain = 0
            endif
            if month = 7 and is_end_month = 1 then
              jul_rain = sum_rain
              sum_rain = 0
            endif
            if month = 8 and is_end_month = 1 then
              aug_rain = sum_rain
              sum_rain = 0
            endif
            if month = 9 and is_end_month = 1 then
              sep_rain = sum_rain
              sum_rain = 0
            endif
            if month = 10 and is_end_month = 1 then
              oct_rain = sum_rain
              sum_rain = 0
            endif
            if month = 11 and is_end_month = 1 then
              nov_rain = sum_rain
              sum_rain = 0
            endif
            if month = 12 and is_end_month = 1 then
              dec_rain = sum_rain
              sum_rain = 0
            endif
            sum_rain = sum_rain + rain
            !!!!!!!!!!!!!!!!!!!!!!!!!!!!!!!!!!  residue  !!!!!!!!!!!!!!!!!!!!!!!!!!!!!!!!!!
            
            */
            /*
                
            if year = 1992 and day = 147 then
              samp_start_sw = esw
              rain_samp_start_sw = pre_sow_rain + in_crop_rain
            endif
            if year = 1992 and day = 362 then
              sim_finish_sw = esw
              rain_samp_finish_sw = grain_fill_rain
            endif
            
            */
        }
    }
}
```
          Soil: same as Incomplete.Southern NSW.Dirn_91_S1_150N.paddock.soil
          SurfaceOrganicMatter SurfaceOM: InitialResidueName=lucerne; InitialResidueType=lucerne; InitialResidueMass=1000; InitialStandingFraction=0; InitialCPR=0; InitialCNR=20
          Plant canola: ResourceName=Canola
          MicroClimate: a_interception=0; b_interception=1; c_interception=0; d_interception=0; SoilHeatFluxFraction=0.4; MinimumHeightDiffForNewLayer=0; NightInterceptionFraction=0.5; ReferenceHeight=2
          Report SowingReport: EventNames=[Canola].Sowing
            VariableNames:
              [Clock].Today
              [Canola].SowingData.Cultivar
              [IWeather].Latitude
              [IWeather].Longitude
        SoilArbitrator
      Simulation Galong_01_S1
        Clock: Start=2001-01-01; End=2001-12-31
        Summary summaryfile
        Weather: FileName=met/galong_01.met
        Zone paddock: Area=1; Slope=0; AspectAngle=0; Altitude=50
          Report outputfile: same as Incomplete.Southern NSW.Ardlethan_03_S1.paddock.outputfile
          Operations
            2001-04-09  // 'soil nitrogen' set no3ppm = 104.0 18.0 13.0 12.0 15.5 19.0 20.0 21.0 18.0 15.0 11.5 8.0 6.5 5.0 3.4 1.8 1.8 1.8 1.8 1.8
            2001-04-09  // 'soil water' set sw = 0.111 0.163 0.169 0.187 0.209 0.23 0.231 0.232 0.227 0.222 0.213 0.204 0.203 0.202 0.202 0.202 0.202 0.202 0.202 0.202
            2001-04-30  // surfaceom reset
            2001-04-30  // canola sow cultivar = rainbow, plants = 50 (/m2), sowing_depth = 20 (mm), row_spacing = 300
          Manager
```csharp
using Models.Soils;
using System;
using Models.Core;
using Models.PMF;
namespace Models
{
    [Serializable]
    [System.Xml.Serialization.XmlInclude(typeof(Model))]
    public class Script : Model
    {
        [Link] Clock Clock;

        [EventSubscribe("StartOfSimulation")]
        private void OnSimulationCommencing(object sender, EventArgs e)
        {
            /*
                
            samp_start_sw = 0
            rain_samp_start_sw = 0
            rain_samp_finish_sw = 0
            sim_start_sw = 0
            sim_finish_sw = 0
            cum_days = 0
            pre_sow_rain = 0
            flower_flag = 0
            grain_fill_rain = 0
            sum_rain = 0
            in_crop_rain = 0
            num_rain_events = 0
            
            */
        }
        [EventSubscribe("DoManagement")]
        private void OnDoManagement(object sender, EventArgs e)
        {
            /*
                
               if (daysaftersowing = 1) then
                  cum_temp = 0
                  cum_swdef = 0
                  cum_days = 0
               elseif (stagename = 'start_grain_fill' or
                             stagename = 'end_grain_fill' or
                             stagename = 'maturity' or
                             stagename = 'harvest_ripe') then
                  cum_temp = cum_temp + (maxt + mint) / 2
                  cum_swdef = cum_swdef + swdef_photo
                  cum_days = cum_days + 1
               endif
               ! calculate canola oil content
               if (cum_days > 0) then
                  avg_temp = cum_temp / cum_days
                  avg_swdef = cum_swdef / cum_days
                  if (avg_temp <= 14) then
                     oil_conc =  47
                  else
                     oil_conc = (47 - ((avg_temp - 14)*1.21)) - (1.91*(1 - avg_swdef^2))
                  endif
               else
                  oil_conc = 0
               endif
            
            */
            /*
                
            if year = 2001 and day = 98 then
              sim_start_sw = esw
            endif
            
            */
        }
        [EventSubscribe("DoCalculations")]
        private void OnDoCalculations(object sender, EventArgs e)
        {
            /*
                
            if day = 100 then
                 accum_es = 0
            endif
            if canola.daysaftersowing = 1 then
               start_esw = esw
               sow_day = day
            endif
            if canola.plant_status = 'out' then
               pre_sow_rain = pre_sow_rain + rain
            endif
            if canola.daysaftersowing > 0 then
                 accum_es = accum_es + es
                 in_crop_rain = in_crop_rain + rain
            endif
            if canola.daysaftersowing > 0 and rain > 3 then
                 num_rain_events = num_rain_events + 1
            endif
            if canola.stagename = 'flowering' and flower_flag = 0 then
               pre_flower_rain = in_crop_rain
               pre_flower_rain_events = num_rain_events
               flower_lai = lai
               flower_flag = 1
               grain_fill_rain = 0
            endif
            grain_fill_rain = grain_fill_rain + rain
            if canola.stagename = 'harvest_ripe' or canola.plant_status = 'dead' then
               total_rain_events = num_rain_events
               end_esw = esw
               canola harvest
               canola kill_crop
               canola end_crop
               in_crop_rain = 0
               crop_in = 0
               flower_flag = 0
               pre_sow_rain = 0
            endif
            if month = 1 and is_end_month = 1 then
              jan_rain = sum_rain
              sum_rain = 0
            endif
            if month = 2 and is_end_month = 1 then
              feb_rain = sum_rain
              sum_rain = 0
            endif
            if month = 3 and is_end_month = 1 then
              mar_rain = sum_rain
              sum_rain = 0
            endif
            if month = 4 and is_end_month = 1 then
              apr_rain = sum_rain
              sum_rain = 0
            endif
            if month = 5 and is_end_month = 1 then
              may_rain = sum_rain
              sum_rain = 0
            endif
            if month = 6 and is_end_month = 1 then
              jun_rain = sum_rain
              sum_rain = 0
            endif
            if month = 7 and is_end_month = 1 then
              jul_rain = sum_rain
              sum_rain = 0
            endif
            if month = 8 and is_end_month = 1 then
              aug_rain = sum_rain
              sum_rain = 0
            endif
            if month = 9 and is_end_month = 1 then
              sep_rain = sum_rain
              sum_rain = 0
            endif
            if month = 10 and is_end_month = 1 then
              oct_rain = sum_rain
              sum_rain = 0
            endif
            if month = 11 and is_end_month = 1 then
              nov_rain = sum_rain
              sum_rain = 0
            endif
            if month = 12 and is_end_month = 1 then
              dec_rain = sum_rain
              sum_rain = 0
            endif
            sum_rain = sum_rain + rain
            !!!!!!!!!!!!!!!!!!!!!!!!!!!!!!!!!!  residue  !!!!!!!!!!!!!!!!!!!!!!!!!!!!!!!!!!
            
            */
            /*
                
            if year = 2001 and day = 99 then
              samp_start_sw = esw
              rain_samp_start_sw = pre_sow_rain
            endif
            
            */
        }
    }
}
```
          Soil: Latitude=0; Longitude=0
            Water: Thickness=[100, 100, 100, 150, 200, 200, 200, 200, 200, 800]; FilledFromTop=false
              InitialValues=[0.103, 0.128, 0.135, 0.153, 0.17, 0.18, 0.18, 0.18, 0.18, 0.18]
            Physical
              Thickness  BD    AirDry  LL15   DUL   SAT
              100        1.22  0.073   0.103  0.2   0.51
              100        1.45  0.098   0.128  0.22  0.423
              100        1.45  0.105   0.135  0.22  0.423
              150        1.45  0.123   0.153  0.23  0.423
              200        1.45  0.163   0.17   0.25  0.423
              200        1.5   0.16    0.18   0.26  0.404
              200        1.5   0.16    0.18   0.26  0.404
              200        1.5   0.16    0.18   0.26  0.404
              200        1.5   0.16    0.18   0.26  0.404
              800        1.5   0.16    0.18   0.26  0.404
              SoilCrop canola
                LL=[0.103, 0.128, 0.135, 0.153, 0.17, 0.18, 0.18, 0.18, 0.18, 0.18]
                KL=[0.08, 0.08, 0.08, 0.08, 0.08, 0.07, 0.06, 0.05, 0.03, 0.03]
                XF=[1, 1, 1, 1, 1, 1, 1, 1, 1, 1]
            WaterBalance SoilWater: SummerDate=1-Nov; SummerU=6; SummerCona=3.5; WinterDate=1-Apr; WinterU=6; WinterCona=3.5; DiffusConst=88; DiffusSlope=35.4; Salb=0.13; CN2Bare=72; CNRed=20; CNCov=0.8; PSIDul=-100; Thickness=[100, 100, 100, 150, 200, 200, 200, 200, 200, 800]; SWCON=[0.4, 0.4, 0.4, 0.4, 0.4, 0.4, 0.4, 0.4, 0.4, 0.4]
            Organic: FOMCNRatio=50; CarbonUnits=Total
              Thickness  Carbon  SoilCNRatio  FBiom  FInert  FOM
              100        1.3     14.5         0.04   0.45    206.7762
              100        1       14.5         0.02   0.47    180.965
              100        0.8     14.5         0.02   0.5     158.3757
              150        0.62    14.5         0.01   0.55    129.6671
              200        0.42    14.5         0.01   0.59    99.3157
              200        0.22    14.5         0.01   0.6     76.0687
              200        0.19    14.5         0.01   0.84    58.2632
              200        0.17    14.5         0.01   0.8     44.6254
              200        0.15    14.5         0.01   0.8     34.1799
              800        0.12    14.5         0.01   0.99    11.7631
            Chemical: Thickness=[100, 100, 100, 150, 200, 200, 200, 200, 200, 800]; PH=[5.8, 5.9, 6.6, 6.8, 7, 7.1, 7.2, 7.3, 7.4, 7.4]; PHUnits=Water
            Nutrient
            Solute NO3: Thickness=[100, 100, 100, 150, 200, 200, 200, 200, 200, 800]; InitialValues=[60, 17, 11, 6, 5, 8, 9, 7, 5, 3]; InitialValuesUnits=ppm; WaterTableConcentration=0; D0=0; DepthConstant=0; MaxDepthSoluteAccessible=0; RunoffEffectivenessAtMovingSolute=0; MaxEffectiveRunoff=0
            Solute NH4: Thickness=[100, 100, 100, 150, 200, 200, 200, 200, 200, 800]; InitialValues=[0, 0, 0, 0, 0, 0, 0, 0, 0, 0]; InitialValuesUnits=ppm; WaterTableConcentration=0; D0=0; DepthConstant=0; MaxDepthSoluteAccessible=0; RunoffEffectivenessAtMovingSolute=0; MaxEffectiveRunoff=0
            Solute Urea: Thickness=[100, 100, 100, 150, 200, 200, 200, 200, 200, 800]; InitialValues=[0, 0, 0, 0, 0, 0, 0, 0, 0, 0]; InitialValuesUnits=kg/ha; WaterTableConcentration=0; D0=0; DepthConstant=0; MaxDepthSoluteAccessible=0; RunoffEffectivenessAtMovingSolute=0; MaxEffectiveRunoff=0
            SoilTemperature Temperature
          SurfaceOrganicMatter SurfaceOM: InitialResidueName=wheat; InitialResidueType=wheat; InitialResidueMass=2000; InitialStandingFraction=0; InitialCPR=0; InitialCNR=76
          Plant canola: ResourceName=Canola
          MicroClimate: a_interception=0; b_interception=1; c_interception=0; d_interception=0; SoilHeatFluxFraction=0.4; MinimumHeightDiffForNewLayer=0; NightInterceptionFraction=0.5; ReferenceHeight=2
          Report SowingReport: EventNames=[Canola].Sowing
            VariableNames:
              [Clock].Today
              [Canola].SowingData.Cultivar
              [IWeather].Latitude
              [IWeather].Longitude
        SoilArbitrator
      Simulation Galong_01_S2
        Clock: Start=2001-01-01; End=2001-12-31
        Summary summaryfile
        Weather: FileName=met/galong_01.met
        Zone paddock: Area=1; Slope=0; AspectAngle=0; Altitude=50
          Report outputfile: same as Incomplete.Southern NSW.Ardlethan_03_S1.paddock.outputfile
          Operations
            2001-04-09  // 'soil nitrogen' set no3ppm = 111.0 13.6 19.2 15.4 15.1 14.8 11.95 9.1 6.25 3.4 3.2 3.0 2.2 1.4 1.4 1.4 1.4 1.4 1.4 1.4
            2001-04-09  // 'soil water' set sw = 0.111 0.163 0.169 0.187 0.209 0.23 0.231 0.232 0.227 0.222 0.213 0.204 0.203 0.202 0.202 0.202 0.202 0.202 0.202 0.202
            2001-05-14  // surfaceom reset
            2001-05-14  // canola sow cultivar = rainbow, plants = 50 (/m2), sowing_depth = 20 (mm), row_spacing = 300
          Manager: same as Incomplete.Southern NSW.Galong_01_S1.paddock.manager
          Soil: same as Incomplete.Southern NSW.Galong_01_S1.paddock.soil
          SurfaceOrganicMatter SurfaceOM: InitialResidueName=wheat; InitialResidueType=wheat; InitialResidueMass=2000; InitialStandingFraction=0; InitialCPR=0; InitialCNR=76
          Plant canola: ResourceName=Canola
          MicroClimate: a_interception=0; b_interception=1; c_interception=0; d_interception=0; SoilHeatFluxFraction=0.4; MinimumHeightDiffForNewLayer=0; NightInterceptionFraction=0.5; ReferenceHeight=2
          Report SowingReport: EventNames=[Canola].Sowing
            VariableNames:
              [Clock].Today
              [Canola].SowingData.Cultivar
              [IWeather].Latitude
              [IWeather].Longitude
        SoilArbitrator
      Simulation Galong_01_S3
        Clock: Start=2001-01-01; End=2001-12-31
        Summary summaryfile
        Weather: FileName=met/galong_01.met
        Zone paddock: Area=1; Slope=0; AspectAngle=0; Altitude=50
          Report outputfile: same as Incomplete.Southern NSW.Ardlethan_03_S1.paddock.outputfile
          Operations
            2001-04-09  // 'soil nitrogen' set no3ppm = 93.0 6.4 5.5 5.6 6.5 7.4 6.25 5.1 4.2 3.3 2.7 2.1 2.05 2.0 1.85 1.7 1.7 1.7 1.7 1.7
            2001-04-09  // 'soil water' set sw = 0.111 0.163 0.169 0.187 0.209 0.23 0.231 0.232 0.227 0.222 0.213 0.204 0.203 0.202 0.202 0.202 0.202 0.202 0.202 0.202
            2001-05-28  // surfaceom reset
            2001-05-28  // canola sow cultivar = rainbow, plants = 50 (/m2), sowing_depth = 20 (mm), row_spacing = 300
          Manager: same as Incomplete.Southern NSW.Galong_01_S1.paddock.manager
          Soil: same as Incomplete.Southern NSW.Galong_01_S1.paddock.soil
          SurfaceOrganicMatter SurfaceOM: InitialResidueName=wheat; InitialResidueType=wheat; InitialResidueMass=2000; InitialStandingFraction=0; InitialCPR=0; InitialCNR=76
          Plant canola: ResourceName=Canola
          MicroClimate: a_interception=0; b_interception=1; c_interception=0; d_interception=0; SoilHeatFluxFraction=0.4; MinimumHeightDiffForNewLayer=0; NightInterceptionFraction=0.5; ReferenceHeight=2
          Report SowingReport: EventNames=[Canola].Sowing
            VariableNames:
              [Clock].Today
              [Canola].SowingData.Cultivar
              [IWeather].Latitude
              [IWeather].Longitude
        SoilArbitrator
      Simulation
        Clock: Start=2002-01-01; End=2002-12-31
        Summary summaryfile
        Weather: FileName=met/wallendbeen_02.met
        Zone paddock: Area=1; Slope=0; AspectAngle=0; Altitude=50
          Report outputfile: same as Incomplete.Southern NSW.Ardlethan_03_S1.paddock.outputfile
          Operations
            2002-04-30  // canola sow cultivar = rainbow, plants = 40 (/m2), sowing_depth = 10 (mm), row_spacing = 300
            2002-04-30  Fertiliser.Apply(33, Fertiliser.Types., 30);
            2002-04-24  // 'soil nitrogen' set no3ppm = 45.0 10.5 7.1 6.9 6.4 6.0 4.5 3.1 2.8 2.4 2.3 2.2 2.1 1.9 1.4 0.9 0.9 0.9 0.9 0.9
            2002-04-24  // 'soil water' set sw = 0.186 0.211 0.192 0.239 0.285 0.327 0.324 0.310 0.279 0.248 0.246 0.244 0.237 0.231 0.239 0.247 0.247 0.247 0.247 0.247
            2002-07-24  Fertiliser.Apply(46, Fertiliser.Types., 30);
          Manager
```csharp
using Models.Soils;
using System;
using Models.Core;
using Models.PMF;
namespace Models
{
    [Serializable]
    [System.Xml.Serialization.XmlInclude(typeof(Model))]
    public class Script : Model
    {
        [Link] Clock Clock;

        [EventSubscribe("StartOfSimulation")]
        private void OnSimulationCommencing(object sender, EventArgs e)
        {
            /*
                
            samp_start_sw = 0
            rain_samp_start_sw = 0
            rain_samp_finish_sw = 0
            sim_start_sw = 0
            sim_finish_sw = 0
            cum_days = 0
            pre_sow_rain = 0
            flower_flag = 0
            grain_fill_rain = 0
            sum_rain = 0
            in_crop_rain = 0
            num_rain_events = 0
            
            */
        }
        [EventSubscribe("DoManagement")]
        private void OnDoManagement(object sender, EventArgs e)
        {
            /*
                
               if (daysaftersowing = 1) then
                  cum_temp = 0
                  cum_swdef = 0
                  cum_days = 0
               elseif (stagename = 'start_grain_fill' or
                             stagename = 'end_grain_fill' or
                             stagename = 'maturity' or
                             stagename = 'harvest_ripe') then
                  cum_temp = cum_temp + (maxt + mint) / 2
                  cum_swdef = cum_swdef + swdef_photo
                  cum_days = cum_days + 1
               endif
               ! calculate canola oil content
               if (cum_days > 0) then
                  avg_temp = cum_temp / cum_days
                  avg_swdef = cum_swdef / cum_days
                  if (avg_temp <= 14) then
                     oil_conc =  47
                  else
                     oil_conc = (47 - ((avg_temp - 14)*1.21)) - (1.91*(1 - avg_swdef^2))
                  endif
               else
                  oil_conc = 0
               endif
            
            */
            /*
                
            if year = 2002 and day = 113 then
              sim_start_sw = esw
            endif
            
            */
        }
        [EventSubscribe("DoCalculations")]
        private void OnDoCalculations(object sender, EventArgs e)
        {
            /*
                
            if day = 100 then
                 accum_es = 0
            endif
            if canola.daysaftersowing = 1 then
               start_esw = esw
               sow_day = day
            endif
            if canola.plant_status = 'out' then
               pre_sow_rain = pre_sow_rain + rain
            endif
            if canola.daysaftersowing > 0 then
                 accum_es = accum_es + es
                 in_crop_rain = in_crop_rain + rain
            endif
            if canola.daysaftersowing > 0 and rain > 3 then
                 num_rain_events = num_rain_events + 1
            endif
            if canola.stagename = 'flowering' and flower_flag = 0 then
               pre_flower_rain = in_crop_rain
               pre_flower_rain_events = num_rain_events
               flower_lai = lai
               flower_flag = 1
               grain_fill_rain = 0
            endif
            grain_fill_rain = grain_fill_rain + rain
            if canola.stagename = 'harvest_ripe' or canola.plant_status = 'dead' then
               total_rain_events = num_rain_events
               end_esw = esw
               canola harvest
               canola kill_crop
               canola end_crop
               in_crop_rain = 0
               crop_in = 0
               flower_flag = 0
               pre_sow_rain = 0
            endif
            if month = 1 and is_end_month = 1 then
              jan_rain = sum_rain
              sum_rain = 0
            endif
            if month = 2 and is_end_month = 1 then
              feb_rain = sum_rain
              sum_rain = 0
            endif
            if month = 3 and is_end_month = 1 then
              mar_rain = sum_rain
              sum_rain = 0
            endif
            if month = 4 and is_end_month = 1 then
              apr_rain = sum_rain
              sum_rain = 0
            endif
            if month = 5 and is_end_month = 1 then
              may_rain = sum_rain
              sum_rain = 0
            endif
            if month = 6 and is_end_month = 1 then
              jun_rain = sum_rain
              sum_rain = 0
            endif
            if month = 7 and is_end_month = 1 then
              jul_rain = sum_rain
              sum_rain = 0
            endif
            if month = 8 and is_end_month = 1 then
              aug_rain = sum_rain
              sum_rain = 0
            endif
            if month = 9 and is_end_month = 1 then
              sep_rain = sum_rain
              sum_rain = 0
            endif
            if month = 10 and is_end_month = 1 then
              oct_rain = sum_rain
              sum_rain = 0
            endif
            if month = 11 and is_end_month = 1 then
              nov_rain = sum_rain
              sum_rain = 0
            endif
            if month = 12 and is_end_month = 1 then
              dec_rain = sum_rain
              sum_rain = 0
            endif
            sum_rain = sum_rain + rain
            !!!!!!!!!!!!!!!!!!!!!!!!!!!!!!!!!!  residue  !!!!!!!!!!!!!!!!!!!!!!!!!!!!!!!!!!
            
            */
            /*
                
            if year = 2002 and day = 114 then
              samp_start_sw = esw
              rain_samp_start_sw = pre_sow_rain
            endif
            
            */
        }
    }
}
```
          Soil: Latitude=0; Longitude=0
            Water: FilledFromTop=false
              Thickness=[100, 100, 100, 100, 100, 100, 100, 100, 100, 100, 100, 100, 100, 100, 100, 100, 100, 100, 100, 300]
              InitialValues=[0.12, 0.15, 0.16, 0.16, 0.19, 0.197, 0.225, 0.226, 0.227, 0.225, 0.223, 0.217, 0.21, 0.206, 0.203, 0.2, 0.2, 0.2, 0.2, 0.2]
            Physical
              Thickness  BD    AirDry  LL15   DUL    SAT
              100        1.22  0.06    0.12   0.178  0.51
              100        1.46  0.06    0.15   0.242  0.419
              100        1.32  0.06    0.16   0.225  0.472
              100        1.43  0.06    0.16   0.232  0.43
              100        1.45  0.06    0.19   0.29   0.423
              100        1.45  0.06    0.197  0.32   0.423
              100        1.5   0.06    0.225  0.32   0.404
              100        1.5   0.06    0.226  0.31   0.404
              100        1.5   0.06    0.227  0.31   0.404
              100        1.5   0.06    0.225  0.3    0.404
              100        1.5   0.06    0.223  0.283  0.404
              100        1.5   0.06    0.217  0.281  0.404
              100        1.5   0.06    0.21   0.274  0.404
              100        1.5   0.06    0.206  0.267  0.404
              100        1.5   0.06    0.203  0.274  0.404
              100        1.5   0.06    0.2    0.28   0.404
              100        1.5   0.06    0.2    0.28   0.404
              100        1.5   0.06    0.2    0.28   0.404
              100        1.5   0.06    0.2    0.28   0.404
              300        1.5   0.06    0.2    0.28   0.404
              SoilCrop canola
                LL=[0.12, 0.15, 0.16, 0.16, 0.19, 0.197, 0.225, 0.226, 0.227, 0.225, 0.223, 0.217, 0.21, 0.206, 0.203, 0.2, 0.2, 0.2, 0.2, 0.2]
                KL=[0.08, 0.08, 0.08, 0.08, 0.08, 0.08, 0.08, 0.08, 0.08, 0.07, 0.07, 0.06, 0.06, 0.05, 0.05, 0.04, 0.04, 0.03, 0.02, 0.01]
                XF=[1, 1, 1, 1, 1, 1, 1, 1, 1, 1, 1, 1, 1, 1, 1, 1, 1, 1, 1, 1]
            WaterBalance SoilWater: SummerDate=1-Nov; SummerU=6; SummerCona=3.5; WinterDate=1-Apr; WinterU=6; WinterCona=3.5; DiffusConst=88; DiffusSlope=35.4; Salb=0.13; CN2Bare=72; CNRed=20; CNCov=0.8; PSIDul=-100
              Thickness=[100, 100, 100, 100, 100, 100, 100, 100, 100, 100, 100, 100, 100, 100, 100, 100, 100, 100, 100, 300]
              SWCON=[0.4, 0.4, 0.4, 0.4, 0.4, 0.4, 0.4, 0.4, 0.4, 0.4, 0.4, 0.4, 0.4, 0.4, 0.4, 0.4, 0.4, 0.4, 0.4, 0.4]
            Organic: FOMCNRatio=30; CarbonUnits=Total
              Thickness  Carbon  SoilCNRatio  FBiom  FInert  FOM
              100        1.8     14.5         0.07   0.36    273.4564
              100        1.1     14.5         0.03   0.35    238.5976
              100        1       14.5         0.03   0.45    208.1825
              100        0.62    14.5         0.02   0.45    181.6445
              100        0.42    14.5         0.02   0.59    158.4894
              100        0.22    14.5         0.02   0.6     138.286
              100        0.19    14.5         0.02   0.84    120.658
              100        0.17    14.5         0.02   0.8     105.2772
              100        0.15    14.5         0.01   0.8     91.857
              100        0.12    14.5         0.01   0.99    80.1476
              100        0.11    14.5         0.01   0.99    69.9308
              100        0.1     14.5         0.01   0.99    61.0164
              100        0.1     14.5         0.01   0.99    53.2383
              100        0.1     14.5         0.01   0.99    46.4518
              100        0.1     14.5         0.01   0.99    40.5304
              100        0.1     14.5         0.01   0.99    35.3638
              100        0.08    14.5         0.01   0.99    30.8558
              100        0.06    14.5         0.01   0.99    26.9224
              100        0.05    14.5         0.01   0.99    23.4905
              300        0.04    14.5         0.01   0.99    15.6037
            Chemical: PHUnits=Water
              Thickness=[100, 100, 100, 100, 100, 100, 100, 100, 100, 100, 100, 100, 100, 100, 100, 100, 100, 100, 100, 300]
              PH=[5.8, 5.9, 6.6, 6.8, 7, 7.1, 7.2, 7.3, 7.4, 7.4, 7.6, 7.8, 8, 8.2, 8.3, 8.4, 8.4, 8.5, 8.5, 8.5]
            Nutrient
            Solute NO3: InitialValuesUnits=ppm; WaterTableConcentration=0; D0=0; DepthConstant=0; MaxDepthSoluteAccessible=0; RunoffEffectivenessAtMovingSolute=0; MaxEffectiveRunoff=0
              Thickness=[100, 100, 100, 100, 100, 100, 100, 100, 100, 100, 100, 100, 100, 100, 100, 100, 100, 100, 100, 300]
              InitialValues=[0.65, 0.5, 0.5, 0.4, 0.4, 0.25, 0.25, 0.25, 0.25, 0.25, 0.25, 0.25, 0.25, 0.25, 0.25, 0.25, 0.25, 0.25, 0.25, 0.25]
            Solute NH4: InitialValuesUnits=ppm; WaterTableConcentration=0; D0=0; DepthConstant=0; MaxDepthSoluteAccessible=0; RunoffEffectivenessAtMovingSolute=0; MaxEffectiveRunoff=0
              Thickness=[100, 100, 100, 100, 100, 100, 100, 100, 100, 100, 100, 100, 100, 100, 100, 100, 100, 100, 100, 300]
              InitialValues=[0.62, 0.09, 0.09, 0.065, 0.055, 0.08, 0.08, 0.08, 0.08, 0.08, 0.08, 0.08, 0.08, 0.08, 0.08, 0.08, 0.08, 0.08, 0.08, 0.08]
            Solute Urea: InitialValuesUnits=kg/ha; WaterTableConcentration=0; D0=0; DepthConstant=0; MaxDepthSoluteAccessible=0; RunoffEffectivenessAtMovingSolute=0; MaxEffectiveRunoff=0
              Thickness=[100, 100, 100, 100, 100, 100, 100, 100, 100, 100, 100, 100, 100, 100, 100, 100, 100, 100, 100, 300]
              InitialValues=[0, 0, 0, 0, 0, 0, 0, 0, 0, 0, 0, 0, 0, 0, 0, 0, 0, 0, 0, 0]
            SoilTemperature Temperature
          SurfaceOrganicMatter SurfaceOM: InitialResidueName=wheat; InitialResidueType=wheat; InitialResidueMass=2000; InitialStandingFraction=0; InitialCPR=0; InitialCNR=76
          Plant canola: ResourceName=Canola
          MicroClimate: a_interception=0; b_interception=1; c_interception=0; d_interception=0; SoilHeatFluxFraction=0.4; MinimumHeightDiffForNewLayer=0; NightInterceptionFraction=0.5; ReferenceHeight=2
          Report SowingReport: EventNames=[Canola].Sowing
            VariableNames:
              [Clock].Today
              [Canola].SowingData.Cultivar
              [IWeather].Latitude
              [IWeather].Longitude
        SoilArbitrator
      Simulation simulation1
        Clock: Start=2002-01-01; End=2002-12-31
        Summary summaryfile
        Weather: FileName=met/wallendbeen_02.met
        Zone paddock: Area=1; Slope=0; AspectAngle=0; Altitude=50
          Report outputfile: same as Incomplete.Southern NSW.Ardlethan_03_S1.paddock.outputfile
          Operations
            2002-05-14  // canola sow cultivar = rainbow, plants = 40 (/m2), sowing_depth = 10 (mm), row_spacing = 300
            2002-05-14  Fertiliser.Apply(33, Fertiliser.Types., 30);
            2002-04-24  // 'soil nitrogen' set no3ppm = 45.0 10.5 7.1 6.9 6.4 6.0 4.5 3.1 2.8 2.4 2.3 2.2 2.1 1.9 1.4 0.9 0.9 0.9 0.9 0.9
            2002-04-24  // 'soil water' set sw = 0.186 0.211 0.192 0.239 0.285 0.327 0.324 0.310 0.279 0.248 0.246 0.244 0.237 0.231 0.239 0.247 0.247 0.247 0.247 0.247
            2002-07-24  Fertiliser.Apply(46, Fertiliser.Types., 30);
          Manager: same as Incomplete.Southern NSW.simulation.paddock.manager
          Soil: Latitude=0; Longitude=0
            Physical: same as Incomplete.Southern NSW.simulation.paddock.soil.Physical
            WaterBalance SoilWater: same as Incomplete.Southern NSW.simulation.paddock.soil.SoilWater
            Organic: same as Incomplete.Southern NSW.simulation.paddock.soil.Organic
            Chemical: same as Incomplete.Southern NSW.simulation.paddock.soil.Chemical
            Water: FilledFromTop=false
              Thickness=[100, 100, 100, 100, 100, 100, 100, 100, 100, 100, 100, 100, 100, 100, 100, 100, 100, 100, 100, 300]
              InitialValues=[0.12, 0.15, 0.16, 0.16, 0.19, 0.197, 0.225, 0.226, 0.227, 0.225, 0.223, 0.217, 0.21, 0.206, 0.203, 0.2, 0.2, 0.2, 0.2, 0.2]
            Nutrient
            Solute NO3: same as Incomplete.Southern NSW.simulation.paddock.soil.NO3
            Solute NH4: same as Incomplete.Southern NSW.simulation.paddock.soil.NH4
            Solute Urea: same as Incomplete.Southern NSW.simulation.paddock.soil.Urea
            SoilTemperature Temperature
          SurfaceOrganicMatter SurfaceOM: InitialResidueName=wheat; InitialResidueType=wheat; InitialResidueMass=2000; InitialStandingFraction=0; InitialCPR=0; InitialCNR=76
          Plant canola: ResourceName=Canola
          MicroClimate: a_interception=0; b_interception=1; c_interception=0; d_interception=0; SoilHeatFluxFraction=0.4; MinimumHeightDiffForNewLayer=0; NightInterceptionFraction=0.5; ReferenceHeight=2
          Report SowingReport: EventNames=[Canola].Sowing
            VariableNames:
              [Clock].Today
              [Canola].SowingData.Cultivar
              [IWeather].Latitude
              [IWeather].Longitude
        SoilArbitrator
      Simulation simulation2
        Clock: Start=2002-01-01; End=2002-12-31
        Summary summaryfile
        Weather: FileName=met/wallendbeen_02.met
        Zone paddock: Area=1; Slope=0; AspectAngle=0; Altitude=50
          Report outputfile: same as Incomplete.Southern NSW.Ardlethan_03_S1.paddock.outputfile
          Operations
            2002-05-28  // canola sow cultivar = rainbow, plants = 40 (/m2), sowing_depth = 10 (mm), row_spacing = 300
            2002-05-28  Fertiliser.Apply(33, Fertiliser.Types., 30);
            2002-04-24  // 'soil nitrogen' set no3ppm = 45.0 10.5 7.1 6.9 6.4 6.0 4.5 3.1 2.8 2.4 2.3 2.2 2.1 1.9 1.4 0.9 0.9 0.9 0.9 0.9
            2002-04-24  // 'soil water' set sw = 0.186 0.211 0.192 0.239 0.285 0.327 0.324 0.310 0.279 0.248 0.246 0.244 0.237 0.231 0.239 0.247 0.247 0.247 0.247 0.247
            2002-07-24  Fertiliser.Apply(46, Fertiliser.Types., 30);
          Manager: same as Incomplete.Southern NSW.simulation.paddock.manager
          Soil: same as Incomplete.Southern NSW.simulation.paddock.soil
          SurfaceOrganicMatter SurfaceOM: InitialResidueName=wheat; InitialResidueType=wheat; InitialResidueMass=2000; InitialStandingFraction=0; InitialCPR=0; InitialCNR=76
          Plant canola: ResourceName=Canola
          MicroClimate: a_interception=0; b_interception=1; c_interception=0; d_interception=0; SoilHeatFluxFraction=0.4; MinimumHeightDiffForNewLayer=0; NightInterceptionFraction=0.5; ReferenceHeight=2
          Report SowingReport: EventNames=[Canola].Sowing
            VariableNames:
              [Clock].Today
              [Canola].SowingData.Cultivar
              [IWeather].Latitude
              [IWeather].Longitude
        SoilArbitrator
      Simulation Galong_03_S1
        Clock: Start=2003-01-01; End=2003-12-31
        Summary summaryfile
        Weather: FileName=met/galong_03.met
        Zone paddock: Area=1; Slope=0; AspectAngle=0; Altitude=50
          Report outputfile: same as Incomplete.Southern NSW.Ardlethan_03_S1.paddock.outputfile
          Operations
            2003-05-01  // canola sow cultivar = rainbow, plants = 15 (/m2), sowing_depth = 10 (mm), row_spacing = 300
            2003-05-01  Fertiliser.Apply(46, Fertiliser.Types., 30);
            2003-05-01  Fertiliser.Apply(12, Fertiliser.Types., 30);
            2003-04-16  // 'soil water' set sw = 0.104 0.132 0.135 0.142 0.173 0.197 0.218 0.228 0.251 0.267
            2003-08-21  Fertiliser.Apply(46, Fertiliser.Types., 30);
            2003-09-11  Fertiliser.Apply(16, Fertiliser.Types., 30);
          Manager
```csharp
using Models.Soils;
using System;
using Models.Core;
using Models.PMF;
namespace Models
{
    [Serializable]
    [System.Xml.Serialization.XmlInclude(typeof(Model))]
    public class Script : Model
    {
        [Link] Clock Clock;

        [EventSubscribe("StartOfSimulation")]
        private void OnSimulationCommencing(object sender, EventArgs e)
        {
            /*
                
            samp_start_sw = 0
            rain_samp_start_sw = 0
            rain_samp_finish_sw = 0
            sim_start_sw = 0
            sim_finish_sw = 0
            cum_days = 0
            pre_sow_rain = 0
            flower_flag = 0
            grain_fill_rain = 0
            sum_rain = 0
            in_crop_rain = 0
            num_rain_events = 0
            
            */
        }
        [EventSubscribe("DoManagement")]
        private void OnDoManagement(object sender, EventArgs e)
        {
            /*
                
               if (daysaftersowing = 1) then
                  cum_temp = 0
                  cum_swdef = 0
                  cum_days = 0
               elseif (stagename = 'start_grain_fill' or
                             stagename = 'end_grain_fill' or
                             stagename = 'maturity' or
                             stagename = 'harvest_ripe') then
                  cum_temp = cum_temp + (maxt + mint) / 2
                  cum_swdef = cum_swdef + swdef_photo
                  cum_days = cum_days + 1
               endif
               ! calculate canola oil content
               if (cum_days > 0) then
                  avg_temp = cum_temp / cum_days
                  avg_swdef = cum_swdef / cum_days
                  if (avg_temp <= 14) then
                     oil_conc =  47
                  else
                     oil_conc = (47 - ((avg_temp - 14)*1.21)) - (1.91*(1 - avg_swdef^2))
                  endif
               else
                  oil_conc = 0
               endif
            
            */
            /*
                
            if year = 2003 and day = 105 then
              sim_start_sw = esw
            endif
            
            */
        }
        [EventSubscribe("DoCalculations")]
        private void OnDoCalculations(object sender, EventArgs e)
        {
            /*
                
            if day = 100 then
                 accum_es = 0
            endif
            if canola.daysaftersowing = 1 then
               start_esw = esw
               sow_day = day
            endif
            if canola.plant_status = 'out' then
               pre_sow_rain = pre_sow_rain + rain
            endif
            if canola.daysaftersowing > 0 then
                 accum_es = accum_es + es
                 in_crop_rain = in_crop_rain + rain
            endif
            if canola.daysaftersowing > 0 and rain > 3 then
                 num_rain_events = num_rain_events + 1
            endif
            if canola.stagename = 'flowering' and flower_flag = 0 then
               pre_flower_rain = in_crop_rain
               pre_flower_rain_events = num_rain_events
               flower_lai = lai
               flower_flag = 1
               grain_fill_rain = 0
            endif
            grain_fill_rain = grain_fill_rain + rain
            if canola.stagename = 'harvest_ripe' or canola.plant_status = 'dead' then
               total_rain_events = num_rain_events
               end_esw = esw
               canola harvest
               canola kill_crop
               canola end_crop
               in_crop_rain = 0
               crop_in = 0
               flower_flag = 0
               pre_sow_rain = 0
            endif
            if month = 1 and is_end_month = 1 then
              jan_rain = sum_rain
              sum_rain = 0
            endif
            if month = 2 and is_end_month = 1 then
              feb_rain = sum_rain
              sum_rain = 0
            endif
            if month = 3 and is_end_month = 1 then
              mar_rain = sum_rain
              sum_rain = 0
            endif
            if month = 4 and is_end_month = 1 then
              apr_rain = sum_rain
              sum_rain = 0
            endif
            if month = 5 and is_end_month = 1 then
              may_rain = sum_rain
              sum_rain = 0
            endif
            if month = 6 and is_end_month = 1 then
              jun_rain = sum_rain
              sum_rain = 0
            endif
            if month = 7 and is_end_month = 1 then
              jul_rain = sum_rain
              sum_rain = 0
            endif
            if month = 8 and is_end_month = 1 then
              aug_rain = sum_rain
              sum_rain = 0
            endif
            if month = 9 and is_end_month = 1 then
              sep_rain = sum_rain
              sum_rain = 0
            endif
            if month = 10 and is_end_month = 1 then
              oct_rain = sum_rain
              sum_rain = 0
            endif
            if month = 11 and is_end_month = 1 then
              nov_rain = sum_rain
              sum_rain = 0
            endif
            if month = 12 and is_end_month = 1 then
              dec_rain = sum_rain
              sum_rain = 0
            endif
            sum_rain = sum_rain + rain
            !!!!!!!!!!!!!!!!!!!!!!!!!!!!!!!!!!  residue  !!!!!!!!!!!!!!!!!!!!!!!!!!!!!!!!!!
            
            */
            /*
                
            if year = 2003 and day = 106 then
              samp_start_sw = esw
              rain_samp_start_sw = pre_sow_rain
            endif
            
            */
        }
    }
}
```
          Soil: Latitude=0; Longitude=0
            Physical
              Thickness  BD    AirDry  LL15   DUL    SAT
              100        1.22  0.073   0.103  0.171  0.51
              100        1.45  0.098   0.128  0.189  0.423
              100        1.45  0.105   0.135  0.198  0.423
              150        1.45  0.123   0.153  0.227  0.423
              200        1.45  0.163   0.193  0.271  0.423
              200        1.5   0.186   0.216  0.292  0.404
              200        1.5   0.21    0.24   0.328  0.404
              200        1.5   0.212   0.242  0.338  0.404
              200        1.5   0.227   0.257  0.356  0.404
              600        1.5   0.237   0.267  0.375  0.404
              SoilCrop canola
                LL=[0.103, 0.128, 0.135, 0.153, 0.193, 0.216, 0.24, 0.242, 0.257, 0.267]
                KL=[0.08, 0.08, 0.08, 0.08, 0.08, 0.07, 0.06, 0.05, 0.03, 0.01]
                XF=[1, 1, 1, 1, 1, 1, 1, 1, 1, 1]
            WaterBalance SoilWater: SummerDate=1-Nov; SummerU=6; SummerCona=3.5; WinterDate=1-Apr; WinterU=6; WinterCona=3.5; DiffusConst=88; DiffusSlope=35.4; Salb=0.13; CN2Bare=72; CNRed=20; CNCov=0.8; PSIDul=-100; Thickness=[100, 100, 100, 150, 200, 200, 200, 200, 200, 600]; SWCON=[0.4, 0.4, 0.4, 0.4, 0.4, 0.4, 0.4, 0.4, 0.4, 0.4]
            Organic: FOMCNRatio=30; CarbonUnits=Total
              Thickness  Carbon  SoilCNRatio  FBiom  FInert  FOM
              100        1.3     14.5         0.04   0.45    432.7805
              100        1       14.5         0.02   0.47    373.8629
              100        0.8     14.5         0.02   0.5     322.9662
              150        0.62    14.5         0.01   0.55    259.3129
              200        0.42    14.5         0.01   0.59    193.5145
              200        0.22    14.5         0.01   0.6     144.4119
              200        0.19    14.5         0.01   0.84    107.7686
              200        0.17    14.5         0.01   0.8     80.4233
              200        0.15    14.5         0.01   0.8     60.0166
              600        0.12    14.5         0.01   0.99    24.9425
            Chemical: Thickness=[100, 100, 100, 150, 200, 200, 200, 200, 200, 600]; PH=[5.8, 5.9, 6.6, 6.8, 7, 7.1, 7.2, 7.3, 7.4, 7.4]; PHUnits=Water
            Water: Thickness=[100, 100, 100, 150, 200, 200, 200, 200, 200, 600]; FilledFromTop=false
              InitialValues=[0.103, 0.128, 0.135, 0.153, 0.193, 0.216, 0.24, 0.242, 0.257, 0.267]
            Nutrient
            Solute NO3: Thickness=[100, 100, 100, 150, 200, 200, 200, 200, 200, 600]; InitialValues=[60.4, 16.8, 10.8, 6.4, 4.9, 7.9, 9.3, 6.9, 4.5, 3.2]; InitialValuesUnits=ppm; WaterTableConcentration=0; D0=0; DepthConstant=0; MaxDepthSoluteAccessible=0; RunoffEffectivenessAtMovingSolute=0; MaxEffectiveRunoff=0
            Solute NH4: Thickness=[100, 100, 100, 150, 200, 200, 200, 200, 200, 600]; InitialValues=[0, 0, 0, 0, 0, 0, 0, 0, 0, 0]; InitialValuesUnits=ppm; WaterTableConcentration=0; D0=0; DepthConstant=0; MaxDepthSoluteAccessible=0; RunoffEffectivenessAtMovingSolute=0; MaxEffectiveRunoff=0
            Solute Urea: Thickness=[100, 100, 100, 150, 200, 200, 200, 200, 200, 600]; InitialValues=[0, 0, 0, 0, 0, 0, 0, 0, 0, 0]; InitialValuesUnits=kg/ha; WaterTableConcentration=0; D0=0; DepthConstant=0; MaxDepthSoluteAccessible=0; RunoffEffectivenessAtMovingSolute=0; MaxEffectiveRunoff=0
            SoilTemperature Temperature
          SurfaceOrganicMatter SurfaceOM: InitialResidueName=wheat; InitialResidueType=wheat; InitialResidueMass=2000; InitialStandingFraction=0; InitialCPR=0; InitialCNR=76
          Plant canola: ResourceName=Canola
          MicroClimate: a_interception=0; b_interception=1; c_interception=0; d_interception=0; SoilHeatFluxFraction=0.4; MinimumHeightDiffForNewLayer=0; NightInterceptionFraction=0.5; ReferenceHeight=2
          Report SowingReport: EventNames=[Canola].Sowing
            VariableNames:
              [Clock].Today
              [Canola].SowingData.Cultivar
              [IWeather].Latitude
              [IWeather].Longitude
        SoilArbitrator
      Simulation Galong_03_S2
        Clock: Start=2003-01-01; End=2003-12-31
        Summary summaryfile
        Weather: FileName=met/galong_03.met
        Zone paddock: Area=1; Slope=0; AspectAngle=0; Altitude=50
          Report outputfile: same as Incomplete.Southern NSW.Ardlethan_03_S1.paddock.outputfile
          Operations
            2003-06-05  // canola sow cultivar = rainbow, plants = 40 (/m2), sowing_depth = 10 (mm), row_spacing = 300
            2003-05-13  Fertiliser.Apply(46, Fertiliser.Types., 30);
            2003-05-13  Fertiliser.Apply(12, Fertiliser.Types., 30);
            2003-04-16  // 'soil water' set sw = 0.104 0.132 0.135 0.142 0.173 0.197 0.218 0.228 0.251 0.267
            2003-08-21  Fertiliser.Apply(46, Fertiliser.Types., 30);
            2003-09-11  Fertiliser.Apply(16, Fertiliser.Types., 30);
          Manager: same as Incomplete.Southern NSW.Galong_03_S1.paddock.manager
          Soil: same as Incomplete.Southern NSW.Galong_03_S1.paddock.soil
          SurfaceOrganicMatter SurfaceOM: InitialResidueName=wheat; InitialResidueType=wheat; InitialResidueMass=2000; InitialStandingFraction=0; InitialCPR=0; InitialCNR=76
          Plant canola: ResourceName=Canola
          MicroClimate: a_interception=0; b_interception=1; c_interception=0; d_interception=0; SoilHeatFluxFraction=0.4; MinimumHeightDiffForNewLayer=0; NightInterceptionFraction=0.5; ReferenceHeight=2
          Report SowingReport: EventNames=[Canola].Sowing
            VariableNames:
              [Clock].Today
              [Canola].SowingData.Cultivar
              [IWeather].Latitude
              [IWeather].Longitude
        SoilArbitrator
      Simulation Galong_03_S3
        Clock: Start=2003-01-01; End=2003-12-31
        Summary summaryfile
        Weather: FileName=met/galong_03.met
        Zone paddock: Area=1; Slope=0; AspectAngle=0; Altitude=50
          Report outputfile: same as Incomplete.Southern NSW.Ardlethan_03_S1.paddock.outputfile
          Operations
            2003-06-10  // canola sow cultivar = rainbow, plants = 40 (/m2), sowing_depth = 10 (mm), row_spacing = 300
            2003-06-10  Fertiliser.Apply(46, Fertiliser.Types., 30);
            2003-06-10  Fertiliser.Apply(12, Fertiliser.Types., 30);
            2003-04-16  // 'soil water' set sw = 0.104 0.132 0.135 0.142 0.173 0.197 0.218 0.228 0.251 0.267
            2003-08-21  Fertiliser.Apply(46, Fertiliser.Types., 30);
            2003-09-11  Fertiliser.Apply(16, Fertiliser.Types., 30);
          Manager: same as Incomplete.Southern NSW.Galong_03_S1.paddock.manager
          Soil: same as Incomplete.Southern NSW.Galong_03_S1.paddock.soil
          SurfaceOrganicMatter SurfaceOM: InitialResidueName=wheat; InitialResidueType=wheat; InitialResidueMass=2000; InitialStandingFraction=0; InitialCPR=0; InitialCNR=76
          Plant canola: ResourceName=Canola
          MicroClimate: a_interception=0; b_interception=1; c_interception=0; d_interception=0; SoilHeatFluxFraction=0.4; MinimumHeightDiffForNewLayer=0; NightInterceptionFraction=0.5; ReferenceHeight=2
          Report SowingReport: EventNames=[Canola].Sowing
            VariableNames:
              [Clock].Today
              [Canola].SowingData.Cultivar
              [IWeather].Latitude
              [IWeather].Longitude
        SoilArbitrator
      Simulation Ginnindera_96
        Clock: Start=1996-01-01; End=1996-12-31
        Summary summaryfile
        Weather: FileName=met/ginnind_9697.met
        Zone paddock: Area=1; Slope=0; AspectAngle=0; Altitude=50
          Report outputfile: same as Incomplete.Southern NSW.Ardlethan_03_S1.paddock.outputfile
          Operations
            1996-05-14  // canola sow plants = 70, crop_class = plant, row_spacing = 180, sowing_depth = 20, cultivar = oscar
            1996-05-14  Fertiliser.Apply(18, Fertiliser.Types., 50);
            1996-08-25  Fertiliser.Apply(30, Fertiliser.Types., 50);
            1996-08-26  Fertiliser.Apply(40, Fertiliser.Types., 50);
          Manager
```csharp
using Models.Soils;
using System;
using Models.Core;
using Models.PMF;
namespace Models
{
    [Serializable]
    [System.Xml.Serialization.XmlInclude(typeof(Model))]
    public class Script : Model
    {
        [Link] Clock Clock;

        [EventSubscribe("StartOfSimulation")]
        private void OnSimulationCommencing(object sender, EventArgs e)
        {
            /*
                
            samp_start_sw = 0
            rain_samp_start_sw = 0
            rain_samp_finish_sw = 0
            sim_start_sw = 0
            sim_finish_sw = 0
            cum_days = 0
            pre_sow_rain = 0
            flower_flag = 0
            grain_fill_rain = 0
            sum_rain = 0
            in_crop_rain = 0
            num_rain_events = 0
            
            */
        }
        [EventSubscribe("DoManagement")]
        private void OnDoManagement(object sender, EventArgs e)
        {
            /*
                
               if (daysaftersowing = 1) then
                  cum_temp = 0
                  cum_swdef = 0
                  cum_days = 0
               elseif (stagename = 'start_grain_fill' or
                             stagename = 'end_grain_fill' or
                             stagename = 'maturity' or
                             stagename = 'harvest_ripe') then
                  cum_temp = cum_temp + (maxt + mint) / 2
                  cum_swdef = cum_swdef + swdef_photo
                  cum_days = cum_days + 1
               endif
               ! calculate canola oil content
               if (cum_days > 0) then
                  avg_temp = cum_temp / cum_days
                  avg_swdef = cum_swdef / cum_days
                  if (avg_temp <= 14) then
                     oil_conc =  47
                  else
                     oil_conc = (47 - ((avg_temp - 14)*1.21)) - (1.91*(1 - avg_swdef^2))
                  endif
               else
                  oil_conc = 0
               endif
            
            */
            /*
                
            if year = 1996 and day = 134 then
              sim_start_sw = esw
            endif
            
            */
        }
        [EventSubscribe("DoCalculations")]
        private void OnDoCalculations(object sender, EventArgs e)
        {
            /*
                
            if day = 100 then
                 accum_es = 0
            endif
            if canola.daysaftersowing = 1 then
               start_esw = esw
               sow_day = day
            endif
            if canola.plant_status = 'out' then
               pre_sow_rain = pre_sow_rain + rain
            endif
            if canola.daysaftersowing > 0 then
                 accum_es = accum_es + es
                 in_crop_rain = in_crop_rain + rain
            endif
            if canola.daysaftersowing > 0 and rain > 3 then
                 num_rain_events = num_rain_events + 1
            endif
            if canola.stagename = 'flowering' and flower_flag = 0 then
               pre_flower_rain = in_crop_rain
               pre_flower_rain_events = num_rain_events
               flower_lai = lai
               flower_flag = 1
               grain_fill_rain = 0
            endif
            grain_fill_rain = grain_fill_rain + rain
            if canola.stagename = 'harvest_ripe' or canola.plant_status = 'dead' then
               total_rain_events = num_rain_events
               end_esw = esw
               canola harvest
               canola kill_crop
               canola end_crop
               in_crop_rain = 0
               crop_in = 0
               flower_flag = 0
               pre_sow_rain = 0
            endif
            if month = 1 and is_end_month = 1 then
              jan_rain = sum_rain
              sum_rain = 0
            endif
            if month = 2 and is_end_month = 1 then
              feb_rain = sum_rain
              sum_rain = 0
            endif
            if month = 3 and is_end_month = 1 then
              mar_rain = sum_rain
              sum_rain = 0
            endif
            if month = 4 and is_end_month = 1 then
              apr_rain = sum_rain
              sum_rain = 0
            endif
            if month = 5 and is_end_month = 1 then
              may_rain = sum_rain
              sum_rain = 0
            endif
            if month = 6 and is_end_month = 1 then
              jun_rain = sum_rain
              sum_rain = 0
            endif
            if month = 7 and is_end_month = 1 then
              jul_rain = sum_rain
              sum_rain = 0
            endif
            if month = 8 and is_end_month = 1 then
              aug_rain = sum_rain
              sum_rain = 0
            endif
            if month = 9 and is_end_month = 1 then
              sep_rain = sum_rain
              sum_rain = 0
            endif
            if month = 10 and is_end_month = 1 then
              oct_rain = sum_rain
              sum_rain = 0
            endif
            if month = 11 and is_end_month = 1 then
              nov_rain = sum_rain
              sum_rain = 0
            endif
            if month = 12 and is_end_month = 1 then
              dec_rain = sum_rain
              sum_rain = 0
            endif
            sum_rain = sum_rain + rain
            !!!!!!!!!!!!!!!!!!!!!!!!!!!!!!!!!!  residue  !!!!!!!!!!!!!!!!!!!!!!!!!!!!!!!!!!
            
            */
            /*
                
            if year = 1996 and day = 135 then
              samp_start_sw = esw
              rain_samp_start_sw = pre_sow_rain
            endif
            !!!!!!!!!!!!! ginninderra 1996 oscar
            
            */
        }
    }
}
```
          Soil: Latitude=0; Longitude=0
            Water: FilledFromTop=false
              Thickness=[100, 100, 100, 100, 100, 100, 100, 100, 100, 100, 100, 100, 100, 100, 100, 100, 100, 100, 100, 100]
              InitialValues=[0.073, 0.075, 0.074, 0.12, 0.16, 0.25, 0.25, 0.24, 0.259, 0.281, 0.295, 0.272, 0.269, 0.264, 0.27, 0.27, 0.27, 0.27, 0.27, 0.27]
            Physical
              Thickness  BD    AirDry  LL15   DUL    SAT
              100        1.45  0.04    0.073  0.21   0.414
              100        1.5   0.04    0.075  0.234  0.394
              100        1.55  0.06    0.074  0.22   0.375
              100        1.5   0.1     0.12   0.29   0.394
              100        1.52  0.1     0.16   0.293  0.386
              100        1.55  0.1     0.25   0.37   0.375
              100        1.57  0.1     0.25   0.36   0.367
              100        1.6   0.1     0.24   0.35   0.355
              100        1.62  0.1     0.259  0.34   0.347
              100        1.65  0.1     0.281  0.33   0.335
              100        1.62  0.1     0.295  0.34   0.347
              100        1.6   0.1     0.272  0.35   0.355
              100        1.58  0.1     0.269  0.36   0.363
              100        1.55  0.1     0.264  0.37   0.375
              100        1.55  0.1     0.27   0.37   0.375
              100        1.55  0.1     0.27   0.355  0.375
              100        1.55  0.1     0.27   0.35   0.375
              100        1.55  0.1     0.27   0.333  0.375
              100        1.55  0.1     0.27   0.333  0.375
              100        1.55  0.1     0.27   0.333  0.375
              SoilCrop canola
                LL=[0.073, 0.075, 0.074, 0.12, 0.16, 0.25, 0.25, 0.24, 0.259, 0.281, 0.295, 0.272, 0.269, 0.264, 0.27, 0.27, 0.27, 0.27, 0.27, 0.27]
                KL=[0.08, 0.08, 0.08, 0.08, 0.08, 0.08, 0.08, 0.08, 0.08, 0.07, 0.07, 0.06, 0.06, 0.05, 0.05, 0.04, 0.04, 0.03, 0.02, 0.01]
                XF=[1, 1, 1, 0.8, 0.8, 0.8, 0.8, 0.8, 0.8, 0.8, 0.7, 0.7, 0.7, 0.6, 0.5, 0.4, 0.2, 0.1, 0, 0]
            WaterBalance SoilWater: SummerDate=1-Nov; SummerU=6; SummerCona=3.5; WinterDate=1-Apr; WinterU=6; WinterCona=3.5; DiffusConst=88; DiffusSlope=35.4; Salb=0.13; CN2Bare=72; CNRed=20; CNCov=0.8; PSIDul=-100
              Thickness=[100, 100, 100, 100, 100, 100, 100, 100, 100, 100, 100, 100, 100, 100, 100, 100, 100, 100, 100, 100]
              SWCON=[0.4, 0.4, 0.4, 0.4, 0.4, 0.4, 0.4, 0.4, 0.4, 0.4, 0.4, 0.4, 0.4, 0.4, 0.4, 0.4, 0.4, 0.4, 0.4, 0.4]
            Organic: FOMCNRatio=20; CarbonUnits=Total
              Thickness  Carbon  SoilCNRatio  FBiom  FInert  FOM
              100        0.83    12           0.06   0.2     293.1807
              100        0.35    12           0.05   0.35    252.3429
              100        0.33    12           0.04   0.45    217.1936
              100        0.22    12           0.02   0.45    186.9402
              100        0.22    12           0.02   0.59    160.901
              100        0.22    12           0.02   0.6     138.4887
              100        0.19    12           0.02   0.84    119.1984
              100        0.17    12           0.02   0.8     102.595
              100        0.15    12           0.01   0.8     88.3043
              100        0.12    12           0.01   0.99    76.0042
              100        0.11    12           0.01   0.99    65.4174
              100        0.1     12           0.01   0.99    56.3053
              100        0.1     12           0.01   0.99    48.4624
              100        0.1     12           0.01   0.99    41.712
              100        0.1     12           0.01   0.99    35.9019
              100        0.1     12           0.01   0.99    30.901
              100        0.08    12           0.01   0.99    26.5967
              100        0.06    12           0.01   0.99    22.892
              100        0.05    12           0.01   0.99    19.7034
              100        0.04    12           0.01   0.99    16.9588
            Chemical: PHUnits=Water
              Thickness=[100, 100, 100, 100, 100, 100, 100, 100, 100, 100, 100, 100, 100, 100, 100, 100, 100, 100, 100, 100]
              PH=[5.8, 5.9, 6.6, 6.8, 7, 7.1, 7.2, 7.3, 7.4, 7.4, 7.6, 7.8, 8, 8.2, 8.3, 8.4, 8.4, 8.5, 8.5, 8.5]
            Nutrient
            Solute NO3: InitialValuesUnits=ppm; WaterTableConcentration=0; D0=0; DepthConstant=0; MaxDepthSoluteAccessible=0; RunoffEffectivenessAtMovingSolute=0; MaxEffectiveRunoff=0
              Thickness=[100, 100, 100, 100, 100, 100, 100, 100, 100, 100, 100, 100, 100, 100, 100, 100, 100, 100, 100, 100]
              InitialValues=[30, 25, 20, 20, 7, 6, 6, 4, 4, 4, 4, 4, 4, 4, 4, 4, 4, 4, 4, 4]
            Solute NH4: same as Incomplete.Southern NSW.Dirn_91_S1_150N.paddock.soil.NH4
            Solute Urea: same as Validation.Growth Experiments.Wagga.Wagga2008.WaggaWagga2008.Paddock.Soil.Urea
            SoilTemperature Temperature
          SurfaceOrganicMatter SurfaceOM: InitialResidueName=wheat; InitialResidueType=wheat; InitialResidueMass=2000; InitialStandingFraction=0; InitialCPR=0; InitialCNR=76
          Plant canola: ResourceName=Canola
          MicroClimate: a_interception=0; b_interception=1; c_interception=0; d_interception=0; SoilHeatFluxFraction=0.4; MinimumHeightDiffForNewLayer=0; NightInterceptionFraction=0.5; ReferenceHeight=2
          Report SowingReport: EventNames=[Canola].Sowing
            VariableNames:
              [Clock].Today
              [Canola].SowingData.Cultivar
              [IWeather].Latitude
              [IWeather].Longitude
        SoilArbitrator
      Simulation Ginnindera_97
        Clock: Start=1997-01-01; End=1997-12-31
        Summary summaryfile
        Weather: FileName=met/ginnind_9697.met
        Zone paddock: Area=1; Slope=0; AspectAngle=0; Altitude=50
          Report outputfile: same as Incomplete.Southern NSW.Ardlethan_03_S1.paddock.outputfile
          Operations
            1997-05-14  // canola sow plants = 70, crop_class = plant, row_spacing = 180, sowing_depth = 20, cultivar = monty
            1997-05-14  Fertiliser.Apply(18, Fertiliser.Types., 50);
            1997-10-07  Fertiliser.Apply(50, Fertiliser.Types., 50);
            1997-10-28  Irrigation.Apply(25);
          Manager
```csharp
using Models.Soils;
using System;
using Models.Core;
using Models.PMF;
namespace Models
{
    [Serializable]
    [System.Xml.Serialization.XmlInclude(typeof(Model))]
    public class Script : Model
    {
        [Link] Clock Clock;

        [EventSubscribe("StartOfSimulation")]
        private void OnSimulationCommencing(object sender, EventArgs e)
        {
            /*
                
            samp_start_sw = 0
            rain_samp_start_sw = 0
            rain_samp_finish_sw = 0
            sim_start_sw = 0
            sim_finish_sw = 0
            cum_days = 0
            pre_sow_rain = 0
            flower_flag = 0
            grain_fill_rain = 0
            sum_rain = 0
            in_crop_rain = 0
            num_rain_events = 0
            
            */
        }
        [EventSubscribe("DoManagement")]
        private void OnDoManagement(object sender, EventArgs e)
        {
            /*
                
               if (daysaftersowing = 1) then
                  cum_temp = 0
                  cum_swdef = 0
                  cum_days = 0
               elseif (stagename = 'start_grain_fill' or
                             stagename = 'end_grain_fill' or
                             stagename = 'maturity' or
                             stagename = 'harvest_ripe') then
                  cum_temp = cum_temp + (maxt + mint) / 2
                  cum_swdef = cum_swdef + swdef_photo
                  cum_days = cum_days + 1
               endif
               ! calculate canola oil content
               if (cum_days > 0) then
                  avg_temp = cum_temp / cum_days
                  avg_swdef = cum_swdef / cum_days
                  if (avg_temp <= 14) then
                     oil_conc =  47
                  else
                     oil_conc = (47 - ((avg_temp - 14)*1.21)) - (1.91*(1 - avg_swdef^2))
                  endif
               else
                  oil_conc = 0
               endif
            
            */
            /*
                
            if year = 1997 and day = 133 then
              sim_start_sw = esw
            endif
            
            */
        }
        [EventSubscribe("DoCalculations")]
        private void OnDoCalculations(object sender, EventArgs e)
        {
            /*
                
            if day = 100 then
                 accum_es = 0
            endif
            if canola.daysaftersowing = 1 then
               start_esw = esw
               sow_day = day
            endif
            if canola.plant_status = 'out' then
               pre_sow_rain = pre_sow_rain + rain
            endif
            if canola.daysaftersowing > 0 then
                 accum_es = accum_es + es
                 in_crop_rain = in_crop_rain + rain
            endif
            if canola.daysaftersowing > 0 and rain > 3 then
                 num_rain_events = num_rain_events + 1
            endif
            if canola.stagename = 'flowering' and flower_flag = 0 then
               pre_flower_rain = in_crop_rain
               pre_flower_rain_events = num_rain_events
               flower_lai = lai
               flower_flag = 1
               grain_fill_rain = 0
            endif
            grain_fill_rain = grain_fill_rain + rain
            if canola.stagename = 'harvest_ripe' or canola.plant_status = 'dead' then
               total_rain_events = num_rain_events
               end_esw = esw
               canola harvest
               canola kill_crop
               canola end_crop
               in_crop_rain = 0
               crop_in = 0
               flower_flag = 0
               pre_sow_rain = 0
            endif
            if month = 1 and is_end_month = 1 then
              jan_rain = sum_rain
              sum_rain = 0
            endif
            if month = 2 and is_end_month = 1 then
              feb_rain = sum_rain
              sum_rain = 0
            endif
            if month = 3 and is_end_month = 1 then
              mar_rain = sum_rain
              sum_rain = 0
            endif
            if month = 4 and is_end_month = 1 then
              apr_rain = sum_rain
              sum_rain = 0
            endif
            if month = 5 and is_end_month = 1 then
              may_rain = sum_rain
              sum_rain = 0
            endif
            if month = 6 and is_end_month = 1 then
              jun_rain = sum_rain
              sum_rain = 0
            endif
            if month = 7 and is_end_month = 1 then
              jul_rain = sum_rain
              sum_rain = 0
            endif
            if month = 8 and is_end_month = 1 then
              aug_rain = sum_rain
              sum_rain = 0
            endif
            if month = 9 and is_end_month = 1 then
              sep_rain = sum_rain
              sum_rain = 0
            endif
            if month = 10 and is_end_month = 1 then
              oct_rain = sum_rain
              sum_rain = 0
            endif
            if month = 11 and is_end_month = 1 then
              nov_rain = sum_rain
              sum_rain = 0
            endif
            if month = 12 and is_end_month = 1 then
              dec_rain = sum_rain
              sum_rain = 0
            endif
            sum_rain = sum_rain + rain
            !!!!!!!!!!!!!!!!!!!!!!!!!!!!!!!!!!  residue  !!!!!!!!!!!!!!!!!!!!!!!!!!!!!!!!!!
            
            */
            /*
                
            if year = 1997 and day = 134 then
              samp_start_sw = esw
              rain_samp_start_sw = pre_sow_rain
            endif
            
            */
        }
    }
}
```
          Soil: Latitude=0; Longitude=0
            Water: FilledFromTop=false
              Thickness=[100, 100, 100, 100, 100, 100, 100, 100, 100, 100, 100, 100, 100, 100, 100, 100, 100, 100, 100, 100]
              InitialValues=[0.073, 0.075, 0.074, 0.12, 0.16, 0.25, 0.25, 0.24, 0.259, 0.281, 0.295, 0.272, 0.269, 0.264, 0.27, 0.27, 0.27, 0.27, 0.27, 0.27]
            Physical: same as Incomplete.Southern NSW.Ginnindera_96.paddock.soil.Physical
            WaterBalance SoilWater: same as Incomplete.Southern NSW.Ginnindera_96.paddock.soil.SoilWater
            Organic: same as Incomplete.Southern NSW.Ginnindera_96.paddock.soil.Organic
            Chemical: same as Incomplete.Southern NSW.Ginnindera_96.paddock.soil.Chemical
            Nutrient
            Solute NO3: InitialValuesUnits=ppm; WaterTableConcentration=0; D0=0; DepthConstant=0; MaxDepthSoluteAccessible=0; RunoffEffectivenessAtMovingSolute=0; MaxEffectiveRunoff=0
              Thickness=[100, 100, 100, 100, 100, 100, 100, 100, 100, 100, 100, 100, 100, 100, 100, 100, 100, 100, 100, 100]
              InitialValues=[20, 15, 10, 8, 7, 6, 6, 4, 4, 4, 4, 4, 4, 4, 4, 4, 4, 4, 4, 4]
            Solute NH4: same as Incomplete.Southern NSW.Dirn_91_S1_150N.paddock.soil.NH4
            Solute Urea: same as Validation.Growth Experiments.Wagga.Wagga2008.WaggaWagga2008.Paddock.Soil.Urea
            SoilTemperature Temperature
          SurfaceOrganicMatter SurfaceOM: InitialResidueName=wheat; InitialResidueType=wheat; InitialResidueMass=2000; InitialStandingFraction=0; InitialCPR=0; InitialCNR=76
          Plant canola: ResourceName=Canola
          MicroClimate: a_interception=0; b_interception=1; c_interception=0; d_interception=0; SoilHeatFluxFraction=0.4; MinimumHeightDiffForNewLayer=0; NightInterceptionFraction=0.5; ReferenceHeight=2
          Report SowingReport: EventNames=[Canola].Sowing
            VariableNames:
              [Clock].Today
              [Canola].SowingData.Cultivar
              [IWeather].Latitude
              [IWeather].Longitude
        SoilArbitrator
      Simulation Grenfell_03_S1
        Clock: Start=2003-01-01; End=2003-12-31
        Summary summaryfile
        Weather: FileName=met/Grenfell_03.met
        Zone paddock: Area=1; Slope=0; AspectAngle=0; Altitude=50
          Report outputfile: same as Incomplete.Southern NSW.Ardlethan_03_S1.paddock.outputfile
          Operations
            2003-04-17  // canola sow cultivar = oscar, crop_class = triazine, plants = 40 (/m2), sowing_depth = 10 (mm), row_spacing = 300
            2003-04-17  Fertiliser.Apply(32, Fertiliser.Types., 30);
            2003-04-17  Fertiliser.Apply(12, Fertiliser.Types., 30);
            2003-04-15  // 'soil water' set sw = 0.135 0.168 0.196 0.216 0.244 0.217 0.217 0.218 0.227 0.237
          Manager
```csharp
using Models.Soils;
using System;
using Models.Core;
using Models.PMF;
namespace Models
{
    [Serializable]
    [System.Xml.Serialization.XmlInclude(typeof(Model))]
    public class Script : Model
    {
        [Link] Clock Clock;

        [EventSubscribe("StartOfSimulation")]
        private void OnSimulationCommencing(object sender, EventArgs e)
        {
            /*
                
            samp_start_sw = 0
            rain_samp_start_sw = 0
            rain_samp_finish_sw = 0
            sim_start_sw = 0
            sim_finish_sw = 0
            cum_days = 0
            pre_sow_rain = 0
            flower_flag = 0
            grain_fill_rain = 0
            sum_rain = 0
            in_crop_rain = 0
            num_rain_events = 0
            
            */
        }
        [EventSubscribe("DoManagement")]
        private void OnDoManagement(object sender, EventArgs e)
        {
            /*
                
               if (daysaftersowing = 1) then
                  cum_temp = 0
                  cum_swdef = 0
                  cum_days = 0
               elseif (stagename = 'start_grain_fill' or
                             stagename = 'end_grain_fill' or
                             stagename = 'maturity' or
                             stagename = 'harvest_ripe') then
                  cum_temp = cum_temp + (maxt + mint) / 2
                  cum_swdef = cum_swdef + swdef_photo
                  cum_days = cum_days + 1
               endif
               ! calculate canola oil content
               if (cum_days > 0) then
                  avg_temp = cum_temp / cum_days
                  avg_swdef = cum_swdef / cum_days
                  if (avg_temp <= 14) then
                     oil_conc =  47
                  else
                     oil_conc = (47 - ((avg_temp - 14)*1.21)) - (1.91*(1 - avg_swdef^2))
                  endif
               else
                  oil_conc = 0
               endif
            
            */
            /*
                
            if year = 2003 and day = 104 then
              sim_start_sw = esw
            endif
            
            */
        }
        [EventSubscribe("DoCalculations")]
        private void OnDoCalculations(object sender, EventArgs e)
        {
            /*
                
            if day = 100 then
                 accum_es = 0
            endif
            if canola.daysaftersowing = 1 then
               start_esw = esw
               sow_day = day
            endif
            if canola.plant_status = 'out' then
               pre_sow_rain = pre_sow_rain + rain
            endif
            if canola.daysaftersowing > 0 then
                 accum_es = accum_es + es
                 in_crop_rain = in_crop_rain + rain
            endif
            if canola.daysaftersowing > 0 and rain > 3 then
                 num_rain_events = num_rain_events + 1
            endif
            if canola.stagename = 'flowering' and flower_flag = 0 then
               pre_flower_rain = in_crop_rain
               pre_flower_rain_events = num_rain_events
               flower_lai = lai
               flower_flag = 1
               grain_fill_rain = 0
            endif
            grain_fill_rain = grain_fill_rain + rain
            if canola.stagename = 'harvest_ripe' or canola.plant_status = 'dead' then
               total_rain_events = num_rain_events
               end_esw = esw
               canola harvest
               canola kill_crop
               canola end_crop
               in_crop_rain = 0
               crop_in = 0
               flower_flag = 0
               pre_sow_rain = 0
            endif
            if month = 1 and is_end_month = 1 then
              jan_rain = sum_rain
              sum_rain = 0
            endif
            if month = 2 and is_end_month = 1 then
              feb_rain = sum_rain
              sum_rain = 0
            endif
            if month = 3 and is_end_month = 1 then
              mar_rain = sum_rain
              sum_rain = 0
            endif
            if month = 4 and is_end_month = 1 then
              apr_rain = sum_rain
              sum_rain = 0
            endif
            if month = 5 and is_end_month = 1 then
              may_rain = sum_rain
              sum_rain = 0
            endif
            if month = 6 and is_end_month = 1 then
              jun_rain = sum_rain
              sum_rain = 0
            endif
            if month = 7 and is_end_month = 1 then
              jul_rain = sum_rain
              sum_rain = 0
            endif
            if month = 8 and is_end_month = 1 then
              aug_rain = sum_rain
              sum_rain = 0
            endif
            if month = 9 and is_end_month = 1 then
              sep_rain = sum_rain
              sum_rain = 0
            endif
            if month = 10 and is_end_month = 1 then
              oct_rain = sum_rain
              sum_rain = 0
            endif
            if month = 11 and is_end_month = 1 then
              nov_rain = sum_rain
              sum_rain = 0
            endif
            if month = 12 and is_end_month = 1 then
              dec_rain = sum_rain
              sum_rain = 0
            endif
            sum_rain = sum_rain + rain
            !!!!!!!!!!!!!!!!!!!!!!!!!!!!!!!!!!  residue  !!!!!!!!!!!!!!!!!!!!!!!!!!!!!!!!!!
            
            */
            /*
                
            if year = 2003 and day = 105 then
              samp_start_sw = esw
              rain_samp_start_sw = pre_sow_rain
            endif
            
            */
        }
    }
}
```
          Soil: Latitude=0; Longitude=0
            Physical
              Thickness  BD    AirDry  LL15   DUL    SAT
              100        1.4   0.052   0.082  0.167  0.442
              100        1.42  0.071   0.101  0.165  0.434
              100        1.43  0.091   0.121  0.195  0.43
              150        1.45  0.112   0.142  0.224  0.423
              200        1.49  0.163   0.193  0.284  0.408
              200        1.52  0.184   0.214  0.311  0.396
              200        1.52  0.208   0.238  0.334  0.396
              200        1.52  0.215   0.245  0.337  0.396
              200        1.52  0.225   0.255  0.351  0.396
              200        1.52  0.224   0.254  0.357  0.396
              SoilCrop canola
                LL=[0.082, 0.101, 0.121, 0.142, 0.193, 0.214, 0.238, 0.245, 0.255, 0.254]
                KL=[0.08, 0.08, 0.08, 0.08, 0.08, 0.07, 0.06, 0.05, 0.03, 0.01]
                XF=[1, 1, 1, 1, 1, 1, 1, 1, 1, 1]
            WaterBalance SoilWater: same as Incomplete.Southern NSW.Ardlethan_03_S1.paddock.soil.SoilWater
            Organic: same as Incomplete.Southern NSW.Ardlethan_03_S1.paddock.soil.Organic
            Chemical: Thickness=[100, 100, 100, 150, 200, 200, 200, 200, 200, 200]; PH=[5.8, 5.9, 6.6, 6.8, 7, 7.1, 7.2, 7.3, 7.4, 7.4]; PHUnits=Water
            Water: Thickness=[100, 100, 100, 150, 200, 200, 200, 200, 200, 200]; FilledFromTop=false
              InitialValues=[0.082, 0.101, 0.121, 0.142, 0.193, 0.214, 0.238, 0.245, 0.255, 0.254]
            Nutrient
            Solute NO3: Thickness=[100, 100, 100, 150, 200, 200, 200, 200, 200, 200]; InitialValues=[56.9, 17.1, 15.7, 14.5, 9.8, 3.9, 1.7, 1, 0.9, 0.8]; InitialValuesUnits=ppm; WaterTableConcentration=0; D0=0; DepthConstant=0; MaxDepthSoluteAccessible=0; RunoffEffectivenessAtMovingSolute=0; MaxEffectiveRunoff=0
            Solute NH4: same as Incomplete.Southern NSW.Ardlethan_03_S1.paddock.soil.NH4
            Solute Urea: same as Incomplete.Southern NSW.Ardlethan_03_S1.paddock.soil.Urea
            SoilTemperature Temperature
          SurfaceOrganicMatter SurfaceOM: InitialResidueName=wheat; InitialResidueType=wheat; InitialResidueMass=2000; InitialStandingFraction=0; InitialCPR=0; InitialCNR=76
          Plant canola: ResourceName=Canola
          MicroClimate: a_interception=0; b_interception=1; c_interception=0; d_interception=0; SoilHeatFluxFraction=0.4; MinimumHeightDiffForNewLayer=0; NightInterceptionFraction=0.5; ReferenceHeight=2
          Report SowingReport: EventNames=[Canola].Sowing
            VariableNames:
              [Clock].Today
              [Canola].SowingData.Cultivar
              [IWeather].Latitude
              [IWeather].Longitude
        SoilArbitrator
      Simulation Grenfell_03_S2
        Clock: Start=2003-01-01; End=2003-12-31
        Summary summaryfile
        Weather: FileName=met/Grenfell_03.met
        Zone paddock: Area=1; Slope=0; AspectAngle=0; Altitude=50
          Report outputfile: same as Incomplete.Southern NSW.Ardlethan_03_S1.paddock.outputfile
          Operations
            2003-05-12  // canola sow cultivar = oscar, crop_class = triazine, plants = 40 (/m2), sowing_depth = 10 (mm), row_spacing = 300
            2003-05-12  Fertiliser.Apply(32, Fertiliser.Types., 30);
            2003-05-12  Fertiliser.Apply(12, Fertiliser.Types., 30);
            2003-04-15  // 'soil water' set sw = 0.135 0.168 0.196 0.216 0.244 0.217 0.217 0.218 0.227 0.237
          Manager: same as Incomplete.Southern NSW.Grenfell_03_S1.paddock.manager
          Soil: same as Incomplete.Southern NSW.Grenfell_03_S1.paddock.soil
          SurfaceOrganicMatter SurfaceOM: InitialResidueName=wheat; InitialResidueType=wheat; InitialResidueMass=2000; InitialStandingFraction=0; InitialCPR=0; InitialCNR=76
          Plant canola: ResourceName=Canola
          MicroClimate: a_interception=0; b_interception=1; c_interception=0; d_interception=0; SoilHeatFluxFraction=0.4; MinimumHeightDiffForNewLayer=0; NightInterceptionFraction=0.5; ReferenceHeight=2
          Report SowingReport: EventNames=[Canola].Sowing
            VariableNames:
              [Clock].Today
              [Canola].SowingData.Cultivar
              [IWeather].Latitude
              [IWeather].Longitude
        SoilArbitrator
      Simulation Grenfell_03_S3
        Clock: Start=2003-01-01; End=2003-12-31
        Summary summaryfile
        Weather: FileName=met/Grenfell_03.met
        Zone paddock: Area=1; Slope=0; AspectAngle=0; Altitude=50
          Report outputfile: same as Incomplete.Southern NSW.Ardlethan_03_S1.paddock.outputfile
          Operations
            2003-06-11  // canola sow cultivar = oscar, crop_class = triazine, plants = 40 (/m2), sowing_depth = 10 (mm), row_spacing = 300
            2003-06-11  Fertiliser.Apply(32, Fertiliser.Types., 30);
            2003-06-11  Fertiliser.Apply(12, Fertiliser.Types., 30);
            2003-04-15  // 'soil water' set sw = 0.135 0.168 0.196 0.216 0.244 0.217 0.217 0.218 0.227 0.237
          Manager: same as Incomplete.Southern NSW.Grenfell_03_S1.paddock.manager
          Soil: same as Incomplete.Southern NSW.Grenfell_03_S1.paddock.soil
          SurfaceOrganicMatter SurfaceOM: InitialResidueName=wheat; InitialResidueType=wheat; InitialResidueMass=2000; InitialStandingFraction=0; InitialCPR=0; InitialCNR=76
          Plant canola: ResourceName=Canola
          MicroClimate: a_interception=0; b_interception=1; c_interception=0; d_interception=0; SoilHeatFluxFraction=0.4; MinimumHeightDiffForNewLayer=0; NightInterceptionFraction=0.5; ReferenceHeight=2
          Report SowingReport: EventNames=[Canola].Sowing
            VariableNames:
              [Clock].Today
              [Canola].SowingData.Cultivar
              [IWeather].Latitude
              [IWeather].Longitude
        SoilArbitrator
      Simulation Harden_93
        Clock: Start=1993-01-01; End=1993-12-31
        Summary summaryfile
        Weather: FileName=met/Harden_9399.met
        Zone paddock: Area=1; Slope=0; AspectAngle=0; Altitude=50
          Report outputfile: same as Incomplete.Southern NSW.Ardlethan_03_S1.paddock.outputfile
          Operations
            1993-01-18  // 'soil nitrogen' set no3ppm = 18.6 4.9 2.9 1.7 1.1 1.5 2.5 2.8 4.9 5.4 5.1 5 5 5 5 5 5 5 5 5
            1993-05-26  // canola sow plants = 55, row_spacing = 200, sowing_depth = 20, cultivar = oscar
            1993-07-15  Fertiliser.Apply(43, Fertiliser.Types., 50);
            1993-08-20  Fertiliser.Apply(54, Fertiliser.Types., 50);
          Manager
```csharp
using Models.Soils;
using System;
using Models.Core;
using Models.PMF;
namespace Models
{
    [Serializable]
    [System.Xml.Serialization.XmlInclude(typeof(Model))]
    public class Script : Model
    {
        [Link] Clock Clock;

        [EventSubscribe("StartOfSimulation")]
        private void OnSimulationCommencing(object sender, EventArgs e)
        {
            /*
                
            samp_start_sw = 0
            rain_samp_start_sw = 0
            rain_samp_finish_sw = 0
            sim_start_sw = 0
            sim_finish_sw = 0
            cum_days = 0
            pre_sow_rain = 0
            flower_flag = 0
            grain_fill_rain = 0
            sum_rain = 0
            in_crop_rain = 0
            num_rain_events = 0
            
            */
        }
        [EventSubscribe("DoManagement")]
        private void OnDoManagement(object sender, EventArgs e)
        {
            /*
                
               if (daysaftersowing = 1) then
                  cum_temp = 0
                  cum_swdef = 0
                  cum_days = 0
               elseif (stagename = 'start_grain_fill' or
                             stagename = 'end_grain_fill' or
                             stagename = 'maturity' or
                             stagename = 'harvest_ripe') then
                  cum_temp = cum_temp + (maxt + mint) / 2
                  cum_swdef = cum_swdef + swdef_photo
                  cum_days = cum_days + 1
               endif
               ! calculate canola oil content
               if (cum_days > 0) then
                  avg_temp = cum_temp / cum_days
                  avg_swdef = cum_swdef / cum_days
                  if (avg_temp <= 14) then
                     oil_conc =  47
                  else
                     oil_conc = (47 - ((avg_temp - 14)*1.21)) - (1.91*(1 - avg_swdef^2))
                  endif
               else
                  oil_conc = 0
               endif
            
            */
            /*
                
            if year = 1993 and day = 145 then
              sim_start_sw = esw
            endif
            
            */
        }
        [EventSubscribe("DoCalculations")]
        private void OnDoCalculations(object sender, EventArgs e)
        {
            /*
                
            if day = 100 then
                 accum_es = 0
            endif
            if canola.daysaftersowing = 1 then
               start_esw = esw
               sow_day = day
            endif
            if canola.plant_status = 'out' then
               pre_sow_rain = pre_sow_rain + rain
            endif
            if canola.daysaftersowing > 0 then
                 accum_es = accum_es + es
                 in_crop_rain = in_crop_rain + rain
            endif
            if canola.daysaftersowing > 0 and rain > 3 then
                 num_rain_events = num_rain_events + 1
            endif
            if canola.stagename = 'flowering' and flower_flag = 0 then
               pre_flower_rain = in_crop_rain
               pre_flower_rain_events = num_rain_events
               flower_lai = lai
               flower_flag = 1
               grain_fill_rain = 0
            endif
            grain_fill_rain = grain_fill_rain + rain
            if canola.stagename = 'harvest_ripe' or canola.plant_status = 'dead' then
               total_rain_events = num_rain_events
               end_esw = esw
               canola harvest
               canola kill_crop
               canola end_crop
               in_crop_rain = 0
               crop_in = 0
               flower_flag = 0
               pre_sow_rain = 0
            endif
            if month = 1 and is_end_month = 1 then
              jan_rain = sum_rain
              sum_rain = 0
            endif
            if month = 2 and is_end_month = 1 then
              feb_rain = sum_rain
              sum_rain = 0
            endif
            if month = 3 and is_end_month = 1 then
              mar_rain = sum_rain
              sum_rain = 0
            endif
            if month = 4 and is_end_month = 1 then
              apr_rain = sum_rain
              sum_rain = 0
            endif
            if month = 5 and is_end_month = 1 then
              may_rain = sum_rain
              sum_rain = 0
            endif
            if month = 6 and is_end_month = 1 then
              jun_rain = sum_rain
              sum_rain = 0
            endif
            if month = 7 and is_end_month = 1 then
              jul_rain = sum_rain
              sum_rain = 0
            endif
            if month = 8 and is_end_month = 1 then
              aug_rain = sum_rain
              sum_rain = 0
            endif
            if month = 9 and is_end_month = 1 then
              sep_rain = sum_rain
              sum_rain = 0
            endif
            if month = 10 and is_end_month = 1 then
              oct_rain = sum_rain
              sum_rain = 0
            endif
            if month = 11 and is_end_month = 1 then
              nov_rain = sum_rain
              sum_rain = 0
            endif
            if month = 12 and is_end_month = 1 then
              dec_rain = sum_rain
              sum_rain = 0
            endif
            sum_rain = sum_rain + rain
            !!!!!!!!!!!!!!!!!!!!!!!!!!!!!!!!!!  residue  !!!!!!!!!!!!!!!!!!!!!!!!!!!!!!!!!!
            
            */
            /*
                
            if year = 1993 and day = 146 then
              samp_start_sw = esw
              rain_samp_start_sw = pre_sow_rain
            endif
            !!!!! harden 1993 yickadee !!!!!
            
            */
        }
    }
}
```
          Soil: Latitude=0; Longitude=0
            Physical
              Thickness  BD    AirDry  LL15   DUL    SAT
              100        1.32  0.03    0.055  0.155  0.452
              100        1.7   0.03    0.073  0.175  0.308
              100        1.68  0.03    0.076  0.213  0.316
              150        1.68  0.03    0.144  0.32   0.33
              200        1.7   0.05    0.177  0.332  0.34
              200        1.6   0.05    0.177  0.371  0.393
              200        1.6   0.05    0.182  0.36   0.375
              200        1.6   0.05    0.194  0.373  0.39
              200        1.6   0.05    0.19   0.312  0.348
              200        1.6   0.05    0.144  0.252  0.356
              200        1.55  0.04    0.144  0.273  0.4
              SoilCrop canola
                LL=[0.055, 0.073, 0.076, 0.144, 0.177, 0.177, 0.182, 0.194, 0.19, 0.144, 0.144]
                KL=[0.08, 0.08, 0.08, 0.08, 0.08, 0.07, 0.06, 0.05, 0.03, 0.01, 0.01]
                XF=[1, 1, 1, 1, 1, 1, 1, 1, 1, 1, 1]
            WaterBalance SoilWater: SummerDate=1-Nov; SummerU=6; SummerCona=3.5; WinterDate=1-Apr; WinterU=6; WinterCona=3.5; DiffusConst=88; DiffusSlope=35.4; Salb=0.13; CN2Bare=72; CNRed=20; CNCov=0.8; PSIDul=-100; Thickness=[100, 100, 100, 150, 200, 200, 200, 200, 200, 200, 200]; SWCON=[0.4, 0.4, 0.4, 0.4, 0.4, 0.4, 0.4, 0.4, 0.4, 0.4, 0.4]
            Organic: FOMCNRatio=20; CarbonUnits=Total
              Thickness  Carbon  SoilCNRatio  FBiom  FInert  FOM
              100        1.3     14.5         0.04   0.36    671.5652
              100        1       14.5         0.03   0.35    571.0341
              100        0.8     14.5         0.03   0.45    485.5522
              150        0.62    14.5         0.02   0.45    380.7121
              200        0.42    14.5         0.02   0.59    275.2609
              200        0.22    14.5         0.02   0.6     199.0179
              200        0.19    14.5         0.02   0.84    143.8931
              200        0.17    14.5         0.02   0.8     104.037
              200        0.15    14.5         0.01   0.8     75.2204
              200        0.12    14.5         0.01   0.99    54.3855
              200        0.11    14.5         0.01   0.99    39.3216
            Chemical: Thickness=[100, 100, 100, 150, 200, 200, 200, 200, 200, 200, 200]; PH=[5.8, 5.9, 6.6, 6.8, 7, 7.1, 7.2, 7.3, 7.4, 7.4, 7.6]; PHUnits=Water
            Water: Thickness=[100, 100, 100, 150, 200, 200, 200, 200, 200, 200, 200]; FilledFromTop=false
              InitialValues=[0.181, 0.179, 0.176, 0.188, 0.16, 0.146, 0.155, 0.242, 0.245, 0.318, 0.279]
            Nutrient
            Solute NO3: Thickness=[100, 100, 100, 150, 200, 200, 200, 200, 200, 200, 200]; InitialValuesUnits=ppm; WaterTableConcentration=0; D0=0; DepthConstant=0; MaxDepthSoluteAccessible=0; RunoffEffectivenessAtMovingSolute=0; MaxEffectiveRunoff=0
              InitialValues=[0.65, 0.5, 0.5, 0.4, 0.4, 0.25, 0.25, 0.25, 0.25, 0.25, 0.25]
            Solute NH4: Thickness=[100, 100, 100, 150, 200, 200, 200, 200, 200, 200, 200]; InitialValuesUnits=ppm; WaterTableConcentration=0; D0=0; DepthConstant=0; MaxDepthSoluteAccessible=0; RunoffEffectivenessAtMovingSolute=0; MaxEffectiveRunoff=0
              InitialValues=[0.62, 0.09, 0.09, 0.065, 0.055, 0.08, 0.08, 0.08, 0.08, 0.08, 0.08]
            Solute Urea: Thickness=[100, 100, 100, 150, 200, 200, 200, 200, 200, 200, 200]; InitialValues=[0, 0, 0, 0, 0, 0, 0, 0, 0, 0, 0]; InitialValuesUnits=kg/ha; WaterTableConcentration=0; D0=0; DepthConstant=0; MaxDepthSoluteAccessible=0; RunoffEffectivenessAtMovingSolute=0; MaxEffectiveRunoff=0
            SoilTemperature Temperature
          SurfaceOrganicMatter SurfaceOM: InitialResidueName=lucerne; InitialResidueType=lucerne; InitialResidueMass=1000; InitialStandingFraction=0; InitialCPR=0; InitialCNR=20
          Plant canola: ResourceName=Canola
          MicroClimate: a_interception=0; b_interception=1; c_interception=0; d_interception=0; SoilHeatFluxFraction=0.4; MinimumHeightDiffForNewLayer=0; NightInterceptionFraction=0.5; ReferenceHeight=2
          Report SowingReport: EventNames=[Canola].Sowing
            VariableNames:
              [Clock].Today
              [Canola].SowingData.Cultivar
              [IWeather].Latitude
              [IWeather].Longitude
        SoilArbitrator
      Simulation Lockhart_03_S1
        Clock: Start=2003-01-01; End=2003-12-31
        Summary summaryfile
        Weather: FileName=met/Lockhart_03.met
        Zone paddock: Area=1; Slope=0; AspectAngle=0; Altitude=50
          Report outputfile: same as Incomplete.Southern NSW.Ardlethan_03_S1.paddock.outputfile
          Operations
            2003-05-18  Fertiliser.Apply(25, Fertiliser.Types., 30);
            2003-05-18  // canola sow cultivar = rainbow, plants = 40 (/m2), sowing_depth = 10 (mm), row_spacing = 300
            2003-05-10  // 'soil water' set sw = 0.176 0.236 0.281 0.300 0.305 0.317 0.327 0.337 0.348 0.351
            2003-09-20  Fertiliser.Apply(20, Fertiliser.Types., 30);
          Manager: same as Incomplete.Southern NSW.Ardlethan_03_S1.paddock.manager
          Soil: Latitude=0; Longitude=0
            Physical
              Thickness  BD    AirDry  LL15   DUL   SAT
              100        1.38  0.104   0.134  0.25  0.479
              100        1.45  0.2     0.236  0.35  0.442
              100        1.45  0.2     0.281  0.4   0.442
              150        1.45  0.2     0.3    0.42  0.423
              200        1.45  0.2     0.315  0.42  0.423
              200        1.45  0.25    0.322  0.42  0.423
              200        1.45  0.25    0.32   0.42  0.423
              200        1.45  0.25    0.321  0.42  0.423
              200        1.45  0.25    0.321  0.42  0.423
              200        1.45  0.25    0.317  0.42  0.423
              SoilCrop canola
                LL=[0.134, 0.236, 0.281, 0.3, 0.315, 0.322, 0.32, 0.321, 0.321, 0.317]
                KL=[0.08, 0.08, 0.08, 0.08, 0.08, 0.07, 0.06, 0.05, 0.03, 0.01]
                XF=[1, 1, 1, 1, 1, 1, 1, 1, 1, 1]
            WaterBalance SoilWater: same as Incomplete.Southern NSW.Ardlethan_03_S1.paddock.soil.SoilWater
            Organic: FOMCNRatio=30; CarbonUnits=Total
              Thickness  Carbon  SoilCNRatio  FBiom  FInert  FOM
              100        2       14.5         0.04   0.2     484.4165
              100        1.5     14.5         0.02   0.3     403.8836
              100        1.2     14.5         0.02   0.4     336.7392
              150        0.62    14.5         0.01   0.55    256.3597
              200        0.42    14.5         0.01   0.59    178.2069
              200        0.22    14.5         0.01   0.6     123.8794
              200        0.19    14.5         0.01   0.84    86.114
              200        0.17    14.5         0.01   0.8     59.8616
              200        0.15    14.5         0.01   0.8     41.6125
              200        0.12    14.5         0.01   0.99    28.9266
            Chemical: Thickness=[100, 100, 100, 150, 200, 200, 200, 200, 200, 200]; PH=[5.8, 5.9, 6.6, 6.8, 7, 7.1, 7.2, 7.3, 7.4, 7.4]; PHUnits=Water
            Water: Thickness=[100, 100, 100, 150, 200, 200, 200, 200, 200, 200]; FilledFromTop=false
              InitialValues=[0.134, 0.236, 0.281, 0.3, 0.315, 0.322, 0.32, 0.321, 0.321, 0.317]
            Nutrient
            Solute NO3: Thickness=[100, 100, 100, 150, 200, 200, 200, 200, 200, 200]; InitialValues=[42, 10, 5, 2, 1, 0.5, 0.4, 0.5, 0.6, 0.7]; InitialValuesUnits=ppm; WaterTableConcentration=0; D0=0; DepthConstant=0; MaxDepthSoluteAccessible=0; RunoffEffectivenessAtMovingSolute=0; MaxEffectiveRunoff=0
            Solute NH4: same as Incomplete.Southern NSW.Ardlethan_03_S1.paddock.soil.NH4
            Solute Urea: same as Incomplete.Southern NSW.Ardlethan_03_S1.paddock.soil.Urea
            SoilTemperature Temperature
          SurfaceOrganicMatter SurfaceOM: InitialResidueName=wheat; InitialResidueType=wheat; InitialResidueMass=2000; InitialStandingFraction=0; InitialCPR=0; InitialCNR=76
          Plant canola: ResourceName=Canola
          MicroClimate: a_interception=0; b_interception=1; c_interception=0; d_interception=0; SoilHeatFluxFraction=0.4; MinimumHeightDiffForNewLayer=0; NightInterceptionFraction=0.5; ReferenceHeight=2
          Report SowingReport: EventNames=[Canola].Sowing
            VariableNames:
              [Clock].Today
              [Canola].SowingData.Cultivar
              [IWeather].Latitude
              [IWeather].Longitude
        SoilArbitrator
      Simulation Lockhart_03_S2
        Clock: Start=2003-01-01; End=2003-12-31
        Summary summaryfile
        Weather: FileName=met/Lockhart_03.met
        Zone paddock: Area=1; Slope=0; AspectAngle=0; Altitude=50
          Report outputfile: same as Incomplete.Southern NSW.Ardlethan_03_S1.paddock.outputfile
          Operations
            2003-05-27  Fertiliser.Apply(25, Fertiliser.Types., 30);
            2003-05-27  // canola sow cultivar = rainbow, plants = 40 (/m2), sowing_depth = 10 (mm), row_spacing = 300
            2003-05-10  // 'soil water' set sw = 0.176 0.236 0.281 0.300 0.305 0.317 0.327 0.337 0.348 0.351
            2003-09-20  Fertiliser.Apply(20, Fertiliser.Types., 30);
          Manager: same as Incomplete.Southern NSW.Ardlethan_03_S1.paddock.manager
          Soil: same as Incomplete.Southern NSW.Lockhart_03_S1.paddock.soil
          SurfaceOrganicMatter SurfaceOM: InitialResidueName=wheat; InitialResidueType=wheat; InitialResidueMass=2000; InitialStandingFraction=0; InitialCPR=0; InitialCNR=76
          Plant canola: ResourceName=Canola
          MicroClimate: a_interception=0; b_interception=1; c_interception=0; d_interception=0; SoilHeatFluxFraction=0.4; MinimumHeightDiffForNewLayer=0; NightInterceptionFraction=0.5; ReferenceHeight=2
          Report SowingReport: EventNames=[Canola].Sowing
            VariableNames:
              [Clock].Today
              [Canola].SowingData.Cultivar
              [IWeather].Latitude
              [IWeather].Longitude
        SoilArbitrator
      Simulation Lockhart_03_S3
        Clock: Start=2003-01-01; End=2003-12-31
        Summary summaryfile
        Weather: FileName=met/Lockhart_03.met
        Zone paddock: Area=1; Slope=0; AspectAngle=0; Altitude=50
          Report outputfile: same as Incomplete.Southern NSW.Ardlethan_03_S1.paddock.outputfile
          Operations
            2003-06-06  Fertiliser.Apply(25, Fertiliser.Types., 30);
            2003-06-06  // canola sow cultivar = rainbow, plants = 40 (/m2), sowing_depth = 10 (mm), row_spacing = 300
            2003-05-10  // 'soil water' set sw = 0.176 0.236 0.281 0.300 0.305 0.317 0.327 0.337 0.348 0.351
            2003-09-20  Fertiliser.Apply(20, Fertiliser.Types., 30);
          Manager: same as Incomplete.Southern NSW.Ardlethan_03_S1.paddock.manager
          Soil: same as Incomplete.Southern NSW.Lockhart_03_S1.paddock.soil
          SurfaceOrganicMatter SurfaceOM: InitialResidueName=wheat; InitialResidueType=wheat; InitialResidueMass=2000; InitialStandingFraction=0; InitialCPR=0; InitialCNR=76
          Plant canola: ResourceName=Canola
          MicroClimate: a_interception=0; b_interception=1; c_interception=0; d_interception=0; SoilHeatFluxFraction=0.4; MinimumHeightDiffForNewLayer=0; NightInterceptionFraction=0.5; ReferenceHeight=2
          Report SowingReport: EventNames=[Canola].Sowing
            VariableNames:
              [Clock].Today
              [Canola].SowingData.Cultivar
              [IWeather].Latitude
              [IWeather].Longitude
        SoilArbitrator
      Simulation Normans_93
        Clock: Start=1993-01-01; End=1994-01-18
        Summary summaryfile
        Weather: FileName=met/Normans_9396.met
        Zone paddock: Area=1; Slope=0; AspectAngle=0; Altitude=50
          Report outputfile: same as Incomplete.Southern NSW.Ardlethan_03_S1.paddock.outputfile
          Operations
            1993-03-05  // surfaceom tillage type = disc
            1993-03-29  // surfaceom tillage type = chisel
            1993-04-01  // 'soil water' set sw = 0.088 0.093 0.110 0.143 0.256 0.256 0.250 0.250 0.301 0.301 0.314 0.314 0.282 0.282 0.256 0.256 0.251 0.251 0.270 0.270
            1993-04-01  // 'soil nitrogen' set no3ppm = 36.8 13.7 5.3 4.5 4.5 4.5 3.0 3.0 2.7 2.7 2.6 2.6 2.4 2.4 2.1 2.1 2.0 2.0 1.7 1.7
            1993-06-14  // canola sow plants = 43, crop_class = plant, row_spacing = 180, sowing_depth = 20, cultivar = hyola42
            1993-06-14  Fertiliser.Apply(28, Fertiliser.Types., 50);
          Manager
```csharp
using Models.Soils;
using System;
using Models.Core;
using Models.PMF;
namespace Models
{
    [Serializable]
    [System.Xml.Serialization.XmlInclude(typeof(Model))]
    public class Script : Model
    {
        [Link] Clock Clock;

        [EventSubscribe("StartOfSimulation")]
        private void OnSimulationCommencing(object sender, EventArgs e)
        {
            /*
                
            samp_start_sw = 0
            rain_samp_start_sw = 0
            rain_samp_finish_sw = 0
            sim_start_sw = 0
            sim_finish_sw = 0
            cum_days = 0
            pre_sow_rain = 0
            flower_flag = 0
            grain_fill_rain = 0
            sum_rain = 0
            in_crop_rain = 0
            num_rain_events = 0
            
            */
        }
        [EventSubscribe("DoManagement")]
        private void OnDoManagement(object sender, EventArgs e)
        {
            /*
                
               if (daysaftersowing = 1) then
                  cum_temp = 0
                  cum_swdef = 0
                  cum_days = 0
               elseif (stagename = 'start_grain_fill' or
                             stagename = 'end_grain_fill' or
                             stagename = 'maturity' or
                             stagename = 'harvest_ripe') then
                  cum_temp = cum_temp + (maxt + mint) / 2
                  cum_swdef = cum_swdef + swdef_photo
                  cum_days = cum_days + 1
               endif
               ! calculate canola oil content
               if (cum_days > 0) then
                  avg_temp = cum_temp / cum_days
                  avg_swdef = cum_swdef / cum_days
                  if (avg_temp <= 14) then
                     oil_conc =  47
                  else
                     oil_conc = (47 - ((avg_temp - 14)*1.21)) - (1.91*(1 - avg_swdef^2))
                  endif
               else
                  oil_conc = 0
               endif
            
            */
            /*
                
            if year = 1993 and day = 90 then
              sim_start_sw = esw
            endif
            
            */
        }
        [EventSubscribe("DoCalculations")]
        private void OnDoCalculations(object sender, EventArgs e)
        {
            /*
                
            if day = 100 then
                 accum_es = 0
            endif
            if canola.daysaftersowing = 1 then
               start_esw = esw
               sow_day = day
            endif
            if canola.plant_status = 'out' then
               pre_sow_rain = pre_sow_rain + rain
            endif
            if canola.daysaftersowing > 0 then
                 accum_es = accum_es + es
                 in_crop_rain = in_crop_rain + rain
            endif
            if canola.daysaftersowing > 0 and rain > 3 then
                 num_rain_events = num_rain_events + 1
            endif
            if canola.stagename = 'flowering' and flower_flag = 0 then
               pre_flower_rain = in_crop_rain
               pre_flower_rain_events = num_rain_events
               flower_lai = lai
               flower_flag = 1
               grain_fill_rain = 0
            endif
            grain_fill_rain = grain_fill_rain + rain
            if canola.stagename = 'harvest_ripe' or canola.plant_status = 'dead' then
               total_rain_events = num_rain_events
               end_esw = esw
               canola harvest
               canola kill_crop
               canola end_crop
               in_crop_rain = 0
               crop_in = 0
               flower_flag = 0
               pre_sow_rain = 0
            endif
            if month = 1 and is_end_month = 1 then
              jan_rain = sum_rain
              sum_rain = 0
            endif
            if month = 2 and is_end_month = 1 then
              feb_rain = sum_rain
              sum_rain = 0
            endif
            if month = 3 and is_end_month = 1 then
              mar_rain = sum_rain
              sum_rain = 0
            endif
            if month = 4 and is_end_month = 1 then
              apr_rain = sum_rain
              sum_rain = 0
            endif
            if month = 5 and is_end_month = 1 then
              may_rain = sum_rain
              sum_rain = 0
            endif
            if month = 6 and is_end_month = 1 then
              jun_rain = sum_rain
              sum_rain = 0
            endif
            if month = 7 and is_end_month = 1 then
              jul_rain = sum_rain
              sum_rain = 0
            endif
            if month = 8 and is_end_month = 1 then
              aug_rain = sum_rain
              sum_rain = 0
            endif
            if month = 9 and is_end_month = 1 then
              sep_rain = sum_rain
              sum_rain = 0
            endif
            if month = 10 and is_end_month = 1 then
              oct_rain = sum_rain
              sum_rain = 0
            endif
            if month = 11 and is_end_month = 1 then
              nov_rain = sum_rain
              sum_rain = 0
            endif
            if month = 12 and is_end_month = 1 then
              dec_rain = sum_rain
              sum_rain = 0
            endif
            sum_rain = sum_rain + rain
            !!!!!!!!!!!!!!!!!!!!!!!!!!!!!!!!!!  residue  !!!!!!!!!!!!!!!!!!!!!!!!!!!!!!!!!!
            
            */
            /*
                
            if year = 1993 and day = 91 then
              samp_start_sw = esw
              rain_samp_start_sw = pre_sow_rain
            endif
            if year = 1994 and day = 18 then
              sim_finish_sw = esw
              rain_samp_finish_sw = grain_fill_rain
            endif
            
            */
        }
    }
}
```
          Soil: Latitude=0; Longitude=0
            Water: FilledFromTop=false
              Thickness=[100, 100, 100, 100, 100, 100, 100, 100, 100, 100, 100, 100, 100, 100, 100, 100, 100, 100, 100, 100]
              InitialValues=[0.073, 0.075, 0.074, 0.12, 0.16, 0.25, 0.25, 0.24, 0.259, 0.281, 0.295, 0.272, 0.269, 0.264, 0.27, 0.27, 0.27, 0.27, 0.27, 0.27]
            Physical: same as Incomplete.Southern NSW.Ginnindera_96.paddock.soil.Physical
            WaterBalance SoilWater: same as Incomplete.Southern NSW.Ginnindera_96.paddock.soil.SoilWater
            Organic: FOMCNRatio=18; CarbonUnits=Total
              Thickness  Carbon  SoilCNRatio  FBiom  FInert  FOM
              100        0.83    12           0.06   0.2     2198.8549
              100        0.35    12           0.05   0.35    1892.5719
              100        0.33    12           0.04   0.45    1628.9518
              100        0.22    12           0.02   0.45    1402.0518
              100        0.22    12           0.02   0.59    1206.7572
              100        0.22    12           0.02   0.6     1038.6655
              100        0.19    12           0.02   0.84    893.9877
              100        0.17    12           0.02   0.8     769.4623
              100        0.15    12           0.01   0.8     662.2824
              100        0.12    12           0.01   0.99    570.0317
              100        0.11    12           0.01   0.99    490.6308
              100        0.1     12           0.01   0.99    422.2899
              100        0.1     12           0.01   0.99    363.4683
              100        0.1     12           0.01   0.99    312.84
              100        0.1     12           0.01   0.99    269.2639
              100        0.1     12           0.01   0.99    231.7576
              100        0.08    12           0.01   0.99    199.4756
              100        0.06    12           0.01   0.99    171.6903
              100        0.05    12           0.01   0.99    147.7752
              100        0.04    12           0.01   0.99    127.1913
            Chemical: same as Incomplete.Southern NSW.Ginnindera_96.paddock.soil.Chemical
            Nutrient
            Solute NO3: same as Incomplete.Southern NSW.Dirn_91_S1_150N.paddock.soil.NO3
            Solute NH4: same as Incomplete.Southern NSW.Dirn_91_S1_150N.paddock.soil.NH4
            Solute Urea: same as Validation.Growth Experiments.Wagga.Wagga2008.WaggaWagga2008.Paddock.Soil.Urea
            SoilTemperature Temperature
          SurfaceOrganicMatter SurfaceOM: InitialResidueName=lucerne; InitialResidueType=lucerne; InitialResidueMass=1000; InitialStandingFraction=0; InitialCPR=0; InitialCNR=20
          Plant canola: ResourceName=Canola
          MicroClimate: a_interception=0; b_interception=1; c_interception=0; d_interception=0; SoilHeatFluxFraction=0.4; MinimumHeightDiffForNewLayer=0; NightInterceptionFraction=0.5; ReferenceHeight=2
          Report SowingReport: EventNames=[Canola].Sowing
            VariableNames:
              [Clock].Today
              [Canola].SowingData.Cultivar
              [IWeather].Latitude
              [IWeather].Longitude
        SoilArbitrator
      Simulation Normans_94
        Clock: Start=1993-11-15; End=1994-12-31
        Summary summaryfile
        Weather: FileName=met/Normans_9396.met
        Zone paddock: Area=1; Slope=0; AspectAngle=0; Altitude=50
          Report outputfile: same as Incomplete.Southern NSW.Ardlethan_03_S1.paddock.outputfile
          Operations
            1994-04-20  // 'soil water' set sw = 0.129 0.147 0.183 0.222 0.308 0.308 0.280 0.280 0.309 0.309 0.309 0.309 0.304 0.304 0.304 0.304 0.324 0.324 0.324 0.324
            1994-04-20  // 'soil nitrogen' set no3ppm = 67.1 11.3 8.3 5.0 2.4 2.4 1.1 1.1 0.9 0.9 0.9 1.3 1.3 1.3 1.3 1.7 1.7 1.7 1.7 1.7
            1994-06-10  // canola sow plants = 76, crop_class = plant, row_spacing = 180, sowing_depth = 20, cultivar = oscar
            1994-06-10  Fertiliser.Apply(18, Fertiliser.Types., 50);
          Manager
```csharp
using Models.Soils;
using System;
using Models.Core;
using Models.PMF;
namespace Models
{
    [Serializable]
    [System.Xml.Serialization.XmlInclude(typeof(Model))]
    public class Script : Model
    {
        [Link] Clock Clock;

        [EventSubscribe("StartOfSimulation")]
        private void OnSimulationCommencing(object sender, EventArgs e)
        {
            /*
                
            samp_start_sw = 0
            rain_samp_start_sw = 0
            rain_samp_finish_sw = 0
            sim_start_sw = 0
            sim_finish_sw = 0
            cum_days = 0
            pre_sow_rain = 0
            flower_flag = 0
            grain_fill_rain = 0
            sum_rain = 0
            in_crop_rain = 0
            num_rain_events = 0
            
            */
        }
        [EventSubscribe("DoManagement")]
        private void OnDoManagement(object sender, EventArgs e)
        {
            /*
                
               if (daysaftersowing = 1) then
                  cum_temp = 0
                  cum_swdef = 0
                  cum_days = 0
               elseif (stagename = 'start_grain_fill' or
                             stagename = 'end_grain_fill' or
                             stagename = 'maturity' or
                             stagename = 'harvest_ripe') then
                  cum_temp = cum_temp + (maxt + mint) / 2
                  cum_swdef = cum_swdef + swdef_photo
                  cum_days = cum_days + 1
               endif
               ! calculate canola oil content
               if (cum_days > 0) then
                  avg_temp = cum_temp / cum_days
                  avg_swdef = cum_swdef / cum_days
                  if (avg_temp <= 14) then
                     oil_conc =  47
                  else
                     oil_conc = (47 - ((avg_temp - 14)*1.21)) - (1.91*(1 - avg_swdef^2))
                  endif
               else
                  oil_conc = 0
               endif
            
            */
            /*
                
            if year = 1994 and day = 109 then
              sim_start_sw = esw
            endif
            
            */
        }
        [EventSubscribe("DoCalculations")]
        private void OnDoCalculations(object sender, EventArgs e)
        {
            /*
                
            if day = 100 then
                 accum_es = 0
            endif
            if canola.daysaftersowing = 1 then
               start_esw = esw
               sow_day = day
            endif
            if canola.plant_status = 'out' then
               pre_sow_rain = pre_sow_rain + rain
            endif
            if canola.daysaftersowing > 0 then
                 accum_es = accum_es + es
                 in_crop_rain = in_crop_rain + rain
            endif
            if canola.daysaftersowing > 0 and rain > 3 then
                 num_rain_events = num_rain_events + 1
            endif
            if canola.stagename = 'flowering' and flower_flag = 0 then
               pre_flower_rain = in_crop_rain
               pre_flower_rain_events = num_rain_events
               flower_lai = lai
               flower_flag = 1
               grain_fill_rain = 0
            endif
            grain_fill_rain = grain_fill_rain + rain
            if canola.stagename = 'harvest_ripe' or canola.plant_status = 'dead' then
               total_rain_events = num_rain_events
               end_esw = esw
               canola harvest
               canola kill_crop
               canola end_crop
               in_crop_rain = 0
               crop_in = 0
               flower_flag = 0
               pre_sow_rain = 0
            endif
            if month = 1 and is_end_month = 1 then
              jan_rain = sum_rain
              sum_rain = 0
            endif
            if month = 2 and is_end_month = 1 then
              feb_rain = sum_rain
              sum_rain = 0
            endif
            if month = 3 and is_end_month = 1 then
              mar_rain = sum_rain
              sum_rain = 0
            endif
            if month = 4 and is_end_month = 1 then
              apr_rain = sum_rain
              sum_rain = 0
            endif
            if month = 5 and is_end_month = 1 then
              may_rain = sum_rain
              sum_rain = 0
            endif
            if month = 6 and is_end_month = 1 then
              jun_rain = sum_rain
              sum_rain = 0
            endif
            if month = 7 and is_end_month = 1 then
              jul_rain = sum_rain
              sum_rain = 0
            endif
            if month = 8 and is_end_month = 1 then
              aug_rain = sum_rain
              sum_rain = 0
            endif
            if month = 9 and is_end_month = 1 then
              sep_rain = sum_rain
              sum_rain = 0
            endif
            if month = 10 and is_end_month = 1 then
              oct_rain = sum_rain
              sum_rain = 0
            endif
            if month = 11 and is_end_month = 1 then
              nov_rain = sum_rain
              sum_rain = 0
            endif
            if month = 12 and is_end_month = 1 then
              dec_rain = sum_rain
              sum_rain = 0
            endif
            sum_rain = sum_rain + rain
            !!!!!!!!!!!!!!!!!!!!!!!!!!!!!!!!!!  residue  !!!!!!!!!!!!!!!!!!!!!!!!!!!!!!!!!!
            
            */
            /*
                
            if year = 1994 and day = 110 then
              samp_start_sw = esw
              rain_samp_start_sw = pre_sow_rain
            endif
            if year = 1994 and day = 355 then
              sim_finish_sw = esw
              rain_samp_finish_sw = grain_fill_rain
            endif
            !!!!!!!!!!!!! normans 1994 after grazing oats !!!!
            
            */
        }
    }
}
```
          Soil: Latitude=0; Longitude=0
            Water: FilledFromTop=false
              Thickness=[100, 100, 100, 100, 100, 100, 100, 100, 100, 100, 100, 100, 100, 100, 100, 100, 100, 100, 100, 100]
              InitialValues=[0.073, 0.075, 0.074, 0.12, 0.16, 0.25, 0.25, 0.24, 0.259, 0.281, 0.295, 0.272, 0.269, 0.264, 0.27, 0.27, 0.27, 0.27, 0.27, 0.27]
            Physical: same as Incomplete.Southern NSW.Ginnindera_96.paddock.soil.Physical
            WaterBalance SoilWater: same as Incomplete.Southern NSW.Ginnindera_96.paddock.soil.SoilWater
            Organic: FOMCNRatio=33; CarbonUnits=Total
              Thickness  Carbon  SoilCNRatio  FBiom  FInert  FOM
              100        0.83    12           0.06   0.2     0
              100        0.35    12           0.05   0.35    0
              100        0.33    12           0.04   0.45    0
              100        0.22    12           0.02   0.45    0
              100        0.22    12           0.02   0.59    0
              100        0.22    12           0.02   0.6     0
              100        0.19    12           0.02   0.84    0
              100        0.17    12           0.02   0.8     0
              100        0.15    12           0.01   0.8     0
              100        0.12    12           0.01   0.99    0
              100        0.11    12           0.01   0.99    0
              100        0.1     12           0.01   0.99    0
              100        0.1     12           0.01   0.99    0
              100        0.1     12           0.01   0.99    0
              100        0.1     12           0.01   0.99    0
              100        0.1     12           0.01   0.99    0
              100        0.08    12           0.01   0.99    0
              100        0.06    12           0.01   0.99    0
              100        0.05    12           0.01   0.99    0
              100        0.04    12           0.01   0.99    0
            Chemical: same as Incomplete.Southern NSW.Ginnindera_96.paddock.soil.Chemical
            Nutrient
            Solute NO3: InitialValuesUnits=ppm; WaterTableConcentration=0; D0=0; DepthConstant=0; MaxDepthSoluteAccessible=0; RunoffEffectivenessAtMovingSolute=0; MaxEffectiveRunoff=0
              Thickness=[100, 100, 100, 100, 100, 100, 100, 100, 100, 100, 100, 100, 100, 100, 100, 100, 100, 100, 100, 100]
              InitialValues=[2, 2, 2, 2, 2, 2, 2, 2, 2, 2, 2, 2, 2, 2, 2, 2, 2, 2, 2, 2]
            Solute NH4: same as Incomplete.Southern NSW.Dirn_91_S1_150N.paddock.soil.NH4
            Solute Urea: same as Validation.Growth Experiments.Wagga.Wagga2008.WaggaWagga2008.Paddock.Soil.Urea
            SoilTemperature Temperature
          SurfaceOrganicMatter SurfaceOM: InitialResidueName=wheat; InitialResidueType=wheat; InitialResidueMass=2000; InitialStandingFraction=0; InitialCPR=0; InitialCNR=76
          Plant canola: ResourceName=Canola
          MicroClimate: a_interception=0; b_interception=1; c_interception=0; d_interception=0; SoilHeatFluxFraction=0.4; MinimumHeightDiffForNewLayer=0; NightInterceptionFraction=0.5; ReferenceHeight=2
          Report SowingReport: EventNames=[Canola].Sowing
            VariableNames:
              [Clock].Today
              [Canola].SowingData.Cultivar
              [IWeather].Latitude
              [IWeather].Longitude
        SoilArbitrator
      Simulation Normans_95
        Clock: Start=1994-11-15; End=1995-12-31
        Summary summaryfile
        Weather: FileName=met/Normans_9396.met
        Zone paddock: Area=1; Slope=0; AspectAngle=0; Altitude=50
          Report outputfile: same as Incomplete.Southern NSW.Ardlethan_03_S1.paddock.outputfile
          Operations
            1995-07-10  // 'soil water' set sw = 0.260 0.216 0.234 0.264 0.264 0.360 0.360 0.350 0.340 0.330 0.340 0.355 0.355 0.322 0.322 0.322 0.322 0.355 0.355 0.355
            1995-07-10  // 'soil nitrogen' set no3ppm = 12.6 20.3 31.2 36.0 31.3 31.3 14.2 14.2 7.5 7.5 7.5 4.8 4.8 4.8 4.8 4.8 5.2 5.2 5.2 5.2
            1995-05-30  // canola sow plants = 57, crop_class = plant, row_spacing = 180, sowing_depth = 20, cultivar = oscar
            1995-05-30  Fertiliser.Apply(18, Fertiliser.Types., 50);
          Manager
```csharp
using Models.Soils;
using System;
using Models.Core;
using Models.PMF;
namespace Models
{
    [Serializable]
    [System.Xml.Serialization.XmlInclude(typeof(Model))]
    public class Script : Model
    {
        [Link] Clock Clock;

        [EventSubscribe("StartOfSimulation")]
        private void OnSimulationCommencing(object sender, EventArgs e)
        {
            /*
                
            samp_start_sw = 0
            rain_samp_start_sw = 0
            rain_samp_finish_sw = 0
            sim_start_sw = 0
            sim_finish_sw = 0
            cum_days = 0
            pre_sow_rain = 0
            flower_flag = 0
            grain_fill_rain = 0
            sum_rain = 0
            in_crop_rain = 0
            num_rain_events = 0
            
            */
        }
        [EventSubscribe("DoManagement")]
        private void OnDoManagement(object sender, EventArgs e)
        {
            /*
                
               if (daysaftersowing = 1) then
                  cum_temp = 0
                  cum_swdef = 0
                  cum_days = 0
               elseif (stagename = 'start_grain_fill' or
                             stagename = 'end_grain_fill' or
                             stagename = 'maturity' or
                             stagename = 'harvest_ripe') then
                  cum_temp = cum_temp + (maxt + mint) / 2
                  cum_swdef = cum_swdef + swdef_photo
                  cum_days = cum_days + 1
               endif
               ! calculate canola oil content
               if (cum_days > 0) then
                  avg_temp = cum_temp / cum_days
                  avg_swdef = cum_swdef / cum_days
                  if (avg_temp <= 14) then
                     oil_conc =  47
                  else
                     oil_conc = (47 - ((avg_temp - 14)*1.21)) - (1.91*(1 - avg_swdef^2))
                  endif
               else
                  oil_conc = 0
               endif
            
            */
            /*
                
            if year = 1995 and day = 190 then
              sim_start_sw = esw
            endif
            
            */
        }
        [EventSubscribe("DoCalculations")]
        private void OnDoCalculations(object sender, EventArgs e)
        {
            /*
                
            if day = 100 then
                 accum_es = 0
            endif
            if canola.daysaftersowing = 1 then
               start_esw = esw
               sow_day = day
            endif
            if canola.plant_status = 'out' then
               pre_sow_rain = pre_sow_rain + rain
            endif
            if canola.daysaftersowing > 0 then
                 accum_es = accum_es + es
                 in_crop_rain = in_crop_rain + rain
            endif
            if canola.daysaftersowing > 0 and rain > 3 then
                 num_rain_events = num_rain_events + 1
            endif
            if canola.stagename = 'flowering' and flower_flag = 0 then
               pre_flower_rain = in_crop_rain
               pre_flower_rain_events = num_rain_events
               flower_lai = lai
               flower_flag = 1
               grain_fill_rain = 0
            endif
            grain_fill_rain = grain_fill_rain + rain
            if canola.stagename = 'harvest_ripe' or canola.plant_status = 'dead' then
               total_rain_events = num_rain_events
               end_esw = esw
               canola harvest
               canola kill_crop
               canola end_crop
               in_crop_rain = 0
               crop_in = 0
               flower_flag = 0
               pre_sow_rain = 0
            endif
            if month = 1 and is_end_month = 1 then
              jan_rain = sum_rain
              sum_rain = 0
            endif
            if month = 2 and is_end_month = 1 then
              feb_rain = sum_rain
              sum_rain = 0
            endif
            if month = 3 and is_end_month = 1 then
              mar_rain = sum_rain
              sum_rain = 0
            endif
            if month = 4 and is_end_month = 1 then
              apr_rain = sum_rain
              sum_rain = 0
            endif
            if month = 5 and is_end_month = 1 then
              may_rain = sum_rain
              sum_rain = 0
            endif
            if month = 6 and is_end_month = 1 then
              jun_rain = sum_rain
              sum_rain = 0
            endif
            if month = 7 and is_end_month = 1 then
              jul_rain = sum_rain
              sum_rain = 0
            endif
            if month = 8 and is_end_month = 1 then
              aug_rain = sum_rain
              sum_rain = 0
            endif
            if month = 9 and is_end_month = 1 then
              sep_rain = sum_rain
              sum_rain = 0
            endif
            if month = 10 and is_end_month = 1 then
              oct_rain = sum_rain
              sum_rain = 0
            endif
            if month = 11 and is_end_month = 1 then
              nov_rain = sum_rain
              sum_rain = 0
            endif
            if month = 12 and is_end_month = 1 then
              dec_rain = sum_rain
              sum_rain = 0
            endif
            sum_rain = sum_rain + rain
            !!!!!!!!!!!!!!!!!!!!!!!!!!!!!!!!!!  residue  !!!!!!!!!!!!!!!!!!!!!!!!!!!!!!!!!!
            
            */
            /*
                
            if year = 1995 and day = 191 then
              samp_start_sw = esw
              rain_samp_start_sw = pre_sow_rain
            endif
            if year = 1995 and day = 353 then
              sim_finish_sw = esw
              rain_samp_finish_sw = grain_fill_rain
            endif
            !!!!!!!!!!!!! normans 1995 after oats
            
            */
        }
    }
}
```
          Soil: Latitude=0; Longitude=0
            Physical: same as Incomplete.Southern NSW.Ginnindera_96.paddock.soil.Physical
            WaterBalance SoilWater: same as Incomplete.Southern NSW.Ginnindera_96.paddock.soil.SoilWater
            Organic: same as Incomplete.Southern NSW.Normans_94.paddock.soil.Organic
            Chemical: same as Incomplete.Southern NSW.Ginnindera_96.paddock.soil.Chemical
            Water: FilledFromTop=false
              Thickness=[100, 100, 100, 100, 100, 100, 100, 100, 100, 100, 100, 100, 100, 100, 100, 100, 100, 100, 100, 100]
              InitialValues=[0.21, 0.234, 0.22, 0.29, 0.293, 0.37, 0.36, 0.35, 0.34, 0.33, 0.34, 0.35, 0.36, 0.37, 0.37, 0.355, 0.35, 0.333, 0.333, 0.333]
            Nutrient
            Solute NO3: same as Incomplete.Southern NSW.Normans_94.paddock.soil.NO3
            Solute NH4: same as Incomplete.Southern NSW.Dirn_91_S1_150N.paddock.soil.NH4
            Solute Urea: same as Validation.Growth Experiments.Wagga.Wagga2008.WaggaWagga2008.Paddock.Soil.Urea
            SoilTemperature Temperature
          SurfaceOrganicMatter SurfaceOM: InitialResidueName=wheat; InitialResidueType=wheat; InitialResidueMass=2000; InitialStandingFraction=0; InitialCPR=0; InitialCNR=76
          Plant canola: ResourceName=Canola
          MicroClimate: a_interception=0; b_interception=1; c_interception=0; d_interception=0; SoilHeatFluxFraction=0.4; MinimumHeightDiffForNewLayer=0; NightInterceptionFraction=0.5; ReferenceHeight=2
          Report SowingReport: EventNames=[Canola].Sowing
            VariableNames:
              [Clock].Today
              [Canola].SowingData.Cultivar
              [IWeather].Latitude
              [IWeather].Longitude
        SoilArbitrator
      Simulation Wallendbeen_01_S1
        Clock: Start=2000-11-15; End=2001-12-31
        Summary summaryfile
        Weather: FileName=met/Wallendbeen_01.met
        Zone paddock: Area=1; Slope=0; AspectAngle=0; Altitude=50
          Report outputfile: same as Incomplete.Southern NSW.Ardlethan_03_S1.paddock.outputfile
          Operations
            2001-04-09  // 'soil nitrogen' set no3ppm = 126.0 42.0 28.0 18.0 13.5 9.0 6.0 3.0 2.0 1.0 1.5 2.0 1.90 1.8 1.25 0.7 0.7 0.7 0.7 0.7
            2001-04-09  // 'soil water' set sw = 0.157 0.246 0.273 0.291 0.318 0.349 0.382 0.406 0.373 0.339 0.331 0.322 0.310 0.298 0.274 0.251 0.251 0.251 0.251 0.251
            2001-04-30  // surfaceom reset
            2001-04-30  // canola sow cultivar = rainbow, plants = 50 (/m2), sowing_depth = 20 (mm), row_spacing = 300
          Manager: same as Incomplete.Southern NSW.Galong_01_S1.paddock.manager
          Soil: Latitude=0; Longitude=0
            Water: FilledFromTop=false
              Thickness=[100, 100, 100, 100, 100, 100, 100, 100, 100, 100, 100, 100, 100, 100, 100, 100, 100, 100, 100, 800]
              InitialValues=[0.1, 0.1, 0.1, 0.12, 0.16, 0.19, 0.2, 0.21, 0.21, 0.21, 0.21, 0.21, 0.21, 0.21, 0.21, 0.21, 0.21, 0.21, 0.21, 0.21]
            Physical
              Thickness  BD    AirDry  LL15  DUL    SAT
              100        1.4   0.1     0.1   0.27   0.453
              100        1.42  0.1     0.1   0.27   0.445
              100        1.43  0.1     0.1   0.27   0.441
              100        1.45  0.12    0.12  0.29   0.434
              100        1.46  0.16    0.16  0.293  0.43
              100        1.49  0.19    0.19  0.32   0.418
              100        1.52  0.2     0.2   0.34   0.406
              100        1.52  0.2     0.21  0.36   0.406
              100        1.52  0.2     0.21  0.36   0.406
              100        1.52  0.2     0.21  0.36   0.406
              100        1.52  0.2     0.21  0.36   0.406
              100        1.52  0.2     0.21  0.36   0.406
              100        1.52  0.2     0.21  0.36   0.406
              100        1.52  0.2     0.21  0.36   0.406
              100        1.52  0.2     0.21  0.36   0.406
              100        1.52  0.2     0.21  0.36   0.406
              100        1.52  0.2     0.21  0.36   0.406
              100        1.52  0.2     0.21  0.36   0.406
              100        1.52  0.2     0.21  0.36   0.406
              800        1.52  0.2     0.21  0.36   0.406
              SoilCrop canola
                LL=[0.1, 0.1, 0.1, 0.12, 0.16, 0.19, 0.2, 0.21, 0.21, 0.21, 0.21, 0.21, 0.21, 0.21, 0.21, 0.21, 0.21, 0.21, 0.21, 0.21]
                KL=[0.08, 0.08, 0.08, 0.08, 0.08, 0.08, 0.08, 0.08, 0.08, 0.07, 0.07, 0.06, 0.06, 0.05, 0.05, 0.05, 0.05, 0.05, 0.05, 0.05]
                XF=[1, 1, 1, 1, 1, 1, 1, 1, 1, 1, 1, 1, 1, 1, 1, 1, 1, 1, 1, 1]
            WaterBalance SoilWater: SummerDate=1-Nov; SummerU=6; SummerCona=3.5; WinterDate=1-Apr; WinterU=6; WinterCona=3.5; DiffusConst=88; DiffusSlope=35.4; Salb=0.13; CN2Bare=72; CNRed=20; CNCov=0.8; PSIDul=-100
              Thickness=[100, 100, 100, 100, 100, 100, 100, 100, 100, 100, 100, 100, 100, 100, 100, 100, 100, 100, 100, 800]
              SWCON=[0.4, 0.4, 0.4, 0.4, 0.4, 0.4, 0.4, 0.4, 0.4, 0.4, 0.4, 0.4, 0.4, 0.4, 0.4, 0.4, 0.4, 0.4, 0.4, 0.4]
            Organic: FOMCNRatio=15; CarbonUnits=Total
              Thickness  Carbon  SoilCNRatio  FBiom  FInert  FOM
              100        2.3     10           0.06   0.05    713.1572
              100        1.5     10           0.06   0.05    638.1611
              100        0.9     10           0.06   0.1     571.0516
              100        0.42    10           0.02   0.45    510.9994
              100        0.32    10           0.02   0.59    457.2624
              100        0.22    10           0.02   0.6     409.1764
              100        0.19    10           0.02   0.84    366.1471
              100        0.17    10           0.02   0.8     327.6428
              100        0.15    10           0.01   0.8     293.1877
              100        0.12    10           0.01   0.99    262.3559
              100        0.11    10           0.01   0.99    234.7663
              100        0.1     10           0.01   0.99    210.0782
              100        0.1     10           0.01   0.99    187.9862
              100        0.1     10           0.01   0.99    168.2174
              100        0.1     10           0.01   0.99    150.5276
              100        0.1     10           0.01   0.99    134.698
              100        0.08    10           0.01   0.99    120.5331
              100        0.06    10           0.01   0.99    107.8577
              100        0.05    10           0.01   0.99    96.5153
              800        0.04    10           0.01   0.99    39.6786
            Chemical: PHUnits=Water
              Thickness=[100, 100, 100, 100, 100, 100, 100, 100, 100, 100, 100, 100, 100, 100, 100, 100, 100, 100, 100, 800]
              PH=[5.8, 5.9, 6.6, 6.8, 7, 7.1, 7.2, 7.3, 7.4, 7.4, 7.6, 7.8, 8, 8.2, 8.3, 8.4, 8.4, 8.5, 8.5, 8.5]
            Nutrient
            Solute NO3: InitialValuesUnits=ppm; WaterTableConcentration=0; D0=0; DepthConstant=0; MaxDepthSoluteAccessible=0; RunoffEffectivenessAtMovingSolute=0; MaxEffectiveRunoff=0
              Thickness=[100, 100, 100, 100, 100, 100, 100, 100, 100, 100, 100, 100, 100, 100, 100, 100, 100, 100, 100, 800]
              InitialValues=[0.65, 0.5, 0.5, 0.4, 0.4, 0.25, 0.25, 0.25, 0.25, 0.25, 0.25, 0.25, 0.25, 0.25, 0.25, 0.25, 0.25, 0.25, 0.25, 0.25]
            Solute NH4: InitialValuesUnits=ppm; WaterTableConcentration=0; D0=0; DepthConstant=0; MaxDepthSoluteAccessible=0; RunoffEffectivenessAtMovingSolute=0; MaxEffectiveRunoff=0
              Thickness=[100, 100, 100, 100, 100, 100, 100, 100, 100, 100, 100, 100, 100, 100, 100, 100, 100, 100, 100, 800]
              InitialValues=[0.62, 0.09, 0.09, 0.065, 0.055, 0.08, 0.08, 0.08, 0.08, 0.08, 0.08, 0.08, 0.08, 0.08, 0.08, 0.08, 0.08, 0.08, 0.08, 0.08]
            Solute Urea: InitialValuesUnits=kg/ha; WaterTableConcentration=0; D0=0; DepthConstant=0; MaxDepthSoluteAccessible=0; RunoffEffectivenessAtMovingSolute=0; MaxEffectiveRunoff=0
              Thickness=[100, 100, 100, 100, 100, 100, 100, 100, 100, 100, 100, 100, 100, 100, 100, 100, 100, 100, 100, 800]
              InitialValues=[0, 0, 0, 0, 0, 0, 0, 0, 0, 0, 0, 0, 0, 0, 0, 0, 0, 0, 0, 0]
            SoilTemperature Temperature
          SurfaceOrganicMatter SurfaceOM: InitialResidueName=wheat; InitialResidueType=wheat; InitialResidueMass=2000; InitialStandingFraction=0; InitialCPR=0; InitialCNR=76
          Plant canola: ResourceName=Canola
          MicroClimate: a_interception=0; b_interception=1; c_interception=0; d_interception=0; SoilHeatFluxFraction=0.4; MinimumHeightDiffForNewLayer=0; NightInterceptionFraction=0.5; ReferenceHeight=2
          Report SowingReport: EventNames=[Canola].Sowing
            VariableNames:
              [Clock].Today
              [Canola].SowingData.Cultivar
              [IWeather].Latitude
              [IWeather].Longitude
        SoilArbitrator
      Simulation Wallendbeen_01_S2
        Clock: Start=2000-11-15; End=2001-12-31
        Summary summaryfile
        Weather: FileName=met/Wallendbeen_01.met
        Zone paddock: Area=1; Slope=0; AspectAngle=0; Altitude=50
          Report outputfile: same as Incomplete.Southern NSW.Ardlethan_03_S1.paddock.outputfile
          Operations
            2001-04-09  // 'soil nitrogen' set no3ppm = 126.0 42.0 28.0 18.0 13.5 9.0 6.0 3.0 2.0 1.0 1.5 2.0 1.90 1.8 1.25 0.7 0.7 0.7 0.7 0.7
            2001-04-09  // 'soil water' set sw = 0.157 0.246 0.273 0.291 0.318 0.349 0.382 0.406 0.373 0.339 0.331 0.322 0.310 0.298 0.274 0.251 0.251 0.251 0.251 0.251
            2001-05-14  // surfaceom reset
            2001-05-14  // canola sow cultivar = rainbow, plants = 50 (/m2), sowing_depth = 20 (mm), row_spacing = 300
          Manager: same as Incomplete.Southern NSW.Galong_01_S1.paddock.manager
          Soil: Latitude=0; Longitude=0
            Physical: same as Incomplete.Southern NSW.Wallendbeen_01_S1.paddock.soil.Physical
            WaterBalance SoilWater: same as Incomplete.Southern NSW.Wallendbeen_01_S1.paddock.soil.SoilWater
            Organic: same as Incomplete.Southern NSW.Wallendbeen_01_S1.paddock.soil.Organic
            Chemical: same as Incomplete.Southern NSW.Wallendbeen_01_S1.paddock.soil.Chemical
            Water: FilledFromTop=false
              Thickness=[100, 100, 100, 100, 100, 100, 100, 100, 100, 100, 100, 100, 100, 100, 100, 100, 100, 100, 100, 800]
              InitialValues=[0.25, 0.25, 0.25, 0.25, 0.16, 0.19, 0.2, 0.21, 0.22, 0.23, 0.23, 0.23, 0.23, 0.23, 0.23, 0.23, 0.23, 0.23, 0.23, 0.23]
            Nutrient
            Solute NO3: same as Incomplete.Southern NSW.Wallendbeen_01_S1.paddock.soil.NO3
            Solute NH4: same as Incomplete.Southern NSW.Wallendbeen_01_S1.paddock.soil.NH4
            Solute Urea: same as Incomplete.Southern NSW.Wallendbeen_01_S1.paddock.soil.Urea
            SoilTemperature Temperature
          SurfaceOrganicMatter SurfaceOM: InitialResidueName=wheat; InitialResidueType=wheat; InitialResidueMass=2000; InitialStandingFraction=0; InitialCPR=0; InitialCNR=76
          Plant canola: ResourceName=Canola
          MicroClimate: a_interception=0; b_interception=1; c_interception=0; d_interception=0; SoilHeatFluxFraction=0.4; MinimumHeightDiffForNewLayer=0; NightInterceptionFraction=0.5; ReferenceHeight=2
          Report SowingReport: EventNames=[Canola].Sowing
            VariableNames:
              [Clock].Today
              [Canola].SowingData.Cultivar
              [IWeather].Latitude
              [IWeather].Longitude
        SoilArbitrator
      Simulation Wallendbeen_01_S3
        Clock: Start=2000-11-15; End=2001-12-31
        Summary summaryfile
        Weather: FileName=met/Wallendbeen_01.met
        Zone paddock: Area=1; Slope=0; AspectAngle=0; Altitude=50
          Report outputfile: same as Incomplete.Southern NSW.Ardlethan_03_S1.paddock.outputfile
          Operations
            2001-04-09  // 'soil nitrogen' set no3ppm = 126.0 42.0 28.0 18.0 13.5 9.0 6.0 3.0 2.0 1.0 1.5 2.0 1.90 1.8 1.25 0.7 0.7 0.7 0.7 0.7
            2001-04-09  // 'soil water' set sw = 0.157 0.246 0.273 0.291 0.318 0.349 0.382 0.406 0.373 0.339 0.331 0.322 0.310 0.298 0.274 0.251 0.251 0.251 0.251 0.251
            2001-05-29  // surfaceom reset
            2001-05-29  // canola sow cultivar = rainbow, plants = 50 (/m2), sowing_depth = 20 (mm), row_spacing = 300
          Manager: same as Incomplete.Southern NSW.Galong_01_S1.paddock.manager
          Soil: same as Incomplete.Southern NSW.Wallendbeen_01_S1.paddock.soil
          SurfaceOrganicMatter SurfaceOM: InitialResidueName=wheat; InitialResidueType=wheat; InitialResidueMass=2000; InitialStandingFraction=0; InitialCPR=0; InitialCNR=76
          Plant canola: ResourceName=Canola
          MicroClimate: a_interception=0; b_interception=1; c_interception=0; d_interception=0; SoilHeatFluxFraction=0.4; MinimumHeightDiffForNewLayer=0; NightInterceptionFraction=0.5; ReferenceHeight=2
          Report SowingReport: EventNames=[Canola].Sowing
            VariableNames:
              [Clock].Today
              [Canola].SowingData.Cultivar
              [IWeather].Latitude
              [IWeather].Longitude
        SoilArbitrator
      Simulation simulation3
        Clock: Start=2002-01-01; End=2002-12-31
        Summary summaryfile
        Weather: FileName=met/wallendbeen_02.met
        Zone paddock: Area=1; Slope=0; AspectAngle=0; Altitude=50
          Report outputfile: same as Incomplete.Southern NSW.Ardlethan_03_S1.paddock.outputfile
          Operations
            2002-04-30  // canola sow cultivar = rainbow, plants = 40 (/m2), sowing_depth = 10 (mm), row_spacing = 300
            2002-04-30  Fertiliser.Apply(10, Fertiliser.Types., 30);
            2002-04-24  // 'soil nitrogen' set no3ppm = 45.5 7.2 2.7 1.8 1.3 0.8 0.9 1.0 0.8 0.6 0.6 0.6 0.5 0.5 0.6 0.6 0.6 0.6 0.6 0.6
            2002-04-24  // 'soil water' set sw = 0.153 0.244 0.231 0.246 0.260 0.270 0.283 0.285 0.280 0.276 0.272 0.270 0.269 0.285 0.289 0.291 0.291 0.291 0.291 0.291
            2002-07-17  Fertiliser.Apply(46, Fertiliser.Types., 30);
            2002-09-03  Fertiliser.Apply(46, Fertiliser.Types., 30);
          Manager
```csharp
using Models.Soils;
using System;
using Models.Core;
using Models.PMF;
namespace Models
{
    [Serializable]
    [System.Xml.Serialization.XmlInclude(typeof(Model))]
    public class Script : Model
    {
        [Link] Clock Clock;

        [EventSubscribe("StartOfSimulation")]
        private void OnSimulationCommencing(object sender, EventArgs e)
        {
            /*
                
            samp_start_sw = 0
            rain_samp_start_sw = 0
            rain_samp_finish_sw = 0
            sim_start_sw = 0
            sim_finish_sw = 0
            cum_days = 0
            pre_sow_rain = 0
            flower_flag = 0
            grain_fill_rain = 0
            sum_rain = 0
            in_crop_rain = 0
            num_rain_events = 0
            
            */
        }
        [EventSubscribe("DoManagement")]
        private void OnDoManagement(object sender, EventArgs e)
        {
            /*
                
               if (daysaftersowing = 1) then
                  cum_temp = 0
                  cum_swdef = 0
                  cum_days = 0
               elseif (stagename = 'start_grain_fill' or
                             stagename = 'end_grain_fill' or
                             stagename = 'maturity' or
                             stagename = 'harvest_ripe') then
                  cum_temp = cum_temp + (maxt + mint) / 2
                  cum_swdef = cum_swdef + swdef_photo
                  cum_days = cum_days + 1
               endif
               ! calculate canola oil content
               if (cum_days > 0) then
                  avg_temp = cum_temp / cum_days
                  avg_swdef = cum_swdef / cum_days
                  if (avg_temp <= 14) then
                     oil_conc =  47
                  else
                     oil_conc = (47 - ((avg_temp - 14)*1.21)) - (1.91*(1 - avg_swdef^2))
                  endif
               else
                  oil_conc = 0
               endif
            
            */
            /*
                
            if year = 2002 and day = 113 then
              sim_start_sw = esw
            endif
            
            */
        }
        [EventSubscribe("DoCalculations")]
        private void OnDoCalculations(object sender, EventArgs e)
        {
            /*
                
            if day = 100 then
                 accum_es = 0
            endif
            if canola.daysaftersowing = 1 then
               start_esw = esw
               sow_day = day
            endif
            if canola.plant_status = 'out' then
               pre_sow_rain = pre_sow_rain + rain
            endif
            if canola.daysaftersowing > 0 then
                 accum_es = accum_es + es
                 in_crop_rain = in_crop_rain + rain
            endif
            if canola.daysaftersowing > 0 and rain > 3 then
                 num_rain_events = num_rain_events + 1
            endif
            if canola.stagename = 'flowering' and flower_flag = 0 then
               pre_flower_rain = in_crop_rain
               pre_flower_rain_events = num_rain_events
               flower_lai = lai
               flower_flag = 1
               grain_fill_rain = 0
            endif
            grain_fill_rain = grain_fill_rain + rain
            if canola.stagename = 'harvest_ripe' or canola.plant_status = 'dead' then
               total_rain_events = num_rain_events
               end_esw = esw
               canola harvest
               canola kill_crop
               canola end_crop
               in_crop_rain = 0
               crop_in = 0
               flower_flag = 0
               pre_sow_rain = 0
            endif
            if month = 1 and is_end_month = 1 then
              jan_rain = sum_rain
              sum_rain = 0
            endif
            if month = 2 and is_end_month = 1 then
              feb_rain = sum_rain
              sum_rain = 0
            endif
            if month = 3 and is_end_month = 1 then
              mar_rain = sum_rain
              sum_rain = 0
            endif
            if month = 4 and is_end_month = 1 then
              apr_rain = sum_rain
              sum_rain = 0
            endif
            if month = 5 and is_end_month = 1 then
              may_rain = sum_rain
              sum_rain = 0
            endif
            if month = 6 and is_end_month = 1 then
              jun_rain = sum_rain
              sum_rain = 0
            endif
            if month = 7 and is_end_month = 1 then
              jul_rain = sum_rain
              sum_rain = 0
            endif
            if month = 8 and is_end_month = 1 then
              aug_rain = sum_rain
              sum_rain = 0
            endif
            if month = 9 and is_end_month = 1 then
              sep_rain = sum_rain
              sum_rain = 0
            endif
            if month = 10 and is_end_month = 1 then
              oct_rain = sum_rain
              sum_rain = 0
            endif
            if month = 11 and is_end_month = 1 then
              nov_rain = sum_rain
              sum_rain = 0
            endif
            if month = 12 and is_end_month = 1 then
              dec_rain = sum_rain
              sum_rain = 0
            endif
            sum_rain = sum_rain + rain
            !!!!!!!!!!!!!!!!!!!!!!!!!!!!!!!!!!  residue  !!!!!!!!!!!!!!!!!!!!!!!!!!!!!!!!!!
            
            */
            /*
                
            if year = 2002 and day = 114 then
              samp_start_sw = esw
              rain_samp_start_sw = pre_sow_rain
            endif
            if year = 2002 and day = 360 then
              sim_finish_sw = esw
              rain_samp_finish_sw = grain_fill_rain
            endif
            
            */
        }
    }
}
```
          Soil: Latitude=0; Longitude=0
            Water: FilledFromTop=false
              Thickness=[100, 100, 100, 100, 100, 100, 100, 100, 100, 100, 100, 100, 100, 100, 100, 100, 100, 100, 100, 100]
              InitialValues=[0.09, 0.122, 0.131, 0.153, 0.16, 0.194, 0.2, 0.22, 0.23, 0.24, 0.24, 0.25, 0.25, 0.25, 0.25, 0.25, 0.25, 0.25, 0.25, 0.25]
            Physical
              Thickness  BD    AirDry  LL15   DUL    SAT
              100        1.4   0.08    0.09   0.272  0.453
              100        1.42  0.08    0.122  0.311  0.445
              100        1.43  0.08    0.131  0.322  0.441
              100        1.45  0.08    0.153  0.341  0.454
              100        1.46  0.08    0.16   0.377  0.45
              100        1.49  0.08    0.194  0.413  0.43
              100        1.52  0.08    0.2    0.41   0.42
              100        1.52  0.08    0.22   0.41   0.42
              100        1.52  0.08    0.23   0.41   0.42
              100        1.52  0.08    0.24   0.41   0.42
              100        1.52  0.08    0.24   0.41   0.42
              100        1.52  0.08    0.25   0.391  0.42
              100        1.52  0.08    0.25   0.391  0.42
              100        1.52  0.08    0.25   0.391  0.406
              100        1.52  0.08    0.25   0.382  0.406
              100        1.52  0.08    0.25   0.374  0.406
              100        1.52  0.08    0.25   0.374  0.406
              100        1.52  0.08    0.25   0.374  0.406
              100        1.52  0.08    0.25   0.374  0.406
              100        1.52  0.08    0.25   0.374  0.406
              SoilCrop canola
                LL=[0.09, 0.122, 0.131, 0.153, 0.16, 0.194, 0.2, 0.22, 0.23, 0.24, 0.24, 0.25, 0.25, 0.25, 0.25, 0.25, 0.25, 0.25, 0.25, 0.25]
                KL=[0.08, 0.08, 0.08, 0.08, 0.08, 0.08, 0.08, 0.08, 0.08, 0.08, 0.08, 0.08, 0.08, 0.08, 0.08, 0.08, 0.08, 0.08, 0.08, 0.08]
                XF=[1, 1, 1, 1, 1, 1, 1, 1, 1, 1, 1, 1, 1, 1, 1, 1, 1, 1, 1, 1]
            WaterBalance SoilWater: same as Incomplete.Southern NSW.Ginnindera_96.paddock.soil.SoilWater
            Organic: FOMCNRatio=30; CarbonUnits=Total
              Thickness  Carbon  SoilCNRatio  FBiom  FInert  FOM
              100        1.8     14.5         0.07   0.36    293.1807
              100        1.1     14.5         0.03   0.35    252.3429
              100        1       14.5         0.03   0.45    217.1936
              100        0.62    14.5         0.02   0.45    186.9402
              100        0.42    14.5         0.02   0.59    160.901
              100        0.22    14.5         0.02   0.6     138.4887
              100        0.19    14.5         0.02   0.84    119.1984
              100        0.17    14.5         0.02   0.8     102.595
              100        0.15    14.5         0.01   0.8     88.3043
              100        0.12    14.5         0.01   0.99    76.0042
              100        0.11    14.5         0.01   0.99    65.4174
              100        0.1     14.5         0.01   0.99    56.3053
              100        0.1     14.5         0.01   0.99    48.4624
              100        0.1     14.5         0.01   0.99    41.712
              100        0.1     14.5         0.01   0.99    35.9019
              100        0.1     14.5         0.01   0.99    30.901
              100        0.08    14.5         0.01   0.99    26.5967
              100        0.06    14.5         0.01   0.99    22.892
              100        0.05    14.5         0.01   0.99    19.7034
              100        0.04    14.5         0.01   0.99    16.9588
            Chemical: same as Incomplete.Southern NSW.Ginnindera_96.paddock.soil.Chemical
            Nutrient
            Solute NO3: InitialValuesUnits=ppm; WaterTableConcentration=0; D0=0; DepthConstant=0; MaxDepthSoluteAccessible=0; RunoffEffectivenessAtMovingSolute=0; MaxEffectiveRunoff=0
              Thickness=[100, 100, 100, 100, 100, 100, 100, 100, 100, 100, 100, 100, 100, 100, 100, 100, 100, 100, 100, 100]
              InitialValues=[45.5, 7.2, 2.7, 1.8, 1.3, 0.8, 0.9, 1, 0.8, 0.6, 0.6, 0.6, 0.5, 0.5, 0.6, 0.6, 0.6, 0.6, 0.6, 0.6]
            Solute NH4: InitialValuesUnits=ppm; WaterTableConcentration=0; D0=0; DepthConstant=0; MaxDepthSoluteAccessible=0; RunoffEffectivenessAtMovingSolute=0; MaxEffectiveRunoff=0
              Thickness=[100, 100, 100, 100, 100, 100, 100, 100, 100, 100, 100, 100, 100, 100, 100, 100, 100, 100, 100, 100]
              InitialValues=[0.62, 0.09, 0.09, 0.065, 0.055, 0.08, 0.08, 0.08, 0.08, 0.08, 0.08, 0.08, 0.08, 0.08, 0.08, 0.08, 0.08, 0.08, 0.08, 0.08]
            Solute Urea: same as Validation.Growth Experiments.Wagga.Wagga2008.WaggaWagga2008.Paddock.Soil.Urea
            SoilTemperature Temperature
          SurfaceOrganicMatter SurfaceOM: InitialResidueName=wheat; InitialResidueType=wheat; InitialResidueMass=2000; InitialStandingFraction=0; InitialCPR=0; InitialCNR=76
          Plant canola: ResourceName=Canola
          MicroClimate: a_interception=0; b_interception=1; c_interception=0; d_interception=0; SoilHeatFluxFraction=0.4; MinimumHeightDiffForNewLayer=0; NightInterceptionFraction=0.5; ReferenceHeight=2
          Report SowingReport: EventNames=[Canola].Sowing
            VariableNames:
              [Clock].Today
              [Canola].SowingData.Cultivar
              [IWeather].Latitude
              [IWeather].Longitude
        SoilArbitrator
      Simulation simulation4
        Clock: Start=2002-01-01; End=2002-12-31
        Summary summaryfile
        Weather: FileName=met/wallendbeen_02.met
        Zone paddock: Area=1; Slope=0; AspectAngle=0; Altitude=50
          Report outputfile: same as Incomplete.Southern NSW.Ardlethan_03_S1.paddock.outputfile
          Operations
            2002-05-14  // canola sow cultivar = rainbow, plants = 40 (/m2), sowing_depth = 10 (mm), row_spacing = 300
            2002-05-14  Fertiliser.Apply(10, Fertiliser.Types., 30);
            2002-04-24  // 'soil nitrogen' set no3ppm = 45.5 7.2 2.7 1.8 1.3 0.8 0.9 1.0 0.8 0.6 0.6 0.6 0.5 0.5 0.6 0.6 0.6 0.6 0.6 0.6
            2002-04-24  // 'soil water' set sw = 0.153 0.244 0.231 0.246 0.260 0.270 0.283 0.285 0.280 0.276 0.272 0.270 0.269 0.285 0.289 0.291 0.291 0.291 0.291 0.291
            2002-07-17  Fertiliser.Apply(46, Fertiliser.Types., 30);
            2002-09-03  Fertiliser.Apply(46, Fertiliser.Types., 30);
          Manager: same as Incomplete.Southern NSW.simulation3.paddock.manager
          Soil: same as Incomplete.Southern NSW.simulation3.paddock.soil
          SurfaceOrganicMatter SurfaceOM: InitialResidueName=wheat; InitialResidueType=wheat; InitialResidueMass=2000; InitialStandingFraction=0; InitialCPR=0; InitialCNR=76
          Plant canola: ResourceName=Canola
          MicroClimate: a_interception=0; b_interception=1; c_interception=0; d_interception=0; SoilHeatFluxFraction=0.4; MinimumHeightDiffForNewLayer=0; NightInterceptionFraction=0.5; ReferenceHeight=2
          Report SowingReport: EventNames=[Canola].Sowing
            VariableNames:
              [Clock].Today
              [Canola].SowingData.Cultivar
              [IWeather].Latitude
              [IWeather].Longitude
        SoilArbitrator
      Simulation simulation5
        Clock: Start=2002-01-01; End=2002-12-31
        Summary summaryfile
        Weather: FileName=met/wallendbeen_02.met
        Zone paddock: Area=1; Slope=0; AspectAngle=0; Altitude=50
          Report outputfile: same as Incomplete.Southern NSW.Ardlethan_03_S1.paddock.outputfile
          Operations
            2002-05-29  // canola sow cultivar = rainbow, plants = 40 (/m2), sowing_depth = 10 (mm), row_spacing = 300
            2002-05-29  Fertiliser.Apply(10, Fertiliser.Types., 30);
            2002-04-24  // 'soil nitrogen' set no3ppm = 45.5 7.2 2.7 1.8 1.3 0.8 0.9 1.0 0.8 0.6 0.6 0.6 0.5 0.5 0.6 0.6 0.6 0.6 0.6 0.6
            2002-04-24  // 'soil water' set sw = 0.153 0.244 0.231 0.246 0.260 0.270 0.283 0.285 0.280 0.276 0.272 0.270 0.269 0.285 0.289 0.291 0.291 0.291 0.291 0.291
            2002-07-17  Fertiliser.Apply(46, Fertiliser.Types., 30);
            2002-09-03  Fertiliser.Apply(46, Fertiliser.Types., 30);
          Manager: same as Incomplete.Southern NSW.simulation3.paddock.manager
          Soil: same as Incomplete.Southern NSW.simulation3.paddock.soil
          SurfaceOrganicMatter SurfaceOM: InitialResidueName=wheat; InitialResidueType=wheat; InitialResidueMass=2000; InitialStandingFraction=0; InitialCPR=0; InitialCNR=76
          Plant canola: ResourceName=Canola
          MicroClimate: a_interception=0; b_interception=1; c_interception=0; d_interception=0; SoilHeatFluxFraction=0.4; MinimumHeightDiffForNewLayer=0; NightInterceptionFraction=0.5; ReferenceHeight=2
          Report SowingReport: EventNames=[Canola].Sowing
            VariableNames:
              [Clock].Today
              [Canola].SowingData.Cultivar
              [IWeather].Latitude
              [IWeather].Longitude
        SoilArbitrator
      Simulation Wallendbeen_03_S1
        Clock: Start=2003-01-01; End=2003-12-31
        Summary summaryfile
        Weather: FileName=met/Wallendbeen_03.met
        Zone paddock: Area=1; Slope=0; AspectAngle=0; Altitude=50
          Report outputfile: same as Incomplete.Southern NSW.Ardlethan_03_S1.paddock.outputfile
          Operations
            2003-05-01  // canola sow cultivar = rainbow, plants = 30 (/m2), sowing_depth = 10 (mm), row_spacing = 300
            2003-05-01  Fertiliser.Apply(46, Fertiliser.Types., 30);
            2003-05-01  Fertiliser.Apply(12, Fertiliser.Types., 30);
            2003-04-15  // 'soil water' set sw = 0.226 0.258 0.261 0.256 0.286 0.309 0.305 0.309 0.319 0.328
            2003-08-21  Fertiliser.Apply(46, Fertiliser.Types., 30);
          Manager: same as Incomplete.Southern NSW.Grenfell_03_S1.paddock.manager
          Soil: Latitude=0; Longitude=0
            Physical
              Thickness  BD    AirDry  LL15   DUL    SAT
              100        1.4   0.15    0.15   0.295  0.442
              100        1.42  0.172   0.172  0.299  0.434
              100        1.43  0.197   0.197  0.324  0.43
              150        1.45  0.216   0.216  0.349  0.423
              200        1.49  0.272   0.272  0.405  0.408
              200        1.5   0.298   0.298  0.4    0.404
              200        1.5   0.29    0.29   0.4    0.404
              200        1.5   0.291   0.291  0.4    0.404
              200        1.5   0.285   0.285  0.4    0.404
              200        1.5   0.282   0.282  0.4    0.404
              SoilCrop canola
                LL=[0.15, 0.172, 0.197, 0.216, 0.272, 0.298, 0.29, 0.291, 0.285, 0.282]
                KL=[0.08, 0.08, 0.08, 0.08, 0.08, 0.07, 0.06, 0.05, 0.03, 0.01]
                XF=[1, 1, 1, 1, 1, 1, 1, 1, 1, 1]
            WaterBalance SoilWater: same as Incomplete.Southern NSW.Ardlethan_03_S1.paddock.soil.SoilWater
            Organic: same as Incomplete.Southern NSW.Ardlethan_03_S1.paddock.soil.Organic
            Chemical: Thickness=[100, 100, 100, 150, 200, 200, 200, 200, 200, 200]; PH=[5.8, 5.9, 6.6, 6.8, 7, 7.1, 7.2, 7.3, 7.4, 7.4]; PHUnits=Water
            Water: Thickness=[100, 100, 100, 150, 200, 200, 200, 200, 200, 200]; FilledFromTop=false
              InitialValues=[0.15, 0.172, 0.197, 0.216, 0.272, 0.298, 0.29, 0.291, 0.285, 0.282]
            Nutrient
            Solute NO3: Thickness=[100, 100, 100, 150, 200, 200, 200, 200, 200, 200]; InitialValues=[73.1, 24.4, 16.1, 9.8, 6.6, 6.3, 8, 8.2, 6.4, 4.3]; InitialValuesUnits=ppm; WaterTableConcentration=0; D0=0; DepthConstant=0; MaxDepthSoluteAccessible=0; RunoffEffectivenessAtMovingSolute=0; MaxEffectiveRunoff=0
            Solute NH4: same as Incomplete.Southern NSW.Ardlethan_03_S1.paddock.soil.NH4
            Solute Urea: same as Incomplete.Southern NSW.Ardlethan_03_S1.paddock.soil.Urea
            SoilTemperature Temperature
          SurfaceOrganicMatter SurfaceOM: InitialResidueName=wheat; InitialResidueType=wheat; InitialResidueMass=2000; InitialStandingFraction=0; InitialCPR=0; InitialCNR=76
          Plant canola: ResourceName=Canola
          MicroClimate: a_interception=0; b_interception=1; c_interception=0; d_interception=0; SoilHeatFluxFraction=0.4; MinimumHeightDiffForNewLayer=0; NightInterceptionFraction=0.5; ReferenceHeight=2
          Report SowingReport: EventNames=[Canola].Sowing
            VariableNames:
              [Clock].Today
              [Canola].SowingData.Cultivar
              [IWeather].Latitude
              [IWeather].Longitude
        SoilArbitrator
      Simulation Wallendbeen_03_S2
        Clock: Start=2003-01-01; End=2003-12-31
        Summary summaryfile
        Weather: FileName=met/Wallendbeen_03.met
        Zone paddock: Area=1; Slope=0; AspectAngle=0; Altitude=50
          Report outputfile: same as Incomplete.Southern NSW.Ardlethan_03_S1.paddock.outputfile
          Operations
            2003-05-13  // canola sow cultivar = rainbow, plants = 30 (/m2), sowing_depth = 10 (mm), row_spacing = 300
            2003-05-13  Fertiliser.Apply(46, Fertiliser.Types., 30);
            2003-05-01  Fertiliser.Apply(12, Fertiliser.Types., 30);
            2003-04-15  // 'soil water' set sw = 0.226 0.258 0.261 0.256 0.286 0.309 0.305 0.309 0.319 0.328
            2003-08-21  Fertiliser.Apply(46, Fertiliser.Types., 30);
          Manager: same as Incomplete.Southern NSW.Grenfell_03_S1.paddock.manager
          Soil: same as Incomplete.Southern NSW.Wallendbeen_03_S1.paddock.soil
          SurfaceOrganicMatter SurfaceOM: InitialResidueName=wheat; InitialResidueType=wheat; InitialResidueMass=2000; InitialStandingFraction=0; InitialCPR=0; InitialCNR=76
          Plant canola: ResourceName=Canola
          MicroClimate: a_interception=0; b_interception=1; c_interception=0; d_interception=0; SoilHeatFluxFraction=0.4; MinimumHeightDiffForNewLayer=0; NightInterceptionFraction=0.5; ReferenceHeight=2
          Report SowingReport: EventNames=[Canola].Sowing
            VariableNames:
              [Clock].Today
              [Canola].SowingData.Cultivar
              [IWeather].Latitude
              [IWeather].Longitude
        SoilArbitrator
      Simulation Wallendbeen_03_S3
        Clock: Start=2003-01-01; End=2003-12-31
        Summary summaryfile
        Weather: FileName=met/Wallendbeen_03.met
        Zone paddock: Area=1; Slope=0; AspectAngle=0; Altitude=50
          Report outputfile: same as Incomplete.Southern NSW.Ardlethan_03_S1.paddock.outputfile
          Operations
            2003-05-30  // canola sow cultivar = rainbow, plants = 25 (/m2), sowing_depth = 10 (mm), row_spacing = 300
            2003-05-30  Fertiliser.Apply(46, Fertiliser.Types., 30);
            2003-05-01  Fertiliser.Apply(12, Fertiliser.Types., 30);
            2003-04-15  // 'soil water' set sw = 0.226 0.258 0.261 0.256 0.286 0.309 0.305 0.309 0.319 0.328
            2003-08-21  Fertiliser.Apply(46, Fertiliser.Types., 30);
          Manager: same as Incomplete.Southern NSW.Grenfell_03_S1.paddock.manager
          Soil: same as Incomplete.Southern NSW.Wallendbeen_03_S1.paddock.soil
          SurfaceOrganicMatter SurfaceOM: InitialResidueName=wheat; InitialResidueType=wheat; InitialResidueMass=2000; InitialStandingFraction=0; InitialCPR=0; InitialCNR=76
          Plant canola: ResourceName=Canola
          MicroClimate: a_interception=0; b_interception=1; c_interception=0; d_interception=0; SoilHeatFluxFraction=0.4; MinimumHeightDiffForNewLayer=0; NightInterceptionFraction=0.5; ReferenceHeight=2
          Report SowingReport: EventNames=[Canola].Sowing
            VariableNames:
              [Clock].Today
              [Canola].SowingData.Cultivar
              [IWeather].Latitude
              [IWeather].Longitude
        SoilArbitrator
      Simulation Lockhart_03_S31: same as Incomplete.Southern NSW.Lockhart_03_S3
    Folder Northern NSW and WA
      Folder Empty for copypaste
      Folder Crocantigh_98_monty
        Simulation Crocantigh_98_monty
          Clock: Start=1998-05-01; End=1998-12-26
          Summary summaryfile
          Weather: FileName=met/wallum978.met
          Zone paddock: Area=1; Slope=0; AspectAngle=0; Altitude=50
            Operations
              1998-05-12  [Canola].Sow(population:40, rowSpacing:200, depth:20, cultivar:"monty");
              1998-05-12  [Fertiliser].Apply(amount: 15, type: "UreaN", depth: 50);
            Soil: Latitude=0; Longitude=0
              Physical
                Thickness  BD    AirDry  LL15  DUL   SAT
                100        1.29  0.11    0.2   0.4   0.48
                100        1.32  0.21    0.22  0.41  0.46
                200        1.32  0.24    0.24  0.42  0.47
                200        1.33  0.25    0.26  0.42  0.47
                100        1.39  0.27    0.28  0.4   0.45
                SoilCrop CanolaSoil: LL=[0.2, 0.22, 0.24, 0.26, 0.28]; KL=[0.08, 0.06, 0.04, 0.03, 0.02]; XF=[1, 1, 1, 1, 1]
              WaterBalance SoilWater: SummerDate=1-Nov; SummerU=6; SummerCona=3.5; WinterDate=1-Apr; WinterU=6; WinterCona=3.5; DiffusConst=40; DiffusSlope=16; Salb=0.13; CN2Bare=75; CNRed=20; CNCov=0.8; PSIDul=-100; Thickness=[100, 100, 200, 200, 100]; SWCON=[0.1, 0.1, 0.1, 0.1, 0.1]
              Organic: FOMCNRatio=33; CarbonUnits=Total
                Thickness  Carbon  SoilCNRatio  FBiom  FInert  FOM
                100        0.8     14.5         0.05   0.39    47.1334
                100        0.6     14.5         0.02   0.47    30.7045
                200        0.5     14.5         0.015  0.52    13.0302
                200        0.3     14.5         0.01   0.62    5.5297
                100        0.2     14.5         0.01   0.74    3.6022
              Chemical: Thickness=[100, 100, 200, 200, 100]; PH=[8.9, 8.9, 9, 9, 9]; PHUnits=Water
              Water: Thickness=[100, 100, 200, 200, 100]; InitialValues=[0.4, 0.41, 0.42, 0.42, 0.4]; FilledFromTop=false
              Nutrient
              Solute NO3: Thickness=[100, 100, 200, 200, 100]; InitialValues=[8, 4, 2, 1, 1]; InitialValuesUnits=ppm; WaterTableConcentration=0; D0=0; DepthConstant=0; MaxDepthSoluteAccessible=0; RunoffEffectivenessAtMovingSolute=0; MaxEffectiveRunoff=0
              Solute NH4: Thickness=[100, 100, 200, 200, 100]; InitialValues=[1, 1, 1, 1, 1]; InitialValuesUnits=ppm; WaterTableConcentration=0; D0=0; DepthConstant=0; MaxDepthSoluteAccessible=0; RunoffEffectivenessAtMovingSolute=0; MaxEffectiveRunoff=0
              Solute Urea: Thickness=[100, 100, 200, 200, 100]; InitialValues=[0, 0, 0, 0, 0]; InitialValuesUnits=kg/ha; WaterTableConcentration=0; D0=0; DepthConstant=0; MaxDepthSoluteAccessible=0; RunoffEffectivenessAtMovingSolute=0; MaxEffectiveRunoff=0
              SoilTemperature Temperature
            SurfaceOrganicMatter: InitialResidueName=wheat_stubble; InitialResidueType=wheat; InitialResidueMass=1000; InitialStandingFraction=0; InitialCPR=0; InitialCNR=80
            Plant Canola
            MicroClimate: a_interception=0; b_interception=1; c_interception=0; d_interception=0; SoilHeatFluxFraction=0.4; MinimumHeightDiffForNewLayer=0; NightInterceptionFraction=0.5; ReferenceHeight=2
            Fertiliser
            Manager Harvesting
```csharp
using Models.PMF.Phen;
using System;
using Models.Core;
using System.Collections.Generic;
using System.Text;
using Models.Soils;
using Models.PMF;
using Models;
using System.Xml.Serialization;
using APSIM.Shared.Utilities;

namespace Models
{
    [Serializable] 
    public class Script : Model
    {
        [Link] private Plant Wheat;
        [Link]
        private Phenology phenology;
        [EventSubscribe("DoManagement")]
        private void OnDoManagement(object sender, EventArgs e)
        {
            if (phenology.CurrentPhase.Name == "GrainRipening")
            {
                Wheat.Harvest();
                Wheat.EndCrop();
            }
        }
    }
}
```
            Report SowingReport: EventNames=[Canola].Sowing
              VariableNames:
                [Clock].Today
                [Canola].SowingData.Cultivar
                [IWeather].Latitude
                [IWeather].Longitude
          SoilArbitrator
          Report HarvestReport: EventNames=[Oats].Harvesting
            VariableNames:
              [Canola].Structure.LeafTipsAppeared
              [Canola].Structure.FinalLeafNumber
              [Canola].Phenology.FlagLeafDAS
              [Canola].Phenology.FloweringDAS
              [Canola].Phenology.MaturityDAS
              [Canola].Phenology.CurrentPhase.Name
              [Canola].Phenology.CurrentStageName
              [Canola].AboveGroundLive.Wt
              [Canola].AboveGroundLive.Wt
              [Canola].Grain.Wt
          Report DailyReport: EventNames=[Clock].DoReport
            VariableNames:
              [Clock].Today
              [Canola].Phenology.CurrentStageName
              [Weather].MeanT
              [Soil].Water.Volumetric
              [Soil].Water.MM
              sum([Soil].Water.MM) as ProfileWater
              [Canola].AboveGround.N
              [Canola].AboveGround.Wt
              [Canola].AboveGroundLive.N
              [Canola].AboveGroundLive.N*10 as UptakeNKgHA
              [Canola].AboveGroundLive.Wt
              [Canola].AboveGroundDead.N
              [Canola].AboveGroundDead.Wt
              [Canola].Arbitrator.DMDemand
              [Canola].Arbitrator.DM.TotalFixationSupply
              [Canola].Ear.N
              [Canola].Ear.NConc
              [Canola].Ear.Wt
              [Canola].Grain.N
              [Canola].Grain.NConc
              [Canola].Grain.Number
              [Canola].Grain.Size
              [Canola].Grain.Wt
              [Canola].Grain.Live.Wt
              [Canola].Leaf.AppearedCohortNo
              [Canola].Leaf.CoverDead
              [Canola].Leaf.CoverGreen
              [Canola].Leaf.CoverTotal
              [Canola].Leaf.Dead.N
              [Canola].Leaf.Dead.NConc
              [Canola].Leaf.Dead.Wt
              [Canola].Leaf.DeadCohortNo
              [Canola].Leaf.GreenCohortNo
              [Canola].Leaf.SenescingCohortNo
              [Canola].Leaf.ExpandedCohortNo
              [Canola].Leaf.Fn
              [Canola].Leaf.Fw
              [Canola].Leaf.Height
              [Canola].Leaf.InitialisedCohortNo
              [Canola].Leaf.LAI
              [Canola].Leaf.Live.N
              [Canola].Leaf.Live.NConc
              [Canola].Leaf.Live.Wt
              [Canola].Leaf.SpecificArea
              [Canola].Leaf.Transpiration
              [Canola].Phenology.CurrentPhase.Name
              [Canola].Phenology.CurrentStageName
              [Canola].Phenology.DailyVernalisation
              [Canola].Phenology.MeanTemp
              [Canola].Phenology.Photoperiod
              [Canola].Phenology.Stage
              [Canola].Phenology.ThermalTime
              [Canola].Phenology.ThermalTime
              [Canola].Phenology.Vrn1
              [Canola].Phenology.Vrn2
              [Canola].Phenology.Vrn4
              [Canola].Phenology.Zadok.Stage
              [Canola].Root.Depth
              [Canola].Root.N
              [Canola].Root.Wt
              [Canola].Root.NConc
              [Canola].Root.WaterUptake
              [Canola].Panicle.N
              [Canola].Panicle.NConc
              [Canola].Panicle.Wt
              [Canola].Panicle.Live.StorageWt
              [Canola].Stem.N
              [Canola].Stem.NConc
              [Canola].Stem.Wt
              [Canola].Stem.PercentWSC
              [Canola].Stem.Live.StorageWt
              [Canola].StemPlusPanicle.Wt
              [Canola].StemPlusPanicle.N
              [Canola].SowingData.Cultivar
              [Canola].Structure.HaunStageTerminalSpikelet
              [Canola].Structure.HaunStage
              [Canola].Structure.Height
              [Canola].Structure.LeafTipsAppeared
              [Canola].Structure.FinalLeafNumber
              [Canola].Structure.FinalLeafNumber.ValueToHold.PhotoPLeaves
              [Canola].Structure.MainStemPopn
              [Canola].Structure.MeanTillerGrowthRate
              [Canola].Structure.TotalStemPopn
              [Canola].Total.N
              [Canola].Total.Wt
              [SurfaceOrganicMatter].Wt
              ([Canola].Leaf.Transpiration + [Soil].SoilWater.Es + [MicroClimate].interception) as ET
              sum([Soil].NO3.kgha) as TotalSoilNitrogen
              [Canola].Phenology.FlagLeafDAS
              [Canola].Phenology.FloweringDAS
              [Canola].Phenology.MaturityDAS
              [Canola].Phenology.PhotoPeriod
              [Canola].Phenology.PhotoPeriodDeltaFunction
              [Canola].Phenology.Stage
              [Canola].Phenology.SoilTemperatureFunction
              [Clock].Today.Year
      Experiment Gatton2000_monty_s1_s2
        Factors
          Factor SowingDate: Specification=[Sowing]
            Operations s1
              2000-05-11  [Canola].Sow(population:60, rowSpacing:200, depth:20, cultivar:"monty");
              2000-06-20  [Fertiliser].Apply(amount: 120, type: "NH4NO3N", depth: 50);
            Operations s2
              2000-06-21  [Canola].Sow(population:60, rowSpacing:200, depth:20, cultivar:"monty");
              2000-06-21  [Fertiliser].Apply(amount: 160, type: "NH4NO3N", depth: 50);
        Simulation Gatton2000Base
          Clock: Start=2000-04-30; End=2000-12-25
          Summary summaryfile
          Weather: FileName=met/Gatton_00.met
          Zone Paddock: Area=1; Slope=0; AspectAngle=0; Altitude=50
            Irrigation
            Fertiliser
            SurfaceOrganicMatter: InitialResidueName=wheat_stubble; InitialResidueType=wheat; InitialResidueMass=1000; InitialStandingFraction=0; InitialCPR=0; InitialCNR=80
            Report DailyReport
            Report HarvestReport: same as Incomplete.Northern NSW and WA.Crocantigh_98_monty.Crocantigh_98_monty.HarvestReport
            Operations Sowing
            Plant canola: ResourceName=Canola
            Soil: Latitude=0; Longitude=0
              Water: Thickness=[150, 150, 300, 300, 300, 300, 300]; InitialValues=[0.2, 0.28, 0.34, 0.32, 0.29, 0.26, 0.33]; FilledFromTop=false
              Physical
                Thickness  BD   AirDry  LL15  DUL    SAT
                150        1.2  0.1     0.2   0.413  0.453
                150        1.2  0.26    0.28  0.454  0.504
                300        1.2  0.32    0.34  0.495  0.545
                300        1.2  0.3     0.32  0.495  0.545
                300        1.3  0.27    0.29  0.418  0.468
                300        1.3  0.24    0.26  0.406  0.457
                300        1.3  0.31    0.33  0.385  0.435
                SoilCrop CanolaSoil: LL=[0.2, 0.28, 0.34, 0.34, 0.3, 0.35, 0.38]; KL=[0.08, 0.06, 0.04, 0.08, 0.06, 0.04, 0.02]; XF=[1, 1, 1, 1, 1, 1, 1]
              WaterBalance SoilWater: SummerDate=1-Nov; SummerU=6; SummerCona=3.5; WinterDate=1-Apr; WinterU=6; WinterCona=3.5; DiffusConst=40; DiffusSlope=16; Salb=0.13; CN2Bare=75; CNRed=20; CNCov=0.8; PSIDul=-100; Thickness=[150, 150, 300, 300, 300, 300, 300]; SWCON=[0.3, 0.3, 0.3, 0.3, 0.3, 0.3, 0.3]
              Organic: FOMCNRatio=33; CarbonUnits=Total
                Thickness  Carbon  SoilCNRatio  FBiom  FInert  FOM
                150        1       14.5         0.05   0.39    34.7129
                150        0.64    14.5         0.02   0.47    27.0344
                300        0.64    14.5         0.015  0.6     16.3972
                300        0.47    14.5         0.01   0.83    9.9454
                300        0.47    14.5         0.01   0.93    6.0322
                300        0.35    14.5         0.01   0.93    3.6587
                300        0.26    14.5         0.01   0.93    2.2191
              Chemical: Thickness=[150, 150, 300, 300, 300, 300, 300]; PH=[6.5, 6.2, 6.2, 6.3, 6.3, 6.4, 6.5]; PHUnits=Water
              Nutrient
              Solute NO3: same as Validation.Phenology Experiments.OCP Phenology.Gatton2015.Gatton2015Base.Paddock.soil.NO3
              Solute NH4: same as Validation.Phenology Experiments.OCP Phenology.Gatton2015.Gatton2015Base.Paddock.soil.NH4
              Solute Urea: same as Validation.Phenology Experiments.OCP Phenology.Gatton2015.Gatton2015Base.Paddock.soil.Urea
              SoilTemperature Temperature
            MicroClimate: a_interception=0; b_interception=1; c_interception=0; d_interception=0; SoilHeatFluxFraction=0.4; MinimumHeightDiffForNewLayer=0; NightInterceptionFraction=0.5; ReferenceHeight=2
            Manager
              script: same as in Validation.Phenology Experiments.OCP Phenology.Gatton2015.Gatton2015Base.Paddock.manager
            Manager Harvesting: same as Incomplete.Northern NSW and WA.Crocantigh_98_monty.Crocantigh_98_monty.paddock.Harvesting
            Report SowingReport: EventNames=[Canola].Sowing
              VariableNames:
                [Clock].Today
                [Canola].SowingData.Cultivar
                [IWeather].Latitude
                [IWeather].Longitude
          SoilArbitrator
      Folder HinesHill97
        Experiment HHill97_DrumTri
          Factors
            Factor TOS_index: Specification=[Operations]
              Operations 1
                1997-05-26  [Canola].Sow(population:70, rowSpacing:200, depth:20, cultivar:"drum_triazine");
                1997-05-26  [Fertiliser].Apply(amount: 65, type: "UreaN", depth: 10);
                1997-07-11  [Fertiliser].Apply(amount: 88, type: "UreaN", depth: 10);
              Operations 2
                1997-06-09  [Canola].Sow(population:70, rowSpacing:200, depth:20, cultivar:"drum_triazine");
                1997-06-09  [Fertiliser].Apply(amount: 65, type: "UreaN", depth: 10);
                1997-07-11  [Fertiliser].Apply(amount: 88, type: "UreaN", depth: 10);
              Operations 3
                1997-06-23  [Canola].Sow(population:70, rowSpacing:200, depth:20, cultivar:"drum_triazine");
                1997-06-23  [Fertiliser].Apply(amount: 65, type: "UreaN", depth: 10);
                1997-07-25  [Fertiliser].Apply(amount: 88, type: "UreaN", depth: 10);
          Simulation HHill97_Base_DrumTri
            Summary summaryfile
            Zone Paddock: Area=1; Slope=0; AspectAngle=0; Altitude=50
              Operations
                0001-01-01  Dummy for replacement
              Irrigation
              Fertiliser
              Report DailyReport
              Plant canola: ResourceName=Canola
              MicroClimate: a_interception=0; b_interception=1; c_interception=0; d_interception=0; SoilHeatFluxFraction=0.4; MinimumHeightDiffForNewLayer=0; NightInterceptionFraction=0.5; ReferenceHeight=2
              Manager: same as Incomplete.Northern NSW and WA.Gatton2000_monty_s1_s2.Gatton2000Base.Paddock.manager
              Soil: SoilType=sand; Latitude=0; Longitude=0
                Physical
                  Thickness  BD    AirDry  LL15   DUL     SAT
                  50         1.31  0.04    0.05   0.13    0.35
                  50         1.31  0.05    0.05   0.13    0.35
                  100        1.45  0.08    0.08   0.14    0.35
                  100        1.48  0.085   0.085  0.144   0.35
                  100        1.48  0.085   0.085  0.144   0.35
                  100        1.53  0.095   0.095  0.147   0.35
                  100        1.53  0.095   0.095  0.147   0.35
                  100        1.5   0.1     0.1    0.151   0.35
                  200        1.5   0.1     0.1    0.1555  0.35
                  200        1.5   0.1     0.1    0.16    0.35
                  200        1.5   0.1     0.1    0.175   0.35
                  200        1.5   0.1     0.1    0.175   0.35
                  200        1.5   0.11    0.11   0.175   0.35
                  200        1.5   0.11    0.11   0.175   0.35
                  200        1.5   0.11    0.11   0.175   0.35
                  200        1.5   0.11    0.11   0.175   0.35
                  200        1.5   0.11    0.11   0.175   0.35
                  SoilCrop CanolaSoil
                    LL=[0.05, 0.05, 0.08, 0.085, 0.085, 0.095, 0.095, 0.1, 0.1, 0.1, 0.11, 0.11, 0.12, 0.12, 0.13, 0.13, 0.13]
                    KL=[0.06, 0.06, 0.06, 0.06, 0.06, 0.06, 0.06, 0.06, 0.06, 0.06, 0.06, 0.06, 0.06, 0.06, 0.06, 0.06, 0.06]
                    XF=[0.2, 0.2, 0.2, 0.5, 0.5, 0.7, 0.7, 0.7, 0.7, 0.7, 0.7, 0.7, 0.5, 0.5, 0.5, 0.5, 0.5]
                WaterBalance SoilWater: SummerDate=1-Nov; SummerU=6; SummerCona=2; WinterDate=1-Apr; WinterU=6; WinterCona=2; DiffusConst=88; DiffusSlope=35; Salb=0.13; CN2Bare=60; CNRed=20; CNCov=0.8; PSIDul=-100
                  Thickness=[50, 50, 100, 100, 100, 100, 100, 100, 200, 200, 200, 200, 200, 200, 200, 200, 200]
                  SWCON=[0.65, 0.65, 0.65, 0.65, 0.65, 0.65, 0.65, 0.65, 0.65, 0.65, 0.65, 0.65, 0.65, 0.65, 0.65, 0.65, 0.65]
                Organic: FOMCNRatio=20; CarbonUnits=Total
                  Thickness  Carbon  SoilCNRatio  FBiom  FInert  FOM
                  50         1.23    13           0.04   0.1     207.5266
                  50         0.43    13           0.04   0.1     195.4412
                  100        0.37    13           0.03   0.1     173.3408
                  100        0.26    13           0.02   0.2     153.7395
                  100        0.26    13           0.02   0.2     136.3547
                  100        0.21    13           0.01   0.8     120.9358
                  100        0.21    13           0.01   0.8     107.2604
                  100        0.2     13           0.01   0.9     95.1314
                  200        0.19    13           0.01   0.9     74.833
                  200        0.18    13           0.01   0.9     58.8658
                  200        0.18    13           0.01   0.9     46.3054
                  200        0.18    13           0.01   0.9     36.4252
                  200        0.17    13           0.01   0.9     28.653
                  200        0.17    13           0.01   0.9     22.5393
                  200        0.17    13           0.01   0.9     17.73
                  200        0.17    13           0.01   0.9     13.9469
                  200        0.17    13           0.01   0.9     10.971
                Chemical: PH=[4.7, 5.1, 5.1, 5.1, 6, 6, 6, 6, 6, 6, 6, 6, 6, 6, 6, 6, 6]; PHUnits=Water
                  Thickness=[50, 50, 100, 100, 100, 100, 100, 100, 200, 200, 200, 200, 200, 200, 200, 200, 200]
                Water: FilledFromTop=false
                  Thickness=[50, 50, 100, 100, 100, 100, 100, 100, 200, 200, 200, 200, 200, 200, 200, 200, 200]
                  InitialValues=[0.05, 0.05, 0.08, 0.085, 0.0968, 0.1054, 0.1054, 0.1102, 0.1111, 0.112, 0.123, 0.123, 0.131, 0.131, 0.139, 0.139, 0.139]
                Nutrient
                Solute NO3: InitialValuesUnits=ppm; WaterTableConcentration=0; D0=0; DepthConstant=0; MaxDepthSoluteAccessible=0; RunoffEffectivenessAtMovingSolute=0; MaxEffectiveRunoff=0
                  Thickness=[50, 50, 100, 100, 100, 100, 100, 100, 200, 200, 200, 200, 200, 200, 200, 200, 200]
                  InitialValues=[11, 15, 14.4, 7.2, 3.4, 2, 0.8, 0.4, 1.4, 0.8, 0.2, 0.2, 0.2, 0.2, 0.2, 0.2, 0.2]
                Solute NH4: InitialValuesUnits=ppm; WaterTableConcentration=0; D0=0; DepthConstant=0; MaxDepthSoluteAccessible=0; RunoffEffectivenessAtMovingSolute=0; MaxEffectiveRunoff=0
                  Thickness=[50, 50, 100, 100, 100, 100, 100, 100, 200, 200, 200, 200, 200, 200, 200, 200, 200]
                  InitialValues=[4.8, 3.2, 1.8, 0.6, 0.4, 0.2, 0.1, 0.1, 0.1, 0.1, 0.1, 0.1, 0.1, 0.1, 0.1, 0.1, 0.1]
                Solute Urea: InitialValues=[0, 0, 0, 0, 0, 0, 0, 0, 0, 0, 0, 0, 0, 0, 0, 0, 0]; InitialValuesUnits=kg/ha; WaterTableConcentration=0; D0=0; DepthConstant=0; MaxDepthSoluteAccessible=0; RunoffEffectivenessAtMovingSolute=0; MaxEffectiveRunoff=0
                  Thickness=[50, 50, 100, 100, 100, 100, 100, 100, 200, 200, 200, 200, 200, 200, 200, 200, 200]
                SoilTemperature Temperature
              SurfaceOrganicMatter: InitialResidueName=chickpea; InitialResidueType=chickpea; InitialResidueMass=4500; InitialStandingFraction=0; InitialCPR=0; InitialCNR=25
              Report HarvestReport: same as Incomplete.Northern NSW and WA.Crocantigh_98_monty.Crocantigh_98_monty.HarvestReport
              Manager Harvesting: same as Incomplete.Northern NSW and WA.Crocantigh_98_monty.Crocantigh_98_monty.paddock.Harvesting
              Report SowingReport: EventNames=[Canola].Sowing
                VariableNames:
                  [Clock].Today
                  [Canola].SowingData.Cultivar
                  [IWeather].Latitude
                  [IWeather].Longitude
            SoilArbitrator
            Clock: Start=1997-01-01; End=1997-12-31
            Weather: FileName=met/hineshill.met
        Experiment HHill97_KarooTri
          Factors
            Factor TOS_index: Specification=[Operations]
              Operations 1
                1997-05-26  [Canola].Sow(population:70, rowSpacing:200, depth:20, cultivar:"Karoo_triazine");
                1997-05-26  [Fertiliser].Apply(amount: 65, type: "UreaN", depth: 10);
                1997-07-11  [Fertiliser].Apply(amount: 88, type: "UreaN", depth: 10);
              Operations 2
                1997-06-09  [Canola].Sow(population:70, rowSpacing:200, depth:20, cultivar:"Karoo_triazine");
                1997-06-09  [Fertiliser].Apply(amount: 65, type: "UreaN", depth: 10);
                1997-07-11  [Fertiliser].Apply(amount: 88, type: "UreaN", depth: 10);
              Operations 3
                1997-06-23  [Canola].Sow(population:70, rowSpacing:200, depth:20, cultivar:"Karoo_triazine");
                1997-06-23  [Fertiliser].Apply(amount: 65, type: "UreaN", depth: 10);
                1997-07-25  [Fertiliser].Apply(amount: 88, type: "UreaN", depth: 10);
          Simulation HHill97_Base_KarooTri
            Summary summaryfile
            Zone Paddock: Area=1; Slope=0; AspectAngle=0; Altitude=50
              Operations
                0001-01-01  Dummy for replacement
              Irrigation
              Fertiliser
              Report DailyReport
              Plant canola: ResourceName=Canola
              MicroClimate: a_interception=0; b_interception=1; c_interception=0; d_interception=0; SoilHeatFluxFraction=0.4; MinimumHeightDiffForNewLayer=0; NightInterceptionFraction=0.5; ReferenceHeight=2
              Manager: same as Incomplete.Northern NSW and WA.Gatton2000_monty_s1_s2.Gatton2000Base.Paddock.manager
              Soil: same as Incomplete.Northern NSW and WA.HinesHill97.HHill97_DrumTri.HHill97_Base_DrumTri.Paddock.soil
              SurfaceOrganicMatter SurfaceOM: InitialResidueName=chickpea; InitialResidueType=chickpea; InitialResidueMass=4500; InitialStandingFraction=0; InitialCPR=0; InitialCNR=25
              Report HarvestReport: same as Incomplete.Northern NSW and WA.Crocantigh_98_monty.Crocantigh_98_monty.HarvestReport
              Manager Harvesting: same as Incomplete.Northern NSW and WA.Crocantigh_98_monty.Crocantigh_98_monty.paddock.Harvesting
              Report SowingReport: EventNames=[Canola].Sowing
                VariableNames:
                  [Clock].Today
                  [Canola].SowingData.Cultivar
                  [IWeather].Latitude
                  [IWeather].Longitude
            SoilArbitrator
            Clock: Start=1997-01-01; End=1997-12-31
            Weather: FileName=met/hineshill.met
        Experiment HHill97_Monty
          Factors
            Factor TOS_index: Specification=[Operations]
              Operations 1
                1997-05-26  [Canola].Sow(population:70, rowSpacing:200, depth:20, cultivar:"Monty");
                1997-05-26  [Fertiliser].Apply(amount: 65, type: "UreaN", depth: 10);
                1997-07-11  [Fertiliser].Apply(amount: 88, type: "UreaN", depth: 10);
              Operations 2
                1997-06-09  [Canola].Sow(population:70, rowSpacing:200, depth:20, cultivar:"Monty");
                1997-06-09  [Fertiliser].Apply(amount: 65, type: "UreaN", depth: 10);
                1997-07-11  [Fertiliser].Apply(amount: 88, type: "UreaN", depth: 10);
              Operations 3
                1997-06-23  [Canola].Sow(population:70, rowSpacing:200, depth:20, cultivar:"Monty");
                1997-06-23  [Fertiliser].Apply(amount: 65, type: "UreaN", depth: 10);
                1997-07-25  [Fertiliser].Apply(amount: 88, type: "UreaN", depth: 10);
          Simulation HHill97_Base_Monty: same as Incomplete.Northern NSW and WA.HinesHill97.HHill97_KarooTri.HHill97_Base_KarooTri
        Experiment HHill97_Hyola42
          Factors
            Factor TOS_index: Specification=[Operations]
              Operations 1
                1997-05-26  [Canola].Sow(population:70, rowSpacing:200, depth:20, cultivar:"Hyola42");
                1997-05-26  [Fertiliser].Apply(amount: 65, type: "UreaN", depth: 10);
                1997-07-11  [Fertiliser].Apply(amount: 88, type: "UreaN", depth: 10);
              Operations 2
                1997-06-09  [Canola].Sow(population:70, rowSpacing:200, depth:20, cultivar:"Hyola42");
                1997-06-09  [Fertiliser].Apply(amount: 65, type: "UreaN", depth: 10);
                1997-07-11  [Fertiliser].Apply(amount: 88, type: "UreaN", depth: 10);
              Operations 3
                1997-06-23  [Canola].Sow(population:70, rowSpacing:200, depth:20, cultivar:"Hyola42");
                1997-06-23  [Fertiliser].Apply(amount: 65, type: "UreaN", depth: 10);
                1997-07-25  [Fertiliser].Apply(amount: 88, type: "UreaN", depth: 10);
          Simulation HHill97_Base_Hyola42: same as Incomplete.Northern NSW and WA.HinesHill97.HHill97_KarooTri.HHill97_Base_KarooTri
        Experiment HHill97_Oscar
          Factors
            Factor TOS_index: Specification=[Operations]
              Operations 1
                1997-05-26  [Canola].Sow(population:70, rowSpacing:200, depth:20, cultivar:"Oscar");
                1997-05-26  [Fertiliser].Apply(amount: 65, type: "UreaN", depth: 10);
                1997-07-11  [Fertiliser].Apply(amount: 88, type: "UreaN", depth: 10);
              Operations 2
                1997-06-09  [Canola].Sow(population:70, rowSpacing:200, depth:20, cultivar:"Oscar");
                1997-06-09  [Fertiliser].Apply(amount: 65, type: "UreaN", depth: 10);
                1997-07-11  [Fertiliser].Apply(amount: 88, type: "UreaN", depth: 10);
              Operations 3
                1997-06-23  [Canola].Sow(population:70, rowSpacing:200, depth:20, cultivar:"Oscar");
                1997-06-23  [Fertiliser].Apply(amount: 65, type: "UreaN", depth: 10);
                1997-07-25  [Fertiliser].Apply(amount: 88, type: "UreaN", depth: 10);
          Simulation HHill97_Base_Oscar: same as Incomplete.Northern NSW and WA.HinesHill97.HHill97_KarooTri.HHill97_Base_KarooTri
        Experiment HHill97_Mustard
          Factors
            Factor TOS_index: Specification=[Operations]
              Operations 1
                1997-05-26  [Canola].Sow(population:70, rowSpacing:200, depth:20, cultivar:"Mustard");
                1997-05-26  [Fertiliser].Apply(amount: 65, type: "UreaN", depth: 10);
                1997-07-11  [Fertiliser].Apply(amount: 88, type: "UreaN", depth: 10);
              Operations 2
                1997-06-09  [Canola].Sow(population:70, rowSpacing:200, depth:20, cultivar:"Mustard");
                1997-06-09  [Fertiliser].Apply(amount: 65, type: "UreaN", depth: 10);
                1997-07-11  [Fertiliser].Apply(amount: 88, type: "UreaN", depth: 10);
              Operations 3
                1997-06-23  [Canola].Sow(population:70, rowSpacing:200, depth:20, cultivar:"Mustard");
                1997-06-23  [Fertiliser].Apply(amount: 65, type: "UreaN", depth: 10);
                1997-07-25  [Fertiliser].Apply(amount: 88, type: "UreaN", depth: 10);
          Simulation HHill97_Base_Mustard: same as Incomplete.Northern NSW and WA.HinesHill97.HHill97_KarooTri.HHill97_Base_KarooTri
      Folder Karee1999_monty
        Simulation Karee1999Base
          Summary summaryfile
          Zone Paddock: Area=1; Slope=0; AspectAngle=0; Altitude=50
            Irrigation
            Fertiliser
            Report DailyReport
            Report HarvestReport: same as Incomplete.Northern NSW and WA.Crocantigh_98_monty.Crocantigh_98_monty.HarvestReport
            Manager Harvesting: same as Incomplete.Northern NSW and WA.Crocantigh_98_monty.Crocantigh_98_monty.paddock.Harvesting
            Operations
              1999-05-01  [Canola].Sow(population:40, rowSpacing:200, depth:20, cultivar:"monty");
              1999-05-01  [Fertiliser].Apply(amount: 60, type: "NH4NO3N", depth: 50);
            Plant canola: ResourceName=Canola
            Manager: same as Incomplete.Northern NSW and WA.Gatton2000_monty_s1_s2.Gatton2000Base.Paddock.manager
            SurfaceOrganicMatter: InitialResidueName=wheat; InitialResidueType=wheat; InitialResidueMass=1000; InitialStandingFraction=0; InitialCPR=0; InitialCNR=80
            MicroClimate: a_interception=0; b_interception=1; c_interception=0; d_interception=0; SoilHeatFluxFraction=0.4; MinimumHeightDiffForNewLayer=0; NightInterceptionFraction=0.5; ReferenceHeight=2
            Soil: same as Incomplete.Northern NSW and WA.Gatton2000_monty_s1_s2.Gatton2000Base.Paddock.soil
            Report SowingReport: EventNames=[Canola].Sowing
              VariableNames:
                [Clock].Today
                [Canola].SowingData.Cultivar
                [IWeather].Latitude
                [IWeather].Longitude
          SoilArbitrator
          Clock: Start=1999-05-01; End=1999-12-26
          Weather: FileName=met/nind9699.met
      Folder Kullinjah1999_monty
        Simulation Kullinjah1999Base
          Summary summaryfile
          Clock: Start=1999-05-01; End=1999-12-26
          Weather: FileName=met/StGeorge_99.met
          Zone Paddock: Area=1; Slope=0; AspectAngle=0; Altitude=50
            Irrigation
            Fertiliser
            Report DailyReport
            Report HarvestReport: same as Incomplete.Northern NSW and WA.Crocantigh_98_monty.Crocantigh_98_monty.HarvestReport
            Manager Harvesting: same as Incomplete.Northern NSW and WA.Crocantigh_98_monty.Crocantigh_98_monty.paddock.Harvesting
            Operations
              1999-05-15  [Canola].Sow(population:40, rowSpacing:200, depth:20, cultivar:"monty");
              1999-05-15  [Fertiliser].Apply(amount: 60, type: "NH4NO3N", depth: 50);
            Plant canola: ResourceName=Canola
            MicroClimate: a_interception=0; b_interception=1; c_interception=0; d_interception=0; SoilHeatFluxFraction=0.4; MinimumHeightDiffForNewLayer=0; NightInterceptionFraction=0.5; ReferenceHeight=2
            SurfaceOrganicMatter SurfaceOM: InitialResidueName=wheat; InitialResidueType=wheat; InitialResidueMass=1000; InitialStandingFraction=0; InitialCPR=0; InitialCNR=80
            Manager: same as Incomplete.Northern NSW and WA.Gatton2000_monty_s1_s2.Gatton2000Base.Paddock.manager
            Soil: Latitude=0; Longitude=0
              Physical
                Thickness  BD    AirDry  LL15  DUL   SAT
                150        1.52  0.1     0.25  0.39  0.4
                150        1.49  0.2     0.25  0.38  0.41
                300        1.6   0.2     0.25  0.36  0.37
                300        1.6   0.2     0.25  0.35  0.37
                300        1.6   0.2     0.24  0.36  0.37
                300        1.6   0.2     0.26  0.36  0.37
                300        1.6   0.2     0.3   0.36  0.37
                SoilCrop CanolaSoil: LL=[0.25, 0.25, 0.25, 0.25, 0.24, 0.26, 0.3]; KL=[0.08, 0.06, 0.04, 0.08, 0.06, 0.04, 0.02]; XF=[1, 1, 0.5, 0.2, 0, 0, 0]
              WaterBalance SoilWater: SummerDate=1-Nov; SummerU=6; SummerCona=3.5; WinterDate=1-Apr; WinterU=6; WinterCona=3.5; DiffusConst=40; DiffusSlope=16; Salb=0.13; CN2Bare=75; CNRed=20; CNCov=0.8; PSIDul=-100; Thickness=[150, 150, 300, 300, 300, 300, 300]; SWCON=[0.5, 0.5, 0.5, 0.5, 0.5, 0.5, 0.5]
              Organic: same as Incomplete.Northern NSW and WA.Gatton2000_monty_s1_s2.Gatton2000Base.Paddock.soil.Organic
              Chemical: Thickness=[150, 150, 300, 300, 300, 300, 300]; PH=[6.5, 6.2, 6.2, 6.3, 6.3, 6.4, 6.5]; PHUnits=Water
              Water: Thickness=[150, 150, 300, 300, 300, 300, 300]; InitialValues=[0.39, 0.38, 0.36, 0.35, 0.36, 0.36, 0.36]; FilledFromTop=false
              Nutrient
              Solute NO3: Thickness=[150, 150, 300, 300, 300, 300, 300]; InitialValues=[10, 4, 2, 1, 1, 1, 1]; InitialValuesUnits=ppm; WaterTableConcentration=0; D0=0; DepthConstant=0; MaxDepthSoluteAccessible=0; RunoffEffectivenessAtMovingSolute=0; MaxEffectiveRunoff=0
              Solute NH4: Thickness=[150, 150, 300, 300, 300, 300, 300]; InitialValues=[1, 1, 1, 1, 1, 0.2, 0.2]; InitialValuesUnits=ppm; WaterTableConcentration=0; D0=0; DepthConstant=0; MaxDepthSoluteAccessible=0; RunoffEffectivenessAtMovingSolute=0; MaxEffectiveRunoff=0
              Solute Urea: same as Validation.Phenology Experiments.OCP Phenology.Gatton2015.Gatton2015Base.Paddock.soil.Urea
              SoilTemperature Temperature
            Report SowingReport: EventNames=[Canola].Sowing
              VariableNames:
                [Clock].Today
                [Canola].SowingData.Cultivar
                [IWeather].Latitude
                [IWeather].Longitude
          SoilArbitrator
      Folder LakeGrace97
        Experiment LG97_DrumTri
          Factors
            Factor TOS_index: Specification=[Operations]
              Operations 1
                1997-04-23  [Canola].Sow(population:70, rowSpacing:200, depth:20, cultivar:"drum_triazine");
                1997-04-23  [Fertiliser].Apply(amount: 130, type: "UreaN", depth: 10);
                1997-06-18  [Fertiliser].Apply(amount: 40, type: "UreaN", depth: 10);
              Operations 2
                1997-05-22  [Canola].Sow(population:70, rowSpacing:200, depth:20, cultivar:"drum_triazine");
                1997-05-22  [Fertiliser].Apply(amount: 130, type: "UreaN", depth: 10);
                1997-06-18  [Fertiliser].Apply(amount: 40, type: "UreaN", depth: 10);
              Operations 3
                1997-06-03  [Canola].Sow(population:70, rowSpacing:200, depth:20, cultivar:"drum_triazine");
                1997-06-03  [Fertiliser].Apply(amount: 130, type: "UreaN", depth: 10);
                1997-06-18  [Fertiliser].Apply(amount: 40, type: "UreaN", depth: 10);
              Operations 4
                1997-06-17  [Canola].Sow(population:70, rowSpacing:200, depth:20, cultivar:"drum_triazine");
                1997-06-17  [Fertiliser].Apply(amount: 130, type: "UreaN", depth: 10);
                1997-06-18  [Fertiliser].Apply(amount: 40, type: "UreaN", depth: 10);
          Simulation LakeGrace97_Base_DrumTri
            Summary summaryfile
            Zone Paddock: Area=1; Slope=0; AspectAngle=0; Altitude=50
              Operations
                0001-01-01  Dummy for replacement
              Irrigation
              Fertiliser
              Report DailyReport
              Plant canola: ResourceName=Canola
              MicroClimate: a_interception=0; b_interception=1; c_interception=0; d_interception=0; SoilHeatFluxFraction=0.4; MinimumHeightDiffForNewLayer=0; NightInterceptionFraction=0.5; ReferenceHeight=2
              SurfaceOrganicMatter: InitialResidueName=chickpea; InitialResidueType=chickpea; InitialResidueMass=4500; InitialStandingFraction=0; InitialCPR=0; InitialCNR=25
              Report HarvestReport: same as Incomplete.Northern NSW and WA.Crocantigh_98_monty.Crocantigh_98_monty.HarvestReport
              Manager Harvesting: same as Incomplete.Northern NSW and WA.Crocantigh_98_monty.Crocantigh_98_monty.paddock.Harvesting
              Soil: SoilType=sand; Latitude=0; Longitude=0
                Physical
                  Thickness  BD    AirDry  LL15  DUL    SAT
                  50         1.7   0.03    0.05  0.16   0.29
                  50         1.7   0.05    0.05  0.16   0.29
                  100        1.75  0.04    0.04  0.21   0.29
                  100        1.8   0.06    0.06  0.21   0.29
                  100        1.85  0.06    0.06  0.22   0.29
                  100        1.85  0.13    0.13  0.22   0.28
                  100        1.85  0.14    0.14  0.22   0.24
                  100        1.85  0.15    0.15  0.22   0.24
                  200        1.85  0.16    0.16  0.22   0.24
                  200        1.85  0.16    0.16  0.21   0.24
                  200        1.85  0.16    0.16  0.195  0.24
                  200        1.85  0.16    0.16  0.195  0.24
                  200        1.85  0.16    0.16  0.195  0.24
                  200        1.85  0.16    0.16  0.195  0.24
                  200        1.85  0.16    0.16  0.195  0.24
                  200        1.85  0.16    0.16  0.195  0.24
                  200        1.85  0.16    0.16  0.195  0.24
                  SoilCrop CanolaSoil
                    LL=[0.1, 0.1, 0.13, 0.13, 0.14, 0.18, 0.18, 0.19, 0.19, 0.19, 0.18, 0.18, 0.18, 0.18, 0.18, 0.18, 0.18]
                    KL=[0.08, 0.08, 0.08, 0.08, 0.06, 0.04, 0.02, 0.01, 0.01, 0.01, 0.01, 0.01, 0.01, 0.01, 0.01, 0.01, 0.01]
                    XF=[0.1, 0.1, 0.1, 0.2, 0.2, 0.2, 0.1, 0.1, 0.1, 0.1, 0.01, 0.01, 0.01, 0.01, 0.01, 0.01, 0.01]
                WaterBalance SoilWater: SummerDate=1-Nov; SummerU=6; SummerCona=2; WinterDate=1-Apr; WinterU=6; WinterCona=2; DiffusConst=88; DiffusSlope=35; Salb=0.13; CN2Bare=60; CNRed=20; CNCov=0.8; PSIDul=-100
                  Thickness=[50, 50, 100, 100, 100, 100, 100, 100, 200, 200, 200, 200, 200, 200, 200, 200, 200]
                  SWCON=[0.35, 0.35, 0.35, 0.35, 0.35, 0.35, 0.35, 0.35, 0.35, 0.35, 0.35, 0.35, 0.35, 0.35, 0.35, 0.35, 0.35]
                Organic: FOMCNRatio=20; CarbonUnits=Total
                  Thickness  Carbon  SoilCNRatio  FBiom  FInert  FOM
                  50         0.81    13           0.04   0.1     207.5266
                  50         0.81    13           0.04   0.1     195.4412
                  100        0.26    13           0.03   0.1     173.3408
                  100        0.1     13           0.02   0.2     153.7395
                  100        0.1     13           0.01   0.8     136.3547
                  100        0.1     13           0.01   0.9     120.9358
                  100        0.1     13           0.01   0.9     107.2604
                  100        0.1     13           0.01   0.9     95.1314
                  200        0.1     13           0.01   0.9     74.833
                  200        0.1     13           0.01   0.9     58.8658
                  200        0.1     13           0.01   0.9     46.3054
                  200        0.1     13           0.01   0.9     36.4252
                  200        0.1     13           0.01   0.9     28.653
                  200        0.1     13           0.01   0.9     22.5393
                  200        0.1     13           0.01   0.9     17.73
                  200        0.1     13           0.01   0.9     13.9469
                  200        0.1     13           0.01   0.9     10.971
                Chemical: PH=[4.7, 4.7, 4.7, 4.7, 6, 6, 6, 6, 6, 6, 6, 6, 6, 6, 6, 6, 6]; PHUnits=Water
                  Thickness=[50, 50, 100, 100, 100, 100, 100, 100, 200, 200, 200, 200, 200, 200, 200, 200, 200]
                Water: FilledFromTop=false
                  Thickness=[50, 50, 100, 100, 100, 100, 100, 100, 200, 200, 200, 200, 200, 200, 200, 200, 200]
                  InitialValues=[0.05, 0.05, 0.04, 0.06, 0.092, 0.148, 0.156, 0.18, 0.18, 0.178, 0.175, 0.175, 0.175, 0.175, 0.175, 0.175, 0.175]
                Nutrient
                Solute NO3: same as Incomplete.Northern NSW and WA.HinesHill97.HHill97_DrumTri.HHill97_Base_DrumTri.Paddock.soil.NO3
                Solute NH4: same as Incomplete.Northern NSW and WA.HinesHill97.HHill97_DrumTri.HHill97_Base_DrumTri.Paddock.soil.NH4
                Solute Urea: same as Incomplete.Northern NSW and WA.HinesHill97.HHill97_DrumTri.HHill97_Base_DrumTri.Paddock.soil.Urea
                SoilTemperature Temperature
              Report SowingReport: EventNames=[Canola].Sowing
                VariableNames:
                  [Clock].Today
                  [Canola].SowingData.Cultivar
                  [IWeather].Latitude
                  [IWeather].Longitude
            SoilArbitrator
            Clock: Start=1997-01-01; End=1997-12-31
            Weather: FileName=met/Lgrace.met
        Experiment LG97_KarooTri
          Factors
            Factor TOS_index: Specification=[Operations]
              Operations 1
                1997-04-23  [Canola].Sow(population:70, rowSpacing:200, depth:20, cultivar:"Karoo_triazine");
                1997-04-23  [Fertiliser].Apply(amount: 130, type: "UreaN", depth: 10);
                1997-06-18  [Fertiliser].Apply(amount: 40, type: "UreaN", depth: 10);
              Operations 2
                1997-05-22  [Canola].Sow(population:70, rowSpacing:200, depth:20, cultivar:"Karoo_triazine");
                1997-05-22  [Fertiliser].Apply(amount: 130, type: "UreaN", depth: 10);
                1997-06-18  [Fertiliser].Apply(amount: 40, type: "UreaN", depth: 10);
              Operations 3
                1997-06-03  [Canola].Sow(population:70, rowSpacing:200, depth:20, cultivar:"Karoo_triazine");
                1997-06-03  [Fertiliser].Apply(amount: 130, type: "UreaN", depth: 10);
                1997-06-18  [Fertiliser].Apply(amount: 40, type: "UreaN", depth: 10);
              Operations 4
                1997-06-17  [Canola].Sow(population:70, rowSpacing:200, depth:20, cultivar:"Karoo_triazine");
                1997-06-17  [Fertiliser].Apply(amount: 130, type: "UreaN", depth: 10);
                1997-06-18  [Fertiliser].Apply(amount: 40, type: "UreaN", depth: 10);
          Simulation LakeGrace97_Base_KarooTri
            Summary summaryfile
            Zone Paddock: Area=1; Slope=0; AspectAngle=0; Altitude=50
              Operations
                0001-01-01  Dummy for replacement
              Irrigation
              Fertiliser
              Report DailyReport
              Plant canola: ResourceName=Canola
              MicroClimate: a_interception=0; b_interception=1; c_interception=0; d_interception=0; SoilHeatFluxFraction=0.4; MinimumHeightDiffForNewLayer=0; NightInterceptionFraction=0.5; ReferenceHeight=2
              SurfaceOrganicMatter SurfaceOM: InitialResidueName=chickpea; InitialResidueType=chickpea; InitialResidueMass=4500; InitialStandingFraction=0; InitialCPR=0; InitialCNR=25
              Report HarvestReport: same as Incomplete.Northern NSW and WA.Crocantigh_98_monty.Crocantigh_98_monty.HarvestReport
              Manager Harvesting: same as Incomplete.Northern NSW and WA.Crocantigh_98_monty.Crocantigh_98_monty.paddock.Harvesting
              Soil: same as Incomplete.Northern NSW and WA.LakeGrace97.LG97_DrumTri.LakeGrace97_Base_DrumTri.Paddock.soil
              Report SowingReport: EventNames=[Canola].Sowing
                VariableNames:
                  [Clock].Today
                  [Canola].SowingData.Cultivar
                  [IWeather].Latitude
                  [IWeather].Longitude
            SoilArbitrator
            Clock: Start=1997-01-01; End=1997-12-31
            Weather: FileName=met/Lgrace.met
        Experiment LG97_Monty
          Factors
            Factor TOS_index: Specification=[Operations]
              Operations 1
                1997-04-23  [Canola].Sow(population:70, rowSpacing:200, depth:20, cultivar:"Monty");
                1997-04-23  [Fertiliser].Apply(amount: 130, type: "UreaN", depth: 10);
                1997-06-18  [Fertiliser].Apply(amount: 40, type: "UreaN", depth: 10);
              Operations 2
                1997-05-22  [Canola].Sow(population:70, rowSpacing:200, depth:20, cultivar:"Monty");
                1997-05-22  [Fertiliser].Apply(amount: 130, type: "UreaN", depth: 10);
                1997-06-18  [Fertiliser].Apply(amount: 40, type: "UreaN", depth: 10);
              Operations 3
                1997-06-03  [Canola].Sow(population:70, rowSpacing:200, depth:20, cultivar:"Monty");
                1997-06-03  [Fertiliser].Apply(amount: 130, type: "UreaN", depth: 10);
                1997-06-18  [Fertiliser].Apply(amount: 40, type: "UreaN", depth: 10);
              Operations 4
                1997-06-17  [Canola].Sow(population:70, rowSpacing:200, depth:20, cultivar:"Monty");
                1997-06-17  [Fertiliser].Apply(amount: 130, type: "UreaN", depth: 10);
                1997-06-18  [Fertiliser].Apply(amount: 40, type: "UreaN", depth: 10);
          Simulation LakeGrace97_Base_Monty: same as Incomplete.Northern NSW and WA.LakeGrace97.LG97_KarooTri.LakeGrace97_Base_KarooTri
        Experiment LG97_Hyola42
          Factors
            Factor TOS_index: Specification=[Operations]
              Operations 1
                1997-04-23  [Canola].Sow(population:70, rowSpacing:200, depth:20, cultivar:"Hyola42");
                1997-04-23  [Fertiliser].Apply(amount: 130, type: "UreaN", depth: 10);
                1997-06-18  [Fertiliser].Apply(amount: 40, type: "UreaN", depth: 10);
              Operations 2
                1997-05-22  [Canola].Sow(population:70, rowSpacing:200, depth:20, cultivar:"Hyola42");
                1997-05-22  [Fertiliser].Apply(amount: 130, type: "UreaN", depth: 10);
                1997-06-18  [Fertiliser].Apply(amount: 40, type: "UreaN", depth: 10);
              Operations 3
                1997-06-03  [Canola].Sow(population:70, rowSpacing:200, depth:20, cultivar:"Hyola42");
                1997-06-03  [Fertiliser].Apply(amount: 130, type: "UreaN", depth: 10);
                1997-06-18  [Fertiliser].Apply(amount: 40, type: "UreaN", depth: 10);
              Operations 4
                1997-06-17  [Canola].Sow(population:70, rowSpacing:200, depth:20, cultivar:"Hyola42");
                1997-06-17  [Fertiliser].Apply(amount: 130, type: "UreaN", depth: 10);
                1997-06-18  [Fertiliser].Apply(amount: 40, type: "UreaN", depth: 10);
          Simulation LakeGrace97_Base_Hyola42: same as Incomplete.Northern NSW and WA.LakeGrace97.LG97_KarooTri.LakeGrace97_Base_KarooTri
        Experiment LG97_Oscar
          Factors
            Factor TOS_index: Specification=[Operations]
              Operations 1
                1997-04-23  [Canola].Sow(population:70, rowSpacing:200, depth:20, cultivar:"Oscar");
                1997-04-23  [Fertiliser].Apply(amount: 130, type: "UreaN", depth: 10);
                1997-06-18  [Fertiliser].Apply(amount: 40, type: "UreaN", depth: 10);
              Operations 2
                1997-05-22  [Canola].Sow(population:70, rowSpacing:200, depth:20, cultivar:"Oscar");
                1997-05-22  [Fertiliser].Apply(amount: 130, type: "UreaN", depth: 10);
                1997-06-18  [Fertiliser].Apply(amount: 40, type: "UreaN", depth: 10);
              Operations 3
                1997-06-03  [Canola].Sow(population:70, rowSpacing:200, depth:20, cultivar:"Oscar");
                1997-06-03  [Fertiliser].Apply(amount: 130, type: "UreaN", depth: 10);
                1997-06-18  [Fertiliser].Apply(amount: 40, type: "UreaN", depth: 10);
              Operations 4
                1997-06-17  [Canola].Sow(population:70, rowSpacing:200, depth:20, cultivar:"Oscar");
                1997-06-17  [Fertiliser].Apply(amount: 130, type: "UreaN", depth: 10);
                1997-06-18  [Fertiliser].Apply(amount: 40, type: "UreaN", depth: 10);
          Simulation LakeGrace97_Base_Oscar: same as Incomplete.Northern NSW and WA.LakeGrace97.LG97_KarooTri.LakeGrace97_Base_KarooTri
        Experiment LG97_Mustard
          Factors
            Factor TOS_index: Specification=[Operations]
              Operations 1
                1997-04-23  [Canola].Sow(population:70, rowSpacing:200, depth:20, cultivar:"mustard");
                1997-04-23  [Fertiliser].Apply(amount: 130, type: "UreaN", depth: 10);
                1997-06-18  [Fertiliser].Apply(amount: 40, type: "UreaN", depth: 10);
              Operations 2
                1997-05-22  [Canola].Sow(population:70, rowSpacing:200, depth:20, cultivar:"mustard");
                1997-05-22  [Fertiliser].Apply(amount: 130, type: "UreaN", depth: 10);
                1997-06-18  [Fertiliser].Apply(amount: 40, type: "UreaN", depth: 10);
              Operations 3
                1997-06-03  [Canola].Sow(population:70, rowSpacing:200, depth:20, cultivar:"mustard");
                1997-06-03  [Fertiliser].Apply(amount: 130, type: "UreaN", depth: 10);
                1997-06-18  [Fertiliser].Apply(amount: 40, type: "UreaN", depth: 10);
              Operations 4
                1997-06-17  [Canola].Sow(population:70, rowSpacing:200, depth:20, cultivar:"mustard");
                1997-06-17  [Fertiliser].Apply(amount: 130, type: "UreaN", depth: 10);
                1997-06-18  [Fertiliser].Apply(amount: 40, type: "UreaN", depth: 10);
          Simulation LakeGrace97_Base_Mustard: same as Incomplete.Northern NSW and WA.LakeGrace97.LG97_KarooTri.LakeGrace97_Base_KarooTri
      Folder Melvyn2000_monty
        Simulation Melvyn2000_Base
          Summary summaryfile
          Zone Paddock: Area=1; Slope=0; AspectAngle=0; Altitude=50
            Irrigation
            Fertiliser
            Report DailyReport
            Report HarvestReport: same as Incomplete.Northern NSW and WA.Crocantigh_98_monty.Crocantigh_98_monty.HarvestReport
            Manager Harvesting: same as Incomplete.Northern NSW and WA.Crocantigh_98_monty.Crocantigh_98_monty.paddock.Harvesting
            Operations
              2000-05-11  [Canola].Sow(population:20, rowSpacing:200, depth:20, cultivar:"monty");
              2000-05-11  [Fertiliser].Apply(amount: 60, type: "NH4NO3N", depth: 50);
              2000-05-11  [Soil].SoilWater.SW = 0.25, 0.33, 0.35, 0.32, 0.31, 0.31, 0.33
            Plant canola: ResourceName=Canola
            MicroClimate: a_interception=0; b_interception=1; c_interception=0; d_interception=0; SoilHeatFluxFraction=0.4; MinimumHeightDiffForNewLayer=0; NightInterceptionFraction=0.5; ReferenceHeight=2
            SurfaceOrganicMatter SurfaceOM: InitialResidueName=wheat; InitialResidueType=wheat; InitialResidueMass=1000; InitialStandingFraction=0; InitialCPR=0; InitialCNR=80
            Soil: Latitude=0; Longitude=0
              Physical: same as Incomplete.Northern NSW and WA.Kullinjah1999_monty.Kullinjah1999Base.Paddock.soil.Physical
              WaterBalance SoilWater: same as Incomplete.Northern NSW and WA.Kullinjah1999_monty.Kullinjah1999Base.Paddock.soil.SoilWater
              Organic: same as Incomplete.Northern NSW and WA.Gatton2000_monty_s1_s2.Gatton2000Base.Paddock.soil.Organic
              Chemical: Thickness=[150, 150, 300, 300, 300, 300, 300]; PH=[6.5, 6.2, 6.2, 6.3, 6.3, 6.4, 6.5]; PHUnits=Water
              Water: Thickness=[150, 150, 300, 300, 300, 300, 300]; InitialValues=[0.43, 0.39, 0.38, 0.36, 0.35, 0.34, 0.3]; FilledFromTop=false
              Nutrient
              Solute NO3: Thickness=[150, 150, 300, 300, 300, 300, 300]; InitialValues=[18.6, 4.9, 2.9, 1.7, 1.1, 1, 1]; InitialValuesUnits=ppm; WaterTableConcentration=0; D0=0; DepthConstant=0; MaxDepthSoluteAccessible=0; RunoffEffectivenessAtMovingSolute=0; MaxEffectiveRunoff=0
              Solute NH4: same as Validation.Phenology Experiments.OCP Phenology.Gatton2015.Gatton2015Base.Paddock.soil.NH4
              Solute Urea: same as Validation.Phenology Experiments.OCP Phenology.Gatton2015.Gatton2015Base.Paddock.soil.Urea
              SoilTemperature Temperature
            Report SowingReport: EventNames=[Canola].Sowing
              VariableNames:
                [Clock].Today
                [Canola].SowingData.Cultivar
                [IWeather].Latitude
                [IWeather].Longitude
          SoilArbitrator
          Clock: Start=2000-04-30; End=2000-12-25
          Weather: FileName=met/Melvyn00.met
      Folder Milroy2000_monty
        Simulation Milroy2000_Base
          Summary summaryfile
          Zone Paddock: Area=1; Slope=0; AspectAngle=0; Altitude=50
            Irrigation
            Fertiliser
            Report DailyReport
            Report HarvestReport: same as Incomplete.Northern NSW and WA.Crocantigh_98_monty.Crocantigh_98_monty.HarvestReport
            Manager Harvesting: same as Incomplete.Northern NSW and WA.Crocantigh_98_monty.Crocantigh_98_monty.paddock.Harvesting
            Operations
              2000-05-02  [Canola].Sow(population:40, rowSpacing:200, depth:20, cultivar:"monty");
              2000-05-02  [Fertiliser].Apply(amount: 60, type: "NH4NO3N", depth: 50);
            Plant canola: ResourceName=Canola
            MicroClimate: a_interception=0; b_interception=1; c_interception=0; d_interception=0; SoilHeatFluxFraction=0.4; MinimumHeightDiffForNewLayer=0; NightInterceptionFraction=0.5; ReferenceHeight=2
            SurfaceOrganicMatter SurfaceOM: InitialResidueName=wheat; InitialResidueType=wheat; InitialResidueMass=1000; InitialStandingFraction=0; InitialCPR=0; InitialCNR=80
            Soil: Latitude=0; Longitude=0
              Physical: same as Incomplete.Northern NSW and WA.Crocantigh_98_monty.Crocantigh_98_monty.paddock.soil.Physical
              WaterBalance SoilWater: same as Incomplete.Northern NSW and WA.Crocantigh_98_monty.Crocantigh_98_monty.paddock.soil.SoilWater
              Organic: same as Incomplete.Northern NSW and WA.Crocantigh_98_monty.Crocantigh_98_monty.paddock.soil.Organic
              Chemical: Thickness=[100, 100, 200, 200, 100]; PH=[8.9, 8.9, 9, 9, 9]; PHUnits=Water
              Water: Thickness=[100, 100, 200, 200, 100]; InitialValues=[0.4, 0.41, 0.42, 0.42, 0.4]; FilledFromTop=false
              Nutrient
              Solute NO3: Thickness=[100, 100, 200, 200, 100]; InitialValues=[18.6, 4.9, 2.9, 1.7, 1.1]; InitialValuesUnits=ppm; WaterTableConcentration=0; D0=0; DepthConstant=0; MaxDepthSoluteAccessible=0; RunoffEffectivenessAtMovingSolute=0; MaxEffectiveRunoff=0
              Solute NH4: same as Incomplete.Northern NSW and WA.Crocantigh_98_monty.Crocantigh_98_monty.paddock.soil.NH4
              Solute Urea: same as Incomplete.Northern NSW and WA.Crocantigh_98_monty.Crocantigh_98_monty.paddock.soil.Urea
              SoilTemperature Temperature
            Report SowingReport: EventNames=[Canola].Sowing
              VariableNames:
                [Clock].Today
                [Canola].SowingData.Cultivar
                [IWeather].Latitude
                [IWeather].Longitude
          SoilArbitrator
          Clock: Start=2000-04-30; End=2000-12-25
          Weather: FileName=met/muckadilla_00.met
      Folder MtBarker97
        Experiment MtB97_Dunkeld
          Factors
            Factor TOS_index: Specification=[Operations]
              Operations 1
                1997-05-08  [Canola].Sow(population:70, rowSpacing:200, depth:20, cultivar:"Dunkeld");
                1997-05-08  [Fertiliser].Apply(amount: 50, type: "UreaN", depth: 10);
                1997-06-07  [Fertiliser].Apply(amount: 100, type: "UreaN", depth: 10);
              Operations 2
                1997-05-30  [Canola].Sow(population:70, rowSpacing:200, depth:20, cultivar:"Dunkeld");
                1997-05-30  [Fertiliser].Apply(amount: 50, type: "UreaN", depth: 10);
                1997-07-07  [Fertiliser].Apply(amount: 100, type: "UreaN", depth: 10);
              Operations 3
                1997-06-24  [Canola].Sow(population:70, rowSpacing:200, depth:20, cultivar:"Dunkeld");
                1997-06-24  [Fertiliser].Apply(amount: 50, type: "UreaN", depth: 10);
                1997-07-24  [Fertiliser].Apply(amount: 100, type: "UreaN", depth: 10);
              Operations 4
                1997-07-14  [Canola].Sow(population:70, rowSpacing:200, depth:20, cultivar:"Dunkeld");
                1997-07-14  [Fertiliser].Apply(amount: 50, type: "UreaN", depth: 10);
                1997-08-13  [Fertiliser].Apply(amount: 100, type: "UreaN", depth: 10);
          Simulation MtB97_Base_Dunkeld
            Summary summaryfile
            Zone Paddock: Area=1; Slope=0; AspectAngle=0; Altitude=50
              Operations
                0001-01-01  Dummy for replacement
              Irrigation
              Fertiliser
              Report DailyReport
              Plant canola: ResourceName=Canola
              MicroClimate: a_interception=0; b_interception=1; c_interception=0; d_interception=0; SoilHeatFluxFraction=0.4; MinimumHeightDiffForNewLayer=0; NightInterceptionFraction=0.5; ReferenceHeight=2
              SurfaceOrganicMatter SurfaceOM: InitialResidueName=chickpea; InitialResidueType=chickpea; InitialResidueMass=4500; InitialStandingFraction=0; InitialCPR=0; InitialCNR=25
              Report HarvestReport: same as Incomplete.Northern NSW and WA.Crocantigh_98_monty.Crocantigh_98_monty.HarvestReport
              Manager Harvesting: same as Incomplete.Northern NSW and WA.Crocantigh_98_monty.Crocantigh_98_monty.paddock.Harvesting
              Soil: same as Incomplete.Northern NSW and WA.HinesHill97.HHill97_DrumTri.HHill97_Base_DrumTri.Paddock.soil
              Report SowingReport: EventNames=[Canola].Sowing
                VariableNames:
                  [Clock].Today
                  [Canola].SowingData.Cultivar
                  [IWeather].Latitude
                  [IWeather].Longitude
            SoilArbitrator
            Clock: Start=1997-01-01; End=1997-12-31
            Weather: FileName=met/mtbarker.met
        Experiment MtB97_Grouse
          Factors
            Factor TOS_index: Specification=[Operations]
              Operations 1
                1997-05-08  [Canola].Sow(population:70, rowSpacing:200, depth:20, cultivar:"Grouse");
                1997-05-08  [Fertiliser].Apply(amount: 50, type: "UreaN", depth: 10);
                1997-06-07  [Fertiliser].Apply(amount: 100, type: "UreaN", depth: 10);
              Operations 2
                1997-05-30  [Canola].Sow(population:70, rowSpacing:200, depth:20, cultivar:"Grouse");
                1997-05-30  [Fertiliser].Apply(amount: 50, type: "UreaN", depth: 10);
                1997-07-07  [Fertiliser].Apply(amount: 100, type: "UreaN", depth: 10);
              Operations 3
                1997-06-24  [Canola].Sow(population:70, rowSpacing:200, depth:20, cultivar:"Grouse");
                1997-06-24  [Fertiliser].Apply(amount: 50, type: "UreaN", depth: 10);
                1997-07-24  [Fertiliser].Apply(amount: 100, type: "UreaN", depth: 10);
              Operations 4
                1997-07-14  [Canola].Sow(population:70, rowSpacing:200, depth:20, cultivar:"Grouse");
                1997-07-14  [Fertiliser].Apply(amount: 50, type: "UreaN", depth: 10);
                1997-08-13  [Fertiliser].Apply(amount: 100, type: "UreaN", depth: 10);
          Simulation MtB97_Base_Grouse: same as Incomplete.Northern NSW and WA.MtBarker97.MtB97_Dunkeld.MtB97_Base_Dunkeld
          Memo
            This variety was disabled in APSIM 7.10, unsure as to the reason
        Experiment MtB97_Hyola42
          Factors
            Factor TOS_index: Specification=[Operations]
              Operations 1
                1997-05-08  [Canola].Sow(population:70, rowSpacing:200, depth:20, cultivar:"Hyola42");
                1997-05-08  [Fertiliser].Apply(amount: 50, type: "UreaN", depth: 10);
                1997-06-07  [Fertiliser].Apply(amount: 100, type: "UreaN", depth: 10);
              Operations 2
                1997-05-30  [Canola].Sow(population:70, rowSpacing:200, depth:20, cultivar:"Hyola42");
                1997-05-30  [Fertiliser].Apply(amount: 50, type: "UreaN", depth: 10);
                1997-07-07  [Fertiliser].Apply(amount: 100, type: "UreaN", depth: 10);
              Operations 3
                1997-06-24  [Canola].Sow(population:70, rowSpacing:200, depth:20, cultivar:"Hyola42");
                1997-06-24  [Fertiliser].Apply(amount: 50, type: "UreaN", depth: 10);
                1997-07-24  [Fertiliser].Apply(amount: 100, type: "UreaN", depth: 10);
              Operations 4
                1997-07-14  [Canola].Sow(population:70, rowSpacing:200, depth:20, cultivar:"Hyola42");
                1997-07-14  [Fertiliser].Apply(amount: 50, type: "UreaN", depth: 10);
                1997-08-13  [Fertiliser].Apply(amount: 100, type: "UreaN", depth: 10);
          Simulation MtB97_Base_Hyola42: same as Incomplete.Northern NSW and WA.MtBarker97.MtB97_Dunkeld.MtB97_Base_Dunkeld
        Experiment MtB97_KarooTri
          Factors
            Factor TOS_index: Specification=[Operations]
              Operations 1
                1997-05-08  [Canola].Sow(population:70, rowSpacing:200, depth:20, cultivar:"Karoo_triazine");
                1997-05-08  [Fertiliser].Apply(amount: 50, type: "UreaN", depth: 10);
                1997-06-07  [Fertiliser].Apply(amount: 100, type: "UreaN", depth: 10);
              Operations 2
                1997-05-30  [Canola].Sow(population:70, rowSpacing:200, depth:20, cultivar:"Karoo_triazine");
                1997-05-30  [Fertiliser].Apply(amount: 50, type: "UreaN", depth: 10);
                1997-07-07  [Fertiliser].Apply(amount: 100, type: "UreaN", depth: 10);
              Operations 3
                1997-06-24  [Canola].Sow(population:70, rowSpacing:200, depth:20, cultivar:"Karoo_triazine");
                1997-06-24  [Fertiliser].Apply(amount: 50, type: "UreaN", depth: 10);
                1997-07-24  [Fertiliser].Apply(amount: 100, type: "UreaN", depth: 10);
              Operations 4
                1997-07-14  [Canola].Sow(population:70, rowSpacing:200, depth:20, cultivar:"Karoo_triazine");
                1997-07-14  [Fertiliser].Apply(amount: 50, type: "UreaN", depth: 10);
                1997-08-13  [Fertiliser].Apply(amount: 100, type: "UreaN", depth: 10);
          Simulation MtB97_Base_KarooTri: same as Incomplete.Northern NSW and WA.MtBarker97.MtB97_Dunkeld.MtB97_Base_Dunkeld
        Experiment MtB97_Oscar
          Factors
            Factor TOS_index: Specification=[Operations]
              Operations 1
                1997-05-08  [Canola].Sow(population:70, rowSpacing:200, depth:20, cultivar:"Oscar");
                1997-05-08  [Fertiliser].Apply(amount: 50, type: "UreaN", depth: 10);
                1997-06-07  [Fertiliser].Apply(amount: 100, type: "UreaN", depth: 10);
              Operations 2
                1997-05-30  [Canola].Sow(population:70, rowSpacing:200, depth:20, cultivar:"Oscar");
                1997-05-30  [Fertiliser].Apply(amount: 50, type: "UreaN", depth: 10);
                1997-07-07  [Fertiliser].Apply(amount: 100, type: "UreaN", depth: 10);
              Operations 3
                1997-06-24  [Canola].Sow(population:70, rowSpacing:200, depth:20, cultivar:"Oscar");
                1997-06-24  [Fertiliser].Apply(amount: 50, type: "UreaN", depth: 10);
                1997-07-24  [Fertiliser].Apply(amount: 100, type: "UreaN", depth: 10);
              Operations 4
                1997-07-14  [Canola].Sow(population:70, rowSpacing:200, depth:20, cultivar:"Oscar");
                1997-07-14  [Fertiliser].Apply(amount: 50, type: "UreaN", depth: 10);
                1997-08-13  [Fertiliser].Apply(amount: 100, type: "UreaN", depth: 10);
          Simulation MtB97_Base_Oscar: same as Incomplete.Northern NSW and WA.MtBarker97.MtB97_Dunkeld.MtB97_Base_Dunkeld
        Experiment MtB97_PinnacleTri
          Factors
            Factor TOS_index: Specification=[Operations]
              Operations 1
                1997-05-08  [Canola].Sow(population:70, rowSpacing:200, depth:20, cultivar:"Pinnacle");
                1997-05-08  [Fertiliser].Apply(amount: 50, type: "UreaN", depth: 10);
                1997-06-07  [Fertiliser].Apply(amount: 100, type: "UreaN", depth: 10);
              Operations 2
                1997-05-30  [Canola].Sow(population:70, rowSpacing:200, depth:20, cultivar:"Pinnacle");
                1997-05-30  [Fertiliser].Apply(amount: 50, type: "UreaN", depth: 10);
                1997-07-07  [Fertiliser].Apply(amount: 100, type: "UreaN", depth: 10);
              Operations 3
                1997-06-24  [Canola].Sow(population:70, rowSpacing:200, depth:20, cultivar:"Pinnacle");
                1997-06-24  [Fertiliser].Apply(amount: 50, type: "UreaN", depth: 10);
                1997-07-24  [Fertiliser].Apply(amount: 100, type: "UreaN", depth: 10);
              Operations 4
                1997-07-14  [Canola].Sow(population:70, rowSpacing:200, depth:20, cultivar:"Pinnacle");
                1997-07-14  [Fertiliser].Apply(amount: 50, type: "UreaN", depth: 10);
                1997-08-13  [Fertiliser].Apply(amount: 100, type: "UreaN", depth: 10);
          Simulation MtB97_Base_PinnacleTri: same as Incomplete.Northern NSW and WA.MtBarker97.MtB97_Dunkeld.MtB97_Base_Dunkeld
      Folder MtBarker98
        Folder HighN
          Experiment MtB98_KarooTri_HighN
            Factors
              Factor TOS_index: Specification=[Operations]
                Operations 1
                  1998-04-14  [Canola].Sow(population:70, rowSpacing:200, depth:20, cultivar:"Karoo_triazine");
                  1998-04-14  [Fertiliser].Apply(amount: 100, type: "UreaN", depth: 10);
                  1998-05-14  [Fertiliser].Apply(amount: 100, type: "UreaN", depth: 10);
                  1998-05-24  [Fertiliser].Apply(amount: 100, type: "UreaN", depth: 10);
                  Memo
                    Note that as per APSIM 7.10, Karoo on TOS1 has additional 100 kg fertiliser compared to other treatments. Could be a mistake.
                Operations 2
                  1998-05-18  [Canola].Sow(population:70, rowSpacing:200, depth:20, cultivar:"Karoo_triazine");
                  1998-05-18  [Fertiliser].Apply(amount: 100, type: "UreaN", depth: 10);
                  1998-06-27  [Fertiliser].Apply(amount: 100, type: "UreaN", depth: 10);
                Operations 3
                  1998-06-24  [Canola].Sow(population:70, rowSpacing:200, depth:20, cultivar:"Karoo_triazine");
                  1998-06-24  [Fertiliser].Apply(amount: 100, type: "UreaN", depth: 10);
                  1998-08-03  [Fertiliser].Apply(amount: 100, type: "UreaN", depth: 10);
            Simulation MtB98_Base_KarooTri_HighN
              Summary summaryfile
              Zone Paddock: Area=1; Slope=0; AspectAngle=0; Altitude=50
                Operations
                  0001-01-01  Dummy for replacement
                Irrigation
                Fertiliser
                Report DailyReport
                Plant canola: ResourceName=Canola
                MicroClimate: a_interception=0; b_interception=1; c_interception=0; d_interception=0; SoilHeatFluxFraction=0.4; MinimumHeightDiffForNewLayer=0; NightInterceptionFraction=0.5; ReferenceHeight=2
                Report HarvestReport: same as Incomplete.Northern NSW and WA.Crocantigh_98_monty.Crocantigh_98_monty.HarvestReport
                Manager Harvesting: same as Incomplete.Northern NSW and WA.Crocantigh_98_monty.Crocantigh_98_monty.paddock.Harvesting
                SurfaceOrganicMatter SurfaceOM: InitialResidueName=wheat; InitialResidueType=wheat; InitialResidueMass=2500; InitialStandingFraction=0; InitialCPR=0; InitialCNR=70
                Soil: SoilType=sand; Latitude=0; Longitude=0
                  Physical: same as Incomplete.Northern NSW and WA.HinesHill97.HHill97_DrumTri.HHill97_Base_DrumTri.Paddock.soil.Physical
                  WaterBalance SoilWater: same as Incomplete.Northern NSW and WA.HinesHill97.HHill97_DrumTri.HHill97_Base_DrumTri.Paddock.soil.SoilWater
                  Organic: FOMCNRatio=40; CarbonUnits=Total
                    Thickness  Carbon  SoilCNRatio  FBiom  FInert  FOM
                    50         1.23    13           0.04   0.1     207.5266
                    50         0.43    13           0.04   0.1     195.4412
                    100        0.37    13           0.03   0.1     173.3408
                    100        0.26    13           0.02   0.2     153.7395
                    100        0.26    13           0.02   0.2     136.3547
                    100        0.21    13           0.01   0.8     120.9358
                    100        0.21    13           0.01   0.8     107.2604
                    100        0.2     13           0.01   0.9     95.1314
                    200        0.19    13           0.01   0.9     74.833
                    200        0.18    13           0.01   0.9     58.8658
                    200        0.18    13           0.01   0.9     46.3054
                    200        0.18    13           0.01   0.9     36.4252
                    200        0.17    13           0.01   0.9     28.653
                    200        0.17    13           0.01   0.9     22.5393
                    200        0.17    13           0.01   0.9     17.73
                    200        0.17    13           0.01   0.9     13.9469
                    200        0.17    13           0.01   0.9     10.971
                  Chemical: same as Incomplete.Northern NSW and WA.HinesHill97.HHill97_DrumTri.HHill97_Base_DrumTri.Paddock.soil.Chemical
                  Water: FilledFromTop=false
                    Thickness=[50, 50, 100, 100, 100, 100, 100, 100, 200, 200, 200, 200, 200, 200, 200, 200, 200]
                    InitialValues=[0.05, 0.05, 0.08, 0.085, 0.085, 0.095, 0.095, 0.1, 0.1, 0.1, 0.11, 0.11, 0.12, 0.12, 0.13, 0.13, 0.13]
                  Nutrient
                  Solute NO3: same as Incomplete.Northern NSW and WA.HinesHill97.HHill97_DrumTri.HHill97_Base_DrumTri.Paddock.soil.NO3
                  Solute NH4: same as Incomplete.Northern NSW and WA.HinesHill97.HHill97_DrumTri.HHill97_Base_DrumTri.Paddock.soil.NH4
                  Solute Urea: same as Incomplete.Northern NSW and WA.HinesHill97.HHill97_DrumTri.HHill97_Base_DrumTri.Paddock.soil.Urea
                  SoilTemperature Temperature
                Report SowingReport: EventNames=[Canola].Sowing
                  VariableNames:
                    [Clock].Today
                    [Canola].SowingData.Cultivar
                    [IWeather].Latitude
                    [IWeather].Longitude
              SoilArbitrator
              Clock: Start=1998-01-01; End=1998-12-31
              Weather: FileName=met/mtbarker.met
          Experiment MtB98_Oscar_HighN
            Factors
              Factor TOS_index: Specification=[Operations]
                Operations 1
                  1998-04-14  [Canola].Sow(population:70, rowSpacing:200, depth:20, cultivar:"Oscar");
                  1998-04-14  [Fertiliser].Apply(amount: 100, type: "UreaN", depth: 10);
                  1998-05-24  [Fertiliser].Apply(amount: 100, type: "UreaN", depth: 10);
                Operations 2
                  1998-05-18  [Canola].Sow(population:70, rowSpacing:200, depth:20, cultivar:"Oscar");
                  1998-05-18  [Fertiliser].Apply(amount: 100, type: "UreaN", depth: 10);
                  1998-06-27  [Fertiliser].Apply(amount: 100, type: "UreaN", depth: 10);
                Operations 3
                  1998-06-24  [Canola].Sow(population:70, rowSpacing:200, depth:20, cultivar:"Oscar");
                  1998-06-24  [Fertiliser].Apply(amount: 100, type: "UreaN", depth: 10);
                  1998-08-03  [Fertiliser].Apply(amount: 100, type: "UreaN", depth: 10);
            Simulation MtB98_Base_Oscar_HighN: same as Incomplete.Northern NSW and WA.MtBarker98.HighN.MtB98_KarooTri_HighN.MtB98_Base_KarooTri_HighN
          Experiment MtB98_PinnacleTri_HighN
            Factors
              Factor TOS_index: Specification=[Operations]
                Operations 1
                  1998-04-14  [Canola].Sow(population:70, rowSpacing:200, depth:20, cultivar:"Pinnacle_triazine");
                  1998-04-14  [Fertiliser].Apply(amount: 100, type: "UreaN", depth: 10);
                  1998-05-24  [Fertiliser].Apply(amount: 100, type: "UreaN", depth: 10);
                Operations 2
                  1998-05-18  [Canola].Sow(population:70, rowSpacing:200, depth:20, cultivar:"Pinnacle_triazine");
                  1998-05-18  [Fertiliser].Apply(amount: 100, type: "UreaN", depth: 10);
                  1998-06-27  [Fertiliser].Apply(amount: 100, type: "UreaN", depth: 10);
                Operations 3
                  1998-06-24  [Canola].Sow(population:70, rowSpacing:200, depth:20, cultivar:"Pinnacle_triazine");
                  1998-06-24  [Fertiliser].Apply(amount: 100, type: "UreaN", depth: 10);
                  1998-08-03  [Fertiliser].Apply(amount: 100, type: "UreaN", depth: 10);
            Simulation MtB98_Base_PinnacleTri_HighN: same as Incomplete.Northern NSW and WA.MtBarker98.HighN.MtB98_KarooTri_HighN.MtB98_Base_KarooTri_HighN
          Experiment MtB98_Range_HighN
            Factors
              Factor TOS_index: Specification=[Operations]
                Operations 1
                  1998-04-14  [Canola].Sow(population:70, rowSpacing:200, depth:20, cultivar:"Range");
                  1998-04-14  [Fertiliser].Apply(amount: 100, type: "UreaN", depth: 10);
                  1998-05-24  [Fertiliser].Apply(amount: 100, type: "UreaN", depth: 10);
                Operations 2
                  1998-05-18  [Canola].Sow(population:70, rowSpacing:200, depth:20, cultivar:"Range");
                  1998-05-18  [Fertiliser].Apply(amount: 100, type: "UreaN", depth: 10);
                  1998-06-27  [Fertiliser].Apply(amount: 100, type: "UreaN", depth: 10);
                Operations 3
                  1998-06-24  [Canola].Sow(population:70, rowSpacing:200, depth:20, cultivar:"Range");
                  1998-06-24  [Fertiliser].Apply(amount: 100, type: "UreaN", depth: 10);
                  1998-08-03  [Fertiliser].Apply(amount: 100, type: "UreaN", depth: 10);
            Simulation MtB98_Base_Range_HighN: same as Incomplete.Northern NSW and WA.MtBarker98.HighN.MtB98_KarooTri_HighN.MtB98_Base_KarooTri_HighN
        Folder LowN
          Experiment MtB98_KarooTri_LowN
            Factors
              Factor TOS_index: Specification=[Operations]
                Operations 1
                  1998-04-14  [Canola].Sow(population:70, rowSpacing:200, depth:20, cultivar:"Karoo_triazine");
                  1998-04-14  [Fertiliser].Apply(amount: 100, type: "UreaN", depth: 10);
                Operations 2
                  1998-05-18  [Canola].Sow(population:70, rowSpacing:200, depth:20, cultivar:"Karoo_triazine");
                  1998-05-18  [Fertiliser].Apply(amount: 100, type: "UreaN", depth: 10);
                Operations 3
                  1998-06-24  [Canola].Sow(population:70, rowSpacing:200, depth:20, cultivar:"Karoo_triazine");
                  1998-06-24  [Fertiliser].Apply(amount: 100, type: "UreaN", depth: 10);
            Simulation MtB98_Base_KarooTri_LowN: same as Incomplete.Northern NSW and WA.MtBarker98.HighN.MtB98_KarooTri_HighN.MtB98_Base_KarooTri_HighN
          Experiment MtB98_Oscar_LowN
            Factors
              Factor TOS_index: Specification=[Operations]
                Operations 1
                  1998-04-14  [Canola].Sow(population:70, rowSpacing:200, depth:20, cultivar:"Oscar");
                  1998-04-14  [Fertiliser].Apply(amount: 100, type: "UreaN", depth: 10);
                Operations 2
                  1998-05-18  [Canola].Sow(population:70, rowSpacing:200, depth:20, cultivar:"Oscar");
                  1998-05-18  [Fertiliser].Apply(amount: 100, type: "UreaN", depth: 10);
                Operations 3
                  1998-06-24  [Canola].Sow(population:70, rowSpacing:200, depth:20, cultivar:"Oscar");
                  1998-06-24  [Fertiliser].Apply(amount: 100, type: "UreaN", depth: 10);
            Simulation MtB98_Base_Oscar_LowN: same as Incomplete.Northern NSW and WA.MtBarker98.HighN.MtB98_KarooTri_HighN.MtB98_Base_KarooTri_HighN
          Experiment MtB98_PinnacleTri_LowN
            Factors
              Factor TOS_index: Specification=[Operations]
                Operations 1
                  1998-04-14  [Canola].Sow(population:70, rowSpacing:200, depth:20, cultivar:"Pinnacle_triazine");
                  1998-04-14  [Fertiliser].Apply(amount: 100, type: "UreaN", depth: 10);
                Operations 2
                  1998-05-18  [Canola].Sow(population:70, rowSpacing:200, depth:20, cultivar:"Pinnacle_triazine");
                  1998-05-18  [Fertiliser].Apply(amount: 100, type: "UreaN", depth: 10);
                Operations 3
                  1998-06-24  [Canola].Sow(population:70, rowSpacing:200, depth:20, cultivar:"Pinnacle_triazine");
                  1998-06-24  [Fertiliser].Apply(amount: 100, type: "UreaN", depth: 10);
            Simulation MtB98_Base_PinnacleTri_LowN: same as Incomplete.Northern NSW and WA.MtBarker98.HighN.MtB98_KarooTri_HighN.MtB98_Base_KarooTri_HighN
          Experiment MtB98_Range_LowN
            Factors
              Factor TOS_index: Specification=[Operations]
                Operations 1
                  1998-04-14  [Canola].Sow(population:70, rowSpacing:200, depth:20, cultivar:"Range");
                  1998-04-14  [Fertiliser].Apply(amount: 100, type: "UreaN", depth: 10);
                Operations 2
                  1998-05-18  [Canola].Sow(population:70, rowSpacing:200, depth:20, cultivar:"Range");
                  1998-05-18  [Fertiliser].Apply(amount: 100, type: "UreaN", depth: 10);
                Operations 3
                  1998-06-24  [Canola].Sow(population:70, rowSpacing:200, depth:20, cultivar:"Range");
                  1998-06-24  [Fertiliser].Apply(amount: 100, type: "UreaN", depth: 10);
            Simulation MtB98_Base_Range_LowN: same as Incomplete.Northern NSW and WA.MtBarker98.HighN.MtB98_KarooTri_HighN.MtB98_Base_KarooTri_HighN
      Folder Mullewa97
        Experiment Mullewa97_Hyola42
          Factors
            Factor TOS_index: Specification=[Operations]
              Operations 1
                1997-05-02  [Canola].Sow(population:70, rowSpacing:200, depth:20, cultivar:"Hyola42");
                1997-05-02  [Fertiliser].Apply(amount: 60, type: "NH4SO4N", depth: 10);
              Operations 2
                1997-05-19  [Canola].Sow(population:70, rowSpacing:200, depth:20, cultivar:"Hyola42");
                1997-05-19  [Fertiliser].Apply(amount: 60, type: "NH4SO4N", depth: 10);
              Operations 3
                1997-06-03  [Canola].Sow(population:70, rowSpacing:200, depth:20, cultivar:"Hyola42");
                1997-06-03  [Fertiliser].Apply(amount: 60, type: "NH4SO4N", depth: 10);
              Operations 4
                1997-06-16  [Canola].Sow(population:70, rowSpacing:200, depth:20, cultivar:"Hyola42");
                1997-06-16  [Fertiliser].Apply(amount: 60, type: "NH4SO4N", depth: 10);
          Simulation Mullewa97_Base_Hyola42
            Summary summaryfile
            Zone Paddock: Area=1; Slope=0; AspectAngle=0; Altitude=50
              Operations
                0001-01-01  Dummy for replacement
              Irrigation
              Fertiliser
              Report DailyReport
              Plant canola: ResourceName=Canola
              MicroClimate: a_interception=0; b_interception=1; c_interception=0; d_interception=0; SoilHeatFluxFraction=0.4; MinimumHeightDiffForNewLayer=0; NightInterceptionFraction=0.5; ReferenceHeight=2
              SurfaceOrganicMatter SurfaceOM: InitialResidueName=chickpea; InitialResidueType=chickpea; InitialResidueMass=4500; InitialStandingFraction=0; InitialCPR=0; InitialCNR=25
              Report HarvestReport: same as Incomplete.Northern NSW and WA.Crocantigh_98_monty.Crocantigh_98_monty.HarvestReport
              Manager Harvesting: same as Incomplete.Northern NSW and WA.Crocantigh_98_monty.Crocantigh_98_monty.paddock.Harvesting
              Soil: SoilType=sand; Latitude=0; Longitude=0
                Physical
                  Thickness  BD    AirDry  LL15  DUL   SAT
                  50         1.72  0.035   0.08  0.17  0.31
                  50         1.8   0.08    0.08  0.18  0.28
                  100        1.82  0.08    0.08  0.22  0.28
                  100        1.66  0.08    0.08  0.24  0.34
                  100        1.64  0.16    0.17  0.28  0.35
                  100        1.66  0.16    0.18  0.29  0.33
                  100        1.71  0.18    0.18  0.29  0.32
                  100        1.74  0.19    0.19  0.29  0.32
                  200        1.78  0.19    0.19  0.29  0.32
                  200        1.79  0.19    0.19  0.29  0.32
                  200        1.79  0.19    0.19  0.29  0.32
                  200        1.79  0.19    0.19  0.29  0.32
                  200        1.79  0.19    0.19  0.29  0.33
                  200        1.79  0.19    0.19  0.29  0.33
                  200        1.79  0.19    0.19  0.29  0.33
                  200        1.79  0.19    0.19  0.29  0.33
                  200        1.79  0.19    0.19  0.29  0.33
                  SoilCrop CanolaSoil
                    LL=[0.08, 0.08, 0.1, 0.13, 0.17, 0.18, 0.19, 0.21, 0.22, 0.23, 0.24, 0.25, 0.26, 0.26, 0.26, 0.26, 0.26]
                    KL=[0.06, 0.06, 0.06, 0.06, 0.06, 0.06, 0.06, 0.06, 0.06, 0.06, 0.06, 0.06, 0.06, 0.06, 0.06, 0.06, 0.06]
                    XF=[0.3, 0.3, 0.3, 0.3, 0.3, 0.3, 0.3, 0.3, 0.2, 0.2, 0.2, 0.2, 0.2, 0.2, 0.2, 0.2, 0.2]
                WaterBalance SoilWater: SummerDate=1-Nov; SummerU=7.5; SummerCona=3; WinterDate=1-Apr; WinterU=7.5; WinterCona=3; DiffusConst=88; DiffusSlope=35; Salb=0.13; CN2Bare=60; CNRed=20; CNCov=0.8; PSIDul=-100
                  Thickness=[50, 50, 100, 100, 100, 100, 100, 100, 200, 200, 200, 200, 200, 200, 200, 200, 200]
                  SWCON=[0.8, 0.8, 0.7, 0.7, 0.7, 0.6, 0.6, 0.6, 0.6, 0.6, 0.6, 0.6, 0.6, 0.6, 0.6, 0.6, 0.6]
                Organic: FOMCNRatio=20; CarbonUnits=Total
                  Thickness  Carbon  SoilCNRatio  FBiom  FInert  FOM
                  50         1.2     13           0.03   0.3     207.5266
                  50         1.2     13           0.03   0.3     195.4412
                  100        0.8     13           0.02   0.3     173.3408
                  100        0.3     13           0.01   0.4     153.7395
                  100        0.1     13           0.01   0.8     136.3547
                  100        0.1     13           0.01   0.9     120.9358
                  100        0.1     13           0.01   0.9     107.2604
                  100        0.1     13           0.01   0.9     95.1314
                  200        0.1     13           0.01   0.9     74.833
                  200        0.1     13           0.01   0.9     58.8658
                  200        0.1     13           0.01   0.9     46.3054
                  200        0.1     13           0.01   0.9     36.4252
                  200        0.1     13           0.01   0.9     28.653
                  200        0.1     13           0.01   0.9     22.5393
                  200        0.1     13           0.01   0.9     17.73
                  200        0.1     13           0.01   0.9     13.9469
                  200        0.1     13           0.01   0.9     10.971
                Chemical: same as Incomplete.Northern NSW and WA.LakeGrace97.LG97_DrumTri.LakeGrace97_Base_DrumTri.Paddock.soil.Chemical
                Water: FilledFromTop=false
                  Thickness=[50, 50, 100, 100, 100, 100, 100, 100, 200, 200, 200, 200, 200, 200, 200, 200, 200]
                  InitialValues=[0.08, 0.08, 0.1, 0.13, 0.192, 0.202, 0.21, 0.226, 0.234, 0.242, 0.25, 0.258, 0.266, 0.266, 0.266, 0.266, 0.266]
                Nutrient
                Solute NO3: same as Incomplete.Northern NSW and WA.HinesHill97.HHill97_DrumTri.HHill97_Base_DrumTri.Paddock.soil.NO3
                Solute NH4: same as Incomplete.Northern NSW and WA.HinesHill97.HHill97_DrumTri.HHill97_Base_DrumTri.Paddock.soil.NH4
                Solute Urea: same as Incomplete.Northern NSW and WA.HinesHill97.HHill97_DrumTri.HHill97_Base_DrumTri.Paddock.soil.Urea
                SoilTemperature Temperature
              Report SowingReport: EventNames=[Canola].Sowing
                VariableNames:
                  [Clock].Today
                  [Canola].SowingData.Cultivar
                  [IWeather].Latitude
                  [IWeather].Longitude
            SoilArbitrator
            Clock: Start=1997-01-01; End=1997-12-31
            Weather: FileName=met/mullewa.met
        Experiment Mullewa97_DrumTri
          Factors
            Factor TOS_index: Specification=[Operations]
              Operations 1
                1997-05-02  [Canola].Sow(population:70, rowSpacing:200, depth:20, cultivar:"Drum_triazine");
                1997-05-02  [Fertiliser].Apply(amount: 60, type: "NH4SO4N", depth: 10);
              Operations 2
                1997-05-19  [Canola].Sow(population:70, rowSpacing:200, depth:20, cultivar:"Drum_triazine");
                1997-05-19  [Fertiliser].Apply(amount: 60, type: "NH4SO4N", depth: 10);
              Operations 3
                1997-06-03  [Canola].Sow(population:70, rowSpacing:200, depth:20, cultivar:"Drum_triazine");
                1997-06-03  [Fertiliser].Apply(amount: 60, type: "NH4SO4N", depth: 10);
              Operations 4
                1997-06-16  [Canola].Sow(population:70, rowSpacing:200, depth:20, cultivar:"Drum_triazine");
                1997-06-16  [Fertiliser].Apply(amount: 60, type: "NH4SO4N", depth: 10);
          Simulation Mullewa97_Base_DrumTri
            Summary summaryfile
            Zone Paddock: same as Incomplete.Northern NSW and WA.Mullewa97.Mullewa97_Hyola42.Mullewa97_Base_Hyola42.Paddock
            SoilArbitrator
            Weather: FileName=met/mullewa.met
            Clock: Start=1997-01-01; End=1997-12-31
        Experiment Mullewa97_KarooTri
          Factors
            Factor TOS_index: Specification=[Operations]
              Operations 1
                1997-05-02  [Canola].Sow(population:70, rowSpacing:200, depth:20, cultivar:"Karoo_triazine");
                1997-05-02  [Fertiliser].Apply(amount: 60, type: "NH4SO4N", depth: 10);
              Operations 2
                1997-05-19  [Canola].Sow(population:70, rowSpacing:200, depth:20, cultivar:"Karoo_triazine");
                1997-05-19  [Fertiliser].Apply(amount: 60, type: "NH4SO4N", depth: 10);
              Operations 3
                1997-06-03  [Canola].Sow(population:70, rowSpacing:200, depth:20, cultivar:"Karoo_triazine");
                1997-06-03  [Fertiliser].Apply(amount: 60, type: "NH4SO4N", depth: 10);
              Operations 4
                1997-06-16  [Canola].Sow(population:70, rowSpacing:200, depth:20, cultivar:"Karoo_triazine");
                1997-06-16  [Fertiliser].Apply(amount: 60, type: "NH4SO4N", depth: 10);
          Simulation Mullewa97_Base_KarooTri: same as Incomplete.Northern NSW and WA.Mullewa97.Mullewa97_DrumTri.Mullewa97_Base_DrumTri
        Experiment Mullewa97_Monty
          Factors
            Factor TOS_index: Specification=[Operations]
              Operations 1
                1997-05-02  [Canola].Sow(population:70, rowSpacing:200, depth:20, cultivar:"Monty");
                1997-05-02  [Fertiliser].Apply(amount: 60, type: "NH4SO4N", depth: 10);
              Operations 2
                1997-05-19  [Canola].Sow(population:70, rowSpacing:200, depth:20, cultivar:"Monty");
                1997-05-19  [Fertiliser].Apply(amount: 60, type: "NH4SO4N", depth: 10);
              Operations 3
                1997-06-03  [Canola].Sow(population:70, rowSpacing:200, depth:20, cultivar:"Monty");
                1997-06-03  [Fertiliser].Apply(amount: 60, type: "NH4SO4N", depth: 10);
              Operations 4
                1997-06-16  [Canola].Sow(population:70, rowSpacing:200, depth:20, cultivar:"Monty");
                1997-06-16  [Fertiliser].Apply(amount: 60, type: "NH4SO4N", depth: 10);
          Simulation Mullewa97_Base_Monty: same as Incomplete.Northern NSW and WA.Mullewa97.Mullewa97_DrumTri.Mullewa97_Base_DrumTri
        Experiment Mullewa97_Mustard
          Factors
            Factor TOS_index: Specification=[Operations]
              Operations 1
                1997-05-02  [Canola].Sow(population:70, rowSpacing:200, depth:20, cultivar:"Mustard");
                1997-05-02  [Fertiliser].Apply(amount: 60, type: "NH4SO4N", depth: 10);
              Operations 2
                1997-05-19  [Canola].Sow(population:70, rowSpacing:200, depth:20, cultivar:"Mustard");
                1997-05-19  [Fertiliser].Apply(amount: 60, type: "NH4SO4N", depth: 10);
              Operations 3
                1997-06-03  [Canola].Sow(population:70, rowSpacing:200, depth:20, cultivar:"Mustard");
                1997-06-03  [Fertiliser].Apply(amount: 60, type: "NH4SO4N", depth: 10);
              Operations 4
                1997-06-16  [Canola].Sow(population:70, rowSpacing:200, depth:20, cultivar:"Mustard");
                1997-06-16  [Fertiliser].Apply(amount: 60, type: "NH4SO4N", depth: 10);
          Simulation Mullewa97_Base_Mustard: same as Incomplete.Northern NSW and WA.Mullewa97.Mullewa97_DrumTri.Mullewa97_Base_DrumTri
        Experiment Mullewa97_Oscar
          Factors
            Factor TOS_index: Specification=[Operations]
              Operations 1
                1997-05-02  [Canola].Sow(population:70, rowSpacing:200, depth:20, cultivar:"Oscar");
                1997-05-02  [Fertiliser].Apply(amount: 60, type: "NH4SO4N", depth: 10);
              Operations 2
                1997-05-19  [Canola].Sow(population:70, rowSpacing:200, depth:20, cultivar:"Oscar");
                1997-05-19  [Fertiliser].Apply(amount: 60, type: "NH4SO4N", depth: 10);
              Operations 3
                1997-06-03  [Canola].Sow(population:70, rowSpacing:200, depth:20, cultivar:"Oscar");
                1997-06-03  [Fertiliser].Apply(amount: 60, type: "NH4SO4N", depth: 10);
              Operations 4
                1997-06-16  [Canola].Sow(population:70, rowSpacing:200, depth:20, cultivar:"Oscar");
                1997-06-16  [Fertiliser].Apply(amount: 60, type: "NH4SO4N", depth: 10);
          Simulation Mullewa97_Base_Oscar: same as Incomplete.Northern NSW and WA.Mullewa97.Mullewa97_DrumTri.Mullewa97_Base_DrumTri
      Folder Mullewa98
        Folder HighN
          Experiment Mullewa98_KarooTri_HighN
            Factors
              Factor TOS_index: Specification=[Operations]
                Operations 1
                  1998-05-08  [Canola].Sow(population:70, rowSpacing:200, depth:20, cultivar:"Karoo_triazine");
                  1998-05-08  [Fertiliser].Apply(amount: 100, type: "UreaN", depth: 10);
                  1998-06-07  [Fertiliser].Apply(amount: 100, type: "UreaN", depth: 10);
                Operations 2
                  1998-05-27  [Canola].Sow(population:70, rowSpacing:200, depth:20, cultivar:"Karoo_triazine");
                  1998-05-27  [Fertiliser].Apply(amount: 100, type: "UreaN", depth: 10);
                  1998-06-26  [Fertiliser].Apply(amount: 100, type: "UreaN", depth: 10);
                Operations 3
                  1998-06-04  [Canola].Sow(population:70, rowSpacing:200, depth:20, cultivar:"Karoo_triazine");
                  1998-06-04  [Fertiliser].Apply(amount: 100, type: "UreaN", depth: 10);
                  1998-07-04  [Fertiliser].Apply(amount: 100, type: "UreaN", depth: 10);
            Simulation Mullewa98_Base_KarooTri_HighN
              Summary summaryfile
              Zone Paddock: same as Incomplete.Northern NSW and WA.MtBarker98.HighN.MtB98_KarooTri_HighN.MtB98_Base_KarooTri_HighN.Paddock
              SoilArbitrator
              Clock: Start=1998-01-01; End=1998-12-31
              Weather: FileName=met/mullewa.met
          Experiment Mullewa98_Monty_HighN
            Factors: same as Incomplete.Northern NSW and WA.Mullewa98.HighN.Mullewa98_KarooTri_HighN.Factors
            Simulation Mullewa98_Base_Monty_HighN: same as Incomplete.Northern NSW and WA.Mullewa98.HighN.Mullewa98_KarooTri_HighN.Mullewa98_Base_KarooTri_HighN
        Folder LowN
          Experiment Mullewa98_KarooTri_LowN
            Simulation Mullewa98_Base_KarooTri_LowN: same as Incomplete.Northern NSW and WA.Mullewa98.HighN.Mullewa98_KarooTri_HighN.Mullewa98_Base_KarooTri_HighN
            Factors
              Factor TOS_index: Specification=[Operations]
                Operations 1
                  1998-05-08  [Canola].Sow(population:70, rowSpacing:200, depth:20, cultivar:"Karoo_triazine");
                  1998-05-08  [Fertiliser].Apply(amount: 100, type: "UreaN", depth: 10);
                Operations 2
                  1998-05-27  [Canola].Sow(population:70, rowSpacing:200, depth:20, cultivar:"Karoo_triazine");
                  1998-05-27  [Fertiliser].Apply(amount: 100, type: "UreaN", depth: 10);
                Operations 3
                  1998-06-04  [Canola].Sow(population:70, rowSpacing:200, depth:20, cultivar:"Karoo_triazine");
                  1998-06-04  [Fertiliser].Apply(amount: 100, type: "UreaN", depth: 10);
          Experiment Mullewa98_Monty_LowN
            Factors
              Factor TOS_index: Specification=[Operations]
                Operations 1
                  1998-04-14  [Canola].Sow(population:70, rowSpacing:200, depth:20, cultivar:"Monty");
                  1998-04-14  [Fertiliser].Apply(amount: 100, type: "UreaN", depth: 10);
                Operations 2
                  1998-05-18  [Canola].Sow(population:70, rowSpacing:200, depth:20, cultivar:"Monty");
                  1998-05-18  [Fertiliser].Apply(amount: 100, type: "UreaN", depth: 10);
                Operations 3
                  1998-06-24  [Canola].Sow(population:70, rowSpacing:200, depth:20, cultivar:"Monty");
                  1998-06-24  [Fertiliser].Apply(amount: 100, type: "UreaN", depth: 10);
            Simulation Mullewa98_Base_Monty_LowN: same as Incomplete.Northern NSW and WA.Mullewa98.HighN.Mullewa98_KarooTri_HighN.Mullewa98_Base_KarooTri_HighN
      Folder Nindigully_98_99_monty
        Simulation Nindigully_98_monty_Base
          Summary summaryfile
          Zone Paddock: Area=1; Slope=0; AspectAngle=0; Altitude=50
            Irrigation
            Fertiliser
            Report DailyReport
            Report HarvestReport: same as Incomplete.Northern NSW and WA.Crocantigh_98_monty.Crocantigh_98_monty.HarvestReport
            Manager Harvesting: same as Incomplete.Northern NSW and WA.Crocantigh_98_monty.Crocantigh_98_monty.paddock.Harvesting
            Operations
              1998-05-15  [Canola].Sow(population:40, rowSpacing:200, depth:20, cultivar:"monty");
            Plant canola: ResourceName=Canola
            MicroClimate: a_interception=0; b_interception=1; c_interception=0; d_interception=0; SoilHeatFluxFraction=0.4; MinimumHeightDiffForNewLayer=0; NightInterceptionFraction=0.5; ReferenceHeight=2
            Soil: Latitude=0; Longitude=0
              Water: Thickness=[150, 150, 300, 300, 300, 300, 300]; InitialValues=[0.2, 0.28, 0.34, 0.32, 0.29, 0.26, 0.33]; FilledFromTop=false
              Physical: same as Incomplete.Northern NSW and WA.Gatton2000_monty_s1_s2.Gatton2000Base.Paddock.soil.Physical
              WaterBalance SoilWater: same as Incomplete.Northern NSW and WA.Gatton2000_monty_s1_s2.Gatton2000Base.Paddock.soil.SoilWater
              Organic: same as Incomplete.Northern NSW and WA.Gatton2000_monty_s1_s2.Gatton2000Base.Paddock.soil.Organic
              Chemical: Thickness=[150, 150, 300, 300, 300, 300, 300]; PH=[6.5, 6.2, 6.2, 6.3, 6.3, 6.4, 6.5]; PHUnits=Water
              Nutrient
              Solute NO3: Thickness=[150, 150, 300, 300, 300, 300, 300]; InitialValues=[18, 4.9, 2.9, 1.7, 1.1, 1, 1]; InitialValuesUnits=ppm; WaterTableConcentration=0; D0=0; DepthConstant=0; MaxDepthSoluteAccessible=0; RunoffEffectivenessAtMovingSolute=0; MaxEffectiveRunoff=0
              Solute NH4: same as Validation.Phenology Experiments.OCP Phenology.Gatton2015.Gatton2015Base.Paddock.soil.NH4
              Solute Urea: same as Validation.Phenology Experiments.OCP Phenology.Gatton2015.Gatton2015Base.Paddock.soil.Urea
              SoilTemperature Temperature
            SurfaceOrganicMatter SurfaceOM: InitialResidueName=wheat; InitialResidueType=wheat; InitialResidueMass=1000; InitialStandingFraction=0; InitialCPR=0; InitialCNR=80
            Report SowingReport: EventNames=[Canola].Sowing
              VariableNames:
                [Clock].Today
                [Canola].SowingData.Cultivar
                [IWeather].Latitude
                [IWeather].Longitude
          SoilArbitrator
          Clock: Start=1998-05-01; End=1998-12-26
          Weather: FileName=met/nind9699.met
        Simulation Nindigully_99_monty_Base
          Summary summaryfile
          Zone Paddock: Area=1; Slope=0; AspectAngle=0; Altitude=50
            Irrigation
            Fertiliser
            Report DailyReport
            Report HarvestReport: same as Incomplete.Northern NSW and WA.Crocantigh_98_monty.Crocantigh_98_monty.HarvestReport
            Manager Harvesting: same as Incomplete.Northern NSW and WA.Crocantigh_98_monty.Crocantigh_98_monty.paddock.Harvesting
            Operations
              1999-06-22  [Canola].Sow(population:40, rowSpacing:200, depth:20, cultivar:"monty");
              1999-06-22  [Fertiliser].Apply(amount: 60, type: "NH4NO3N", depth: 50);
            Plant canola: ResourceName=Canola
            MicroClimate: a_interception=0; b_interception=1; c_interception=0; d_interception=0; SoilHeatFluxFraction=0.4; MinimumHeightDiffForNewLayer=0; NightInterceptionFraction=0.5; ReferenceHeight=2
            SurfaceOrganicMatter SurfaceOM: InitialResidueName=wheat; InitialResidueType=wheat; InitialResidueMass=1000; InitialStandingFraction=0; InitialCPR=0; InitialCNR=80
            Soil: same as Incomplete.Northern NSW and WA.Nindigully_98_99_monty.Nindigully_98_monty_Base.Paddock.soil
            Report SowingReport: EventNames=[Canola].Sowing
              VariableNames:
                [Clock].Today
                [Canola].SowingData.Cultivar
                [IWeather].Latitude
                [IWeather].Longitude
          SoilArbitrator
          Weather: FileName=met/nind9699.met
          Clock: Start=1999-05-01; End=1999-12-26
      Folder Rocky_Crossing_99_Monty
        Simulation Rocky_Crossing_99_monty_Base
          Summary summaryfile
          Zone Paddock: Area=1; Slope=0; AspectAngle=0; Altitude=50
            Irrigation
            Fertiliser
            Report DailyReport
            Report HarvestReport: same as Incomplete.Northern NSW and WA.Crocantigh_98_monty.Crocantigh_98_monty.HarvestReport
            Manager Harvesting: same as Incomplete.Northern NSW and WA.Crocantigh_98_monty.Crocantigh_98_monty.paddock.Harvesting
            Operations
              1999-06-18  [Canola].Sow(population:40, rowSpacing:200, depth:20, cultivar:"monty");
              1999-06-18  [Fertiliser].Apply(amount: 60, type: "NH4NO3N", depth: 50);
            Plant canola: ResourceName=Canola
            MicroClimate: a_interception=0; b_interception=1; c_interception=0; d_interception=0; SoilHeatFluxFraction=0.4; MinimumHeightDiffForNewLayer=0; NightInterceptionFraction=0.5; ReferenceHeight=2
            SurfaceOrganicMatter SurfaceOM: InitialResidueName=wheat; InitialResidueType=wheat; InitialResidueMass=1000; InitialStandingFraction=0; InitialCPR=0; InitialCNR=80
            Soil: Latitude=0; Longitude=0
              Physical: same as Incomplete.Northern NSW and WA.Kullinjah1999_monty.Kullinjah1999Base.Paddock.soil.Physical
              WaterBalance SoilWater: same as Incomplete.Northern NSW and WA.Kullinjah1999_monty.Kullinjah1999Base.Paddock.soil.SoilWater
              Organic: same as Incomplete.Northern NSW and WA.Gatton2000_monty_s1_s2.Gatton2000Base.Paddock.soil.Organic
              Chemical: Thickness=[150, 150, 300, 300, 300, 300, 300]; PH=[6.5, 6.2, 6.2, 6.3, 6.3, 6.4, 6.5]; PHUnits=Water
              Water: Thickness=[150, 150, 300, 300, 300, 300, 300]; InitialValues=[0.39, 0.38, 0.36, 0.35, 0.36, 0.36, 0.36]; FilledFromTop=false
              Nutrient
              Solute NO3: Thickness=[150, 150, 300, 300, 300, 300, 300]; InitialValues=[5, 4, 2, 1, 1, 1, 1]; InitialValuesUnits=ppm; WaterTableConcentration=0; D0=0; DepthConstant=0; MaxDepthSoluteAccessible=0; RunoffEffectivenessAtMovingSolute=0; MaxEffectiveRunoff=0
              Solute NH4: same as Incomplete.Northern NSW and WA.Kullinjah1999_monty.Kullinjah1999Base.Paddock.soil.NH4
              Solute Urea: same as Validation.Phenology Experiments.OCP Phenology.Gatton2015.Gatton2015Base.Paddock.soil.Urea
              SoilTemperature Temperature
            Report SowingReport: EventNames=[Canola].Sowing
              VariableNames:
                [Clock].Today
                [Canola].SowingData.Cultivar
                [IWeather].Latitude
                [IWeather].Longitude
          SoilArbitrator
          Clock: Start=1999-05-01; End=1999-12-26
          Weather: FileName=met/Rocky_crossing_99.met
      Folder RomaRS
        Simulation RomaRS98_monty
          Summary summaryfile
          Zone Paddock: Area=1; Slope=0; AspectAngle=0; Altitude=50
            Irrigation
            Fertiliser
            SurfaceOrganicMatter: InitialResidueName=wheat_stubble; InitialResidueType=wheat; InitialResidueMass=1000; InitialStandingFraction=0; InitialCPR=0; InitialCNR=80
            Report DailyReport
            Report HarvestReport: same as Incomplete.Northern NSW and WA.Crocantigh_98_monty.Crocantigh_98_monty.HarvestReport
            Plant canola: ResourceName=Canola
            MicroClimate: a_interception=0; b_interception=1; c_interception=0; d_interception=0; SoilHeatFluxFraction=0.4; MinimumHeightDiffForNewLayer=0; NightInterceptionFraction=0.5; ReferenceHeight=2
            Manager Harvesting: same as Incomplete.Northern NSW and WA.Crocantigh_98_monty.Crocantigh_98_monty.paddock.Harvesting
            Soil: Latitude=0; Longitude=0
              Physical
                Thickness  BD    AirDry  LL15  DUL   SAT
                100        1.18  0.11    0.26  0.43  0.52
                200        1.48  0.15    0.23  0.39  0.42
                300        1.45  0.2     0.22  0.38  0.4
                300        1.56  0.24    0.25  0.36  0.39
                300        1.56  0.26    0.27  0.35  0.39
                300        1.57  0.25    0.26  0.34  0.38
                300        1.57  0.25    0.26  0.3   0.38
                SoilCrop CanolaSoil: LL=[0.26, 0.23, 0.22, 0.25, 0.27, 0.26, 0.26]; KL=[0.08, 0.07, 0.06, 0.05, 0.03, 0.02, 0.01]; XF=[1, 1, 1, 1, 0, 0, 0]
              WaterBalance SoilWater: SummerDate=1-Nov; SummerU=6; SummerCona=3.5; WinterDate=1-Apr; WinterU=6; WinterCona=3.5; DiffusConst=40; DiffusSlope=16; Salb=0.13; CN2Bare=75; CNRed=20; CNCov=0.8; PSIDul=-100; Thickness=[100, 200, 300, 300, 300, 300, 300]; SWCON=[0.1, 0.1, 0.1, 0.1, 0.1, 0.1, 0.1]
              Organic: FOMCNRatio=33; CarbonUnits=Total
                Thickness  Carbon  SoilCNRatio  FBiom  FInert  FOM
                100        0.8     14.5         0.05   0.39    36.6247
                200        0.6     14.5         0.02   0.47    26.2428
                300        0.5     14.5         0.015  0.52    15.917
                300        0.3     14.5         0.01   0.62    9.6542
                300        0.2     14.5         0.01   0.74    5.8556
                300        0.2     14.5         0.01   0.8     3.5516
                300        0.2     14.5         0.01   0.8     2.1541
              Chemical: Thickness=[100, 200, 300, 300, 300, 300, 300]; PH=[8.9, 8.9, 9, 9, 9, 9, 9]; PHUnits=Water
              Water: Thickness=[100, 200, 300, 300, 300, 300, 300]; InitialValues=[0.43, 0.39, 0.38, 0.36, 0.35, 0.34, 0.3]; FilledFromTop=false
              Nutrient
              Solute NO3: Thickness=[100, 200, 300, 300, 300, 300, 300]; InitialValues=[18.6, 4.9, 2.9, 1.7, 1.1, 1, 1]; InitialValuesUnits=ppm; WaterTableConcentration=0; D0=0; DepthConstant=0; MaxDepthSoluteAccessible=0; RunoffEffectivenessAtMovingSolute=0; MaxEffectiveRunoff=0
              Solute NH4: Thickness=[100, 200, 300, 300, 300, 300, 300]; InitialValues=[1, 1, 1, 1, 1, 1, 1]; InitialValuesUnits=ppm; WaterTableConcentration=0; D0=0; DepthConstant=0; MaxDepthSoluteAccessible=0; RunoffEffectivenessAtMovingSolute=0; MaxEffectiveRunoff=0
              Solute Urea: Thickness=[100, 200, 300, 300, 300, 300, 300]; InitialValues=[0, 0, 0, 0, 0, 0, 0]; InitialValuesUnits=kg/ha; WaterTableConcentration=0; D0=0; DepthConstant=0; MaxDepthSoluteAccessible=0; RunoffEffectivenessAtMovingSolute=0; MaxEffectiveRunoff=0
              SoilTemperature Temperature
            Operations
              1998-05-13  [Canola].Sow(population:40, rowSpacing:200, depth:20, cultivar:"monty");
              1998-05-13  [Fertiliser].Apply(amount: 60, type: "NH4NO3N", depth: 50);
            Report SowingReport: EventNames=[Canola].Sowing
              VariableNames:
                [Clock].Today
                [Canola].SowingData.Cultivar
                [IWeather].Latitude
                [IWeather].Longitude
          SoilArbitrator
          Weather: FileName=met/wallum978.met
          Clock: Start=1998-05-01; End=1998-12-26
        Experiment RomaRS_99_s1_s2
          Factors
            Factor TOS_index: Specification=[Sowing]
              Operations 1
                1999-05-27  [Canola].Sow(population:40, rowSpacing:200, depth:20, cultivar:"monty");
                1999-05-27  [Fertiliser].Apply(amount: 60, type: "NH4NO3N", depth: 50);
              Operations 2
                1999-07-12  [Canola].Sow(population:40, rowSpacing:200, depth:20, cultivar:"monty");
                1999-07-12  [Fertiliser].Apply(amount: 60, type: "NH4NO3N", depth: 50);
          Simulation RomaRS99_s1_s2_Base
            Summary summaryfile
            Zone Paddock: Area=1; Slope=0; AspectAngle=0; Altitude=50
              Irrigation
              Fertiliser
              SurfaceOrganicMatter: InitialResidueName=wheat_stubble; InitialResidueType=wheat; InitialResidueMass=1000; InitialStandingFraction=0; InitialCPR=0; InitialCNR=80
              Report DailyReport
              Report HarvestReport: same as Incomplete.Northern NSW and WA.Crocantigh_98_monty.Crocantigh_98_monty.HarvestReport
              Plant canola: ResourceName=Canola
              MicroClimate: a_interception=0; b_interception=1; c_interception=0; d_interception=0; SoilHeatFluxFraction=0.4; MinimumHeightDiffForNewLayer=0; NightInterceptionFraction=0.5; ReferenceHeight=2
              Manager Harvesting: same as Incomplete.Northern NSW and WA.Crocantigh_98_monty.Crocantigh_98_monty.paddock.Harvesting
              Soil: same as Incomplete.Northern NSW and WA.RomaRS.RomaRS98_monty.Paddock.soil
              Report SowingReport: EventNames=[Canola].Sowing
                VariableNames:
                  [Clock].Today
                  [Canola].SowingData.Cultivar
                  [IWeather].Latitude
                  [IWeather].Longitude
            SoilArbitrator
            Weather: FileName=met/romars.met
            Clock: Start=1999-05-01; End=1999-12-26
      Folder Somerset
        Simulation Somerset_98_monty
          Summary summaryfile
          Zone Paddock: Area=1; Slope=0; AspectAngle=0; Altitude=50
            Irrigation
            Fertiliser
            SurfaceOrganicMatter: InitialResidueName=wheat_stubble; InitialResidueType=wheat; InitialResidueMass=1000; InitialStandingFraction=0; InitialCPR=0; InitialCNR=80
            Report DailyReport
            Report HarvestReport: same as Incomplete.Northern NSW and WA.Crocantigh_98_monty.Crocantigh_98_monty.HarvestReport
            Plant canola: ResourceName=Canola
            MicroClimate: a_interception=0; b_interception=1; c_interception=0; d_interception=0; SoilHeatFluxFraction=0.4; MinimumHeightDiffForNewLayer=0; NightInterceptionFraction=0.5; ReferenceHeight=2
            Manager Harvesting: same as Incomplete.Northern NSW and WA.Crocantigh_98_monty.Crocantigh_98_monty.paddock.Harvesting
            Operations
              1998-05-15  [Canola].Sow(population:40, rowSpacing:200, depth:20, cultivar:"monty");
              1998-05-12  [Fertiliser].Apply(amount: 60, type: "NH4NO3N", depth: 50);
            Soil: same as Incomplete.Northern NSW and WA.Milroy2000_monty.Milroy2000_Base.Paddock.soil
            Report SowingReport: EventNames=[Canola].Sowing
              VariableNames:
                [Clock].Today
                [Canola].SowingData.Cultivar
                [IWeather].Latitude
                [IWeather].Longitude
          SoilArbitrator
          Clock: Start=1998-05-01; End=1998-12-26
          Weather: FileName=met/wallum978.met
        Simulation Somerset_99_monty
          Summary summaryfile
          Zone Paddock: Area=1; Slope=0; AspectAngle=0; Altitude=50
            Irrigation
            Fertiliser
            SurfaceOrganicMatter: InitialResidueName=wheat_stubble; InitialResidueType=wheat; InitialResidueMass=1000; InitialStandingFraction=0; InitialCPR=0; InitialCNR=80
            Report DailyReport
            Report HarvestReport: same as Incomplete.Northern NSW and WA.Crocantigh_98_monty.Crocantigh_98_monty.HarvestReport
            Plant canola: ResourceName=Canola
            MicroClimate: a_interception=0; b_interception=1; c_interception=0; d_interception=0; SoilHeatFluxFraction=0.4; MinimumHeightDiffForNewLayer=0; NightInterceptionFraction=0.5; ReferenceHeight=2
            Manager Harvesting: same as Incomplete.Northern NSW and WA.Crocantigh_98_monty.Crocantigh_98_monty.paddock.Harvesting
            Operations
              1998-05-18  [Canola].Sow(population:40, rowSpacing:200, depth:20, cultivar:"monty");
              1998-05-18  [Fertiliser].Apply(amount: 60, type: "NH4NO3N", depth: 50);
            Soil: same as Incomplete.Northern NSW and WA.Milroy2000_monty.Milroy2000_Base.Paddock.soil
            Report SowingReport: EventNames=[Canola].Sowing
              VariableNames:
                [Clock].Today
                [Canola].SowingData.Cultivar
                [IWeather].Latitude
                [IWeather].Longitude
          SoilArbitrator
          Weather: FileName=met/romars.met
          Clock: Start=1999-05-01; End=1999-12-26
      Folder Tamworth98_99_00
        Experiment Tamworth98
          Factors
            Factor TOS_index: Specification=[Sowing]
              Operations May
                1998-05-01  [Canola].Sow(population:40, rowSpacing:200, depth:20, cultivar:"monty");
                1998-05-01  [Fertiliser].Apply(amount: 100, type: "NH4NO3N", depth: 50);
              Operations Jun
                1998-06-01  [Canola].Sow(population:40, rowSpacing:200, depth:20, cultivar:"monty");
                1998-06-01  [Fertiliser].Apply(amount: 100, type: "NH4NO3N", depth: 50);
              Operations Aug
                1998-08-03  [Canola].Sow(population:40, rowSpacing:200, depth:20, cultivar:"monty");
                1998-08-03  [Fertiliser].Apply(amount: 100, type: "NH4NO3N", depth: 50);
              Operations Sep
                1998-09-21  [Canola].Sow(population:40, rowSpacing:200, depth:20, cultivar:"monty");
                1998-09-21  [Fertiliser].Apply(amount: 100, type: "NH4NO3N", depth: 50);
          Simulation Tamworth98_Base
            Summary summaryfile
            Zone Paddock: Area=1; Slope=0; AspectAngle=0; Altitude=50
              Irrigation
              Fertiliser
              SurfaceOrganicMatter: InitialResidueName=wheat_stubble; InitialResidueType=wheat; InitialResidueMass=1000; InitialStandingFraction=0; InitialCPR=0; InitialCNR=80
              Report DailyReport
              Report HarvestReport: same as Incomplete.Northern NSW and WA.Crocantigh_98_monty.Crocantigh_98_monty.HarvestReport
              Plant canola: ResourceName=Canola
              MicroClimate: a_interception=0; b_interception=1; c_interception=0; d_interception=0; SoilHeatFluxFraction=0.4; MinimumHeightDiffForNewLayer=0; NightInterceptionFraction=0.5; ReferenceHeight=2
              Manager Harvesting: same as Incomplete.Northern NSW and WA.Crocantigh_98_monty.Crocantigh_98_monty.paddock.Harvesting
              Soil: Latitude=0; Longitude=0
                Water: Thickness=[150, 150, 150, 150, 300, 300, 300, 300]; InitialValues=[0.426, 0.422, 0.422, 0.426, 0.434, 0.434, 0.428, 0.4048]; FilledFromTop=false
                Physical
                  Thickness  BD    AirDry  LL15  DUL    SAT
                  150        1.2   0.05    0.29  0.46   0.51
                  150        1.3   0.19    0.29  0.455  0.505
                  150        1.3   0.22    0.29  0.455  0.505
                  150        1.3   0.19    0.31  0.455  0.505
                  300        1.32  0.22    0.37  0.45   0.5
                  300        1.32  0.19    0.43  0.435  0.485
                  300        1.36  0.17    0.42  0.43   0.48
                  300        1.45  0.17    0.4   0.406  0.456
                  SoilCrop CanolaSoil: LL=[0.29, 0.29, 0.29, 0.31, 0.37, 0.43, 0.42, 0.4]; KL=[0.08, 0.08, 0.08, 0.08, 0.06, 0.04, 0.02, 0.01]; XF=[1, 1, 1, 1, 1, 1, 1, 0]
                WaterBalance SoilWater: SummerDate=1-Nov; SummerU=6; SummerCona=3.5; WinterDate=1-Apr; WinterU=6; WinterCona=3.5; DiffusConst=88; DiffusSlope=35.4; Salb=0.13; CN2Bare=72; CNRed=20; CNCov=0.8; PSIDul=-100; Thickness=[150, 150, 150, 150, 300, 300, 300, 300]; SWCON=[0.4, 0.4, 0.4, 0.4, 0.4, 0.4, 0.4, 0.4]
                Organic: FOMCNRatio=33; CarbonUnits=Total
                  Thickness  Carbon  SoilCNRatio  FBiom  FInert  FOM
                  150        2.2     14.5         0.02   0.36    0
                  150        1.6     14.5         0.015  0.5     0
                  150        1.35    14.5         0.01   0.59    0
                  150        0.95    14.5         0.01   0.84    0
                  300        1       14.5         0.01   0.8     0
                  300        0.8     14.5         0.01   0.99    0
                  300        0.45    14.5         0.01   0.99    0
                  300        0.45    14.5         0.01   0.99    0
                Chemical: Thickness=[150, 150, 150, 150, 300, 300, 300, 300]; PH=[7.5, 8, 8, 8, 8, 8, 8, 8]; PHUnits=Water
                Nutrient
                Solute NO3: Thickness=[150, 150, 150, 150, 300, 300, 300, 300]; InitialValues=[2, 2, 2, 2, 1, 1, 1, 1]; InitialValuesUnits=ppm; WaterTableConcentration=0; D0=0; DepthConstant=0; MaxDepthSoluteAccessible=0; RunoffEffectivenessAtMovingSolute=0; MaxEffectiveRunoff=0
                Solute NH4: Thickness=[150, 150, 150, 150, 300, 300, 300, 300]; InitialValues=[0, 0, 0, 0, 0, 0, 0, 0]; InitialValuesUnits=ppm; WaterTableConcentration=0; D0=0; DepthConstant=0; MaxDepthSoluteAccessible=0; RunoffEffectivenessAtMovingSolute=0; MaxEffectiveRunoff=0
                Solute Urea: Thickness=[150, 150, 150, 150, 300, 300, 300, 300]; InitialValues=[0, 0, 0, 0, 0, 0, 0, 0]; InitialValuesUnits=kg/ha; WaterTableConcentration=0; D0=0; DepthConstant=0; MaxDepthSoluteAccessible=0; RunoffEffectivenessAtMovingSolute=0; MaxEffectiveRunoff=0
                SoilTemperature Temperature
              Operations Sowing
                1998-05-01  dummy for replacement
              Report SowingReport: EventNames=[Canola].Sowing
                VariableNames:
                  [Clock].Today
                  [Canola].SowingData.Cultivar
                  [IWeather].Latitude
                  [IWeather].Longitude
            SoilArbitrator
            Weather: FileName=met/tamworth.met
            Clock: Start=1998-05-01; End=1999-02-19
        Experiment Tamworth99
          Factors
            Factor TOS_index: Specification=[Sowing]
              Operations Apr
                1999-04-14  [Canola].Sow(population:40, rowSpacing:200, depth:20, cultivar:"monty");
                1999-04-14  [Fertiliser].Apply(amount: 120, type: "NH4NO3N", depth: 50);
              Operations May
                1999-05-17  [Canola].Sow(population:40, rowSpacing:200, depth:20, cultivar:"monty");
                1999-05-17  [Fertiliser].Apply(amount: 120, type: "NH4NO3N", depth: 50);
              Operations Jun
                1999-06-18  [Canola].Sow(population:40, rowSpacing:200, depth:20, cultivar:"monty");
                1999-06-18  [Fertiliser].Apply(amount: 120, type: "NH4NO3N", depth: 50);
              Operations Aug
                1999-08-20  [Canola].Sow(population:40, rowSpacing:200, depth:20, cultivar:"monty");
                1999-08-20  [Fertiliser].Apply(amount: 120, type: "NH4NO3N", depth: 50);
          Simulation Tamworth99_Base
            Summary summaryfile
            Zone Paddock: Area=1; Slope=0; AspectAngle=0; Altitude=50
              Irrigation
              Fertiliser
              SurfaceOrganicMatter: InitialResidueName=wheat_stubble; InitialResidueType=wheat; InitialResidueMass=1000; InitialStandingFraction=0; InitialCPR=0; InitialCNR=80
              Report DailyReport
              Report HarvestReport: same as Incomplete.Northern NSW and WA.Crocantigh_98_monty.Crocantigh_98_monty.HarvestReport
              Plant canola: ResourceName=Canola
              MicroClimate: a_interception=0; b_interception=1; c_interception=0; d_interception=0; SoilHeatFluxFraction=0.4; MinimumHeightDiffForNewLayer=0; NightInterceptionFraction=0.5; ReferenceHeight=2
              Manager Harvesting: same as Incomplete.Northern NSW and WA.Crocantigh_98_monty.Crocantigh_98_monty.paddock.Harvesting
              Soil: Latitude=0; Longitude=0
                Water: Thickness=[150, 150, 150, 150, 300, 300, 300, 300]; InitialValues=[0.46, 0.455, 0.455, 0.455, 0.45, 0.435, 0.43, 0.406]; FilledFromTop=false
                Physical: same as Incomplete.Northern NSW and WA.Tamworth98_99_00.Tamworth98.Tamworth98_Base.Paddock.soil.Physical
                WaterBalance SoilWater: same as Incomplete.Northern NSW and WA.Tamworth98_99_00.Tamworth98.Tamworth98_Base.Paddock.soil.SoilWater
                Organic: same as Incomplete.Northern NSW and WA.Tamworth98_99_00.Tamworth98.Tamworth98_Base.Paddock.soil.Organic
                Chemical: Thickness=[150, 150, 150, 150, 300, 300, 300, 300]; PH=[7.5, 8, 8, 8, 8, 8, 8, 8]; PHUnits=Water
                Nutrient
                Solute NO3: same as Incomplete.Northern NSW and WA.Tamworth98_99_00.Tamworth98.Tamworth98_Base.Paddock.soil.NO3
                Solute NH4: same as Incomplete.Northern NSW and WA.Tamworth98_99_00.Tamworth98.Tamworth98_Base.Paddock.soil.NH4
                Solute Urea: same as Incomplete.Northern NSW and WA.Tamworth98_99_00.Tamworth98.Tamworth98_Base.Paddock.soil.Urea
                SoilTemperature Temperature
              Operations Sowing
                1998-05-01  dummy for replacement
              Report SowingReport: EventNames=[Canola].Sowing
                VariableNames:
                  [Clock].Today
                  [Canola].SowingData.Cultivar
                  [IWeather].Latitude
                  [IWeather].Longitude
            SoilArbitrator
            Weather: FileName=met/tamworth.met
            Clock: Start=1999-04-14; End=1999-12-30
        Experiment Tamworth00
          Factors
            Factor TOS_index: Specification=[Sowing]
              Operations Apr
                2000-04-18  [Canola].Sow(population:40, rowSpacing:200, depth:20, cultivar:"monty");
                2000-04-18  [Fertiliser].Apply(amount: 60, type: "NH4NO3N", depth: 50);
              Operations May
                2000-05-18  [Canola].Sow(population:40, rowSpacing:200, depth:20, cultivar:"monty");
                2000-05-18  [Fertiliser].Apply(amount: 60, type: "NH4NO3N", depth: 50);
              Operations Jun
                2000-06-17  [Canola].Sow(population:40, rowSpacing:200, depth:20, cultivar:"monty");
                2000-06-17  [Fertiliser].Apply(amount: 60, type: "NH4NO3N", depth: 50);
              Operations Jul
                2000-07-17  [SoilWater] set insoil = 0.1
                2000-07-17  [Canola].Sow(population:40, rowSpacing:200, depth:20, cultivar:"monty");
                2000-07-17  [Fertiliser].Apply(amount: 60, type: "NH4NO3N", depth: 50);
          Simulation Tamworth00_Base
            Summary summaryfile
            Zone Paddock: same as Incomplete.Northern NSW and WA.Tamworth98_99_00.Tamworth99.Tamworth99_Base.Paddock
            SoilArbitrator
            Clock: Start=2000-04-14; End=2000-12-30
            Weather: FileName=met/Tamworth00.met
      Folder W_Hills97
        Experiment W_Hills97_DrumTri
          Factors
            Factor TOS_index: Specification=[Operations]
              Operations 1
                1997-05-31  [Canola].Sow(population:70, rowSpacing:200, depth:20, cultivar:"drum_triazine");
                1997-05-31  [Fertiliser].Apply(amount: 60, type: "UreaN", depth: 10);
              Operations 2
                1997-06-17  [Canola].Sow(population:70, rowSpacing:200, depth:20, cultivar:"drum_triazine");
                1997-06-17  [Fertiliser].Apply(amount: 60, type: "UreaN", depth: 10);
              Operations 3
                1997-06-30  [Canola].Sow(population:70, rowSpacing:200, depth:20, cultivar:"drum_triazine");
                1997-06-30  [Fertiliser].Apply(amount: 60, type: "UreaN", depth: 10);
              Operations 4
                1997-07-11  [Canola].Sow(population:70, rowSpacing:200, depth:20, cultivar:"drum_triazine");
                1997-07-11  [Fertiliser].Apply(amount: 60, type: "UreaN", depth: 10);
          Simulation WHills97_Base_DrumTri
            Summary summaryfile
            Zone Paddock: Area=1; Slope=0; AspectAngle=0; Altitude=50
              Operations
                0001-01-01  Dummy for replacement
              Irrigation
              Fertiliser
              Report DailyReport
              Plant canola: ResourceName=Canola
              MicroClimate: a_interception=0; b_interception=1; c_interception=0; d_interception=0; SoilHeatFluxFraction=0.4; MinimumHeightDiffForNewLayer=0; NightInterceptionFraction=0.5; ReferenceHeight=2
              Report HarvestReport: same as Incomplete.Northern NSW and WA.Crocantigh_98_monty.Crocantigh_98_monty.HarvestReport
              Manager Harvesting: same as Incomplete.Northern NSW and WA.Crocantigh_98_monty.Crocantigh_98_monty.paddock.Harvesting
              Soil: same as Incomplete.Northern NSW and WA.HinesHill97.HHill97_DrumTri.HHill97_Base_DrumTri.Paddock.soil
              SurfaceOrganicMatter SurfaceOM: InitialResidueName=chickpea; InitialResidueType=chickpea; InitialResidueMass=4500; InitialStandingFraction=0; InitialCPR=0; InitialCNR=25
              Report SowingReport: EventNames=[Canola].Sowing
                VariableNames:
                  [Clock].Today
                  [Canola].SowingData.Cultivar
                  [IWeather].Latitude
                  [IWeather].Longitude
            SoilArbitrator
            Weather: FileName=met/wongan.met
            Clock: Start=1997-01-01; End=1997-12-31
        Experiment W_Hills97_KarooTri
          Factors
            Factor TOS_index: Specification=[Operations]
              Operations 1
                1997-05-31  [Canola].Sow(population:70, rowSpacing:200, depth:20, cultivar:"karoo_triazine");
                1997-05-31  [Fertiliser].Apply(amount: 60, type: "UreaN", depth: 10);
              Operations 2
                1997-06-17  [Canola].Sow(population:70, rowSpacing:200, depth:20, cultivar:"karoo_triazine");
                1997-06-17  [Fertiliser].Apply(amount: 60, type: "UreaN", depth: 10);
              Operations 3
                1997-06-30  [Canola].Sow(population:70, rowSpacing:200, depth:20, cultivar:"karoo_triazine");
                1997-06-30  [Fertiliser].Apply(amount: 60, type: "UreaN", depth: 10);
              Operations 4
                1997-07-11  [Canola].Sow(population:70, rowSpacing:200, depth:20, cultivar:"karoo_triazine");
                1997-07-11  [Fertiliser].Apply(amount: 60, type: "UreaN", depth: 10);
          Simulation WHills97_Base_KarooTri: same as Incomplete.Northern NSW and WA.W_Hills97.W_Hills97_DrumTri.WHills97_Base_DrumTri
        Experiment W_Hills97_Hyola42
          Factors
            Factor TOS_index: Specification=[Operations]
              Operations 1
                1997-05-31  [Canola].Sow(population:70, rowSpacing:200, depth:20, cultivar:"Hyola42");
                1997-05-31  [Fertiliser].Apply(amount: 60, type: "UreaN", depth: 10);
              Operations 2
                1997-06-17  [Canola].Sow(population:70, rowSpacing:200, depth:20, cultivar:"Hyola42");
                1997-06-17  [Fertiliser].Apply(amount: 60, type: "UreaN", depth: 10);
              Operations 3
                1997-06-30  [Canola].Sow(population:70, rowSpacing:200, depth:20, cultivar:"Hyola42");
                1997-06-30  [Fertiliser].Apply(amount: 60, type: "UreaN", depth: 10);
              Operations 4
                1997-07-11  [Canola].Sow(population:70, rowSpacing:200, depth:20, cultivar:"Hyola42");
                1997-07-11  [Fertiliser].Apply(amount: 60, type: "UreaN", depth: 10);
          Simulation WHills97_Base_Hyola42: same as Incomplete.Northern NSW and WA.W_Hills97.W_Hills97_DrumTri.WHills97_Base_DrumTri
        Experiment W_Hills97_Monty
          Factors
            Factor TOS_index: Specification=[Operations]
              Operations 1
                1997-05-31  [Canola].Sow(population:70, rowSpacing:200, depth:20, cultivar:"Monty");
                1997-05-31  [Fertiliser].Apply(amount: 60, type: "UreaN", depth: 10);
              Operations 2
                1997-06-17  [Canola].Sow(population:70, rowSpacing:200, depth:20, cultivar:"Monty");
                1997-06-17  [Fertiliser].Apply(amount: 60, type: "UreaN", depth: 10);
              Operations 3
                1997-06-30  [Canola].Sow(population:70, rowSpacing:200, depth:20, cultivar:"Monty");
                1997-06-30  [Fertiliser].Apply(amount: 60, type: "UreaN", depth: 10);
              Operations 4
                1997-07-11  [Canola].Sow(population:70, rowSpacing:200, depth:20, cultivar:"Monty");
                1997-07-11  [Fertiliser].Apply(amount: 60, type: "UreaN", depth: 10);
          Simulation WHills97_Base_Monty: same as Incomplete.Northern NSW and WA.W_Hills97.W_Hills97_DrumTri.WHills97_Base_DrumTri
        Experiment W_Hills97_Mustard
          Factors
            Factor TOS_index: Specification=[Operations]
              Operations 1
                1997-05-31  [Canola].Sow(population:70, rowSpacing:200, depth:20, cultivar:"Mustard");
                1997-05-31  [Fertiliser].Apply(amount: 60, type: "UreaN", depth: 10);
              Operations 2
                1997-06-17  [Canola].Sow(population:70, rowSpacing:200, depth:20, cultivar:"Mustard");
                1997-06-17  [Fertiliser].Apply(amount: 60, type: "UreaN", depth: 10);
              Operations 3
                1997-06-30  [Canola].Sow(population:70, rowSpacing:200, depth:20, cultivar:"Mustard");
                1997-06-30  [Fertiliser].Apply(amount: 60, type: "UreaN", depth: 10);
              Operations 4
                1997-07-11  [Canola].Sow(population:70, rowSpacing:200, depth:20, cultivar:"Mustard");
                1997-07-11  [Fertiliser].Apply(amount: 60, type: "UreaN", depth: 10);
          Simulation WHills97_Base_Mustard: same as Incomplete.Northern NSW and WA.W_Hills97.W_Hills97_DrumTri.WHills97_Base_DrumTri
        Experiment W_Hills97_Oscar
          Factors
            Factor TOS_index: Specification=[Operations]
              Operations 1
                1997-05-31  [Canola].Sow(population:70, rowSpacing:200, depth:20, cultivar:"Oscar");
                1997-05-31  [Fertiliser].Apply(amount: 60, type: "UreaN", depth: 10);
              Operations 2
                1997-06-17  [Canola].Sow(population:70, rowSpacing:200, depth:20, cultivar:"Oscar");
                1997-06-17  [Fertiliser].Apply(amount: 60, type: "UreaN", depth: 10);
              Operations 3
                1997-06-30  [Canola].Sow(population:70, rowSpacing:200, depth:20, cultivar:"Oscar");
                1997-06-30  [Fertiliser].Apply(amount: 60, type: "UreaN", depth: 10);
              Operations 4
                1997-07-11  [Canola].Sow(population:70, rowSpacing:200, depth:20, cultivar:"Oscar");
                1997-07-11  [Fertiliser].Apply(amount: 60, type: "UreaN", depth: 10);
          Simulation WHills97_Base_Oscar: same as Incomplete.Northern NSW and WA.W_Hills97.W_Hills97_DrumTri.WHills97_Base_DrumTri
      Folder W_Hills98
        Folder HighN
          Experiment W_Hills98_KarooTri_HighN
            Factors
              Factor TOS_index: Specification=[Operations]
                Operations 1
                  1998-04-22  [Canola].Sow(population:70, rowSpacing:200, depth:20, cultivar:"Karoo_triazine");
                  1998-04-22  [Fertiliser].Apply(amount: 100, type: "UreaN", depth: 10);
                  1998-05-12  [Fertiliser].Apply(amount: 100, type: "UreaN", depth: 10);
                Operations 2
                  1998-05-22  [Canola].Sow(population:70, rowSpacing:200, depth:20, cultivar:"Karoo_triazine");
                  1998-05-22  [Fertiliser].Apply(amount: 100, type: "UreaN", depth: 10);
                  1998-06-21  [Fertiliser].Apply(amount: 100, type: "UreaN", depth: 10);
                Operations 3
                  1998-06-19  [Canola].Sow(population:70, rowSpacing:200, depth:20, cultivar:"Karoo_triazine");
                  1998-06-19  [Fertiliser].Apply(amount: 100, type: "UreaN", depth: 10);
                  1998-07-19  [Fertiliser].Apply(amount: 100, type: "UreaN", depth: 10);
                Operations 4
                  1998-07-10  [Canola].Sow(population:70, rowSpacing:200, depth:20, cultivar:"Karoo_triazine");
                  1998-07-10  [Fertiliser].Apply(amount: 100, type: "UreaN", depth: 10);
                  1998-08-09  [Fertiliser].Apply(amount: 100, type: "UreaN", depth: 10);
            Simulation W_Hills98_Base_KarooTri_HighN
              Summary summaryfile
              Zone Paddock: same as Incomplete.Northern NSW and WA.MtBarker98.HighN.MtB98_KarooTri_HighN.MtB98_Base_KarooTri_HighN.Paddock
              SoilArbitrator
              Clock: Start=1998-01-01; End=1998-12-31
              Weather: FileName=met/wongan.met
          Experiment W_Hills98_Monty_HighN
            Factors
              Factor TOS_index: Specification=[Operations]
                Operations 1
                  1998-04-22  [Canola].Sow(population:70, rowSpacing:200, depth:20, cultivar:"Monty");
                  1998-04-22  [Fertiliser].Apply(amount: 100, type: "UreaN", depth: 10);
                  1998-05-12  [Fertiliser].Apply(amount: 100, type: "UreaN", depth: 10);
                Operations 2
                  1998-05-22  [Canola].Sow(population:70, rowSpacing:200, depth:20, cultivar:"Monty");
                  1998-05-22  [Fertiliser].Apply(amount: 100, type: "UreaN", depth: 10);
                  1998-06-21  [Fertiliser].Apply(amount: 100, type: "UreaN", depth: 10);
                Operations 3
                  1998-06-19  [Canola].Sow(population:70, rowSpacing:200, depth:20, cultivar:"Monty");
                  1998-06-19  [Fertiliser].Apply(amount: 100, type: "UreaN", depth: 10);
                  1998-07-19  [Fertiliser].Apply(amount: 100, type: "UreaN", depth: 10);
                Operations 4
                  1998-07-10  [Canola].Sow(population:70, rowSpacing:200, depth:20, cultivar:"Monty");
                  1998-07-10  [Fertiliser].Apply(amount: 100, type: "UreaN", depth: 10);
                  1998-08-09  [Fertiliser].Apply(amount: 100, type: "UreaN", depth: 10);
            Simulation W_Hills98_Base_Monty_HighN: same as Incomplete.Northern NSW and WA.W_Hills98.HighN.W_Hills98_KarooTri_HighN.W_Hills98_Base_KarooTri_HighN
          Experiment W_Hills98_Oscar_HighN
            Factors
              Factor TOS_index: Specification=[Operations]
                Operations 1
                  1998-04-22  [Canola].Sow(population:70, rowSpacing:200, depth:20, cultivar:"Oscar");
                  1998-04-22  [Fertiliser].Apply(amount: 100, type: "UreaN", depth: 10);
                  1998-05-12  [Fertiliser].Apply(amount: 100, type: "UreaN", depth: 10);
                Operations 2
                  1998-05-22  [Canola].Sow(population:70, rowSpacing:200, depth:20, cultivar:"Oscar");
                  1998-05-22  [Fertiliser].Apply(amount: 100, type: "UreaN", depth: 10);
                  1998-06-21  [Fertiliser].Apply(amount: 100, type: "UreaN", depth: 10);
                Operations 3
                  1998-06-19  [Canola].Sow(population:70, rowSpacing:200, depth:20, cultivar:"Oscar");
                  1998-06-19  [Fertiliser].Apply(amount: 100, type: "UreaN", depth: 10);
                  1998-07-19  [Fertiliser].Apply(amount: 100, type: "UreaN", depth: 10);
                Operations 4
                  1998-07-10  [Canola].Sow(population:70, rowSpacing:200, depth:20, cultivar:"Oscar");
                  1998-07-10  [Fertiliser].Apply(amount: 100, type: "UreaN", depth: 10);
                  1998-08-09  [Fertiliser].Apply(amount: 100, type: "UreaN", depth: 10);
            Simulation W_Hills98_Base_Oscar_HighN: same as Incomplete.Northern NSW and WA.W_Hills98.HighN.W_Hills98_KarooTri_HighN.W_Hills98_Base_KarooTri_HighN
        Folder LowN
          Experiment W_Hills98_KarooTri_LowN
            Factors
              Factor TOS_index: Specification=[Operations]
                Operations 1
                  1998-04-22  [Canola].Sow(population:70, rowSpacing:200, depth:20, cultivar:"Karoo_triazine");
                  1998-04-22  [Fertiliser].Apply(amount: 100, type: "UreaN", depth: 10);
                Operations 2
                  1998-05-22  [Canola].Sow(population:70, rowSpacing:200, depth:20, cultivar:"Karoo_triazine");
                  1998-05-22  [Fertiliser].Apply(amount: 100, type: "UreaN", depth: 10);
                Operations 3
                  1998-06-19  [Canola].Sow(population:70, rowSpacing:200, depth:20, cultivar:"Karoo_triazine");
                  1998-06-19  [Fertiliser].Apply(amount: 100, type: "UreaN", depth: 10);
                Operations 4
                  1998-07-10  [Canola].Sow(population:70, rowSpacing:200, depth:20, cultivar:"Karoo_triazine");
                  1998-07-10  [Fertiliser].Apply(amount: 100, type: "UreaN", depth: 10);
            Simulation W_Hills98_Base_KarooTri_LowN: same as Incomplete.Northern NSW and WA.W_Hills98.HighN.W_Hills98_KarooTri_HighN.W_Hills98_Base_KarooTri_HighN
          Experiment W_Hills98_Monty_LowN
            Factors
              Factor TOS_index: Specification=[Operations]
                Operations 1
                  1998-04-22  [Canola].Sow(population:70, rowSpacing:200, depth:20, cultivar:"Monty");
                  1998-04-22  [Fertiliser].Apply(amount: 100, type: "UreaN", depth: 10);
                Operations 2
                  1998-05-22  [Canola].Sow(population:70, rowSpacing:200, depth:20, cultivar:"Monty");
                  1998-05-22  [Fertiliser].Apply(amount: 100, type: "UreaN", depth: 10);
                Operations 3
                  1998-06-19  [Canola].Sow(population:70, rowSpacing:200, depth:20, cultivar:"Monty");
                  1998-06-19  [Fertiliser].Apply(amount: 100, type: "UreaN", depth: 10);
                Operations 4
                  1998-07-10  [Canola].Sow(population:70, rowSpacing:200, depth:20, cultivar:"Monty");
                  1998-07-10  [Fertiliser].Apply(amount: 100, type: "UreaN", depth: 10);
            Simulation W_Hills98_Base_Monty_LowN: same as Incomplete.Northern NSW and WA.W_Hills98.HighN.W_Hills98_KarooTri_HighN.W_Hills98_Base_KarooTri_HighN
          Experiment W_Hills98_Oscar_LowN
            Factors
              Factor TOS_index: Specification=[Operations]
                Operations 1
                  1998-04-22  [Canola].Sow(population:70, rowSpacing:200, depth:20, cultivar:"Oscar");
                  1998-04-22  [Fertiliser].Apply(amount: 100, type: "UreaN", depth: 10);
                Operations 2
                  1998-05-22  [Canola].Sow(population:70, rowSpacing:200, depth:20, cultivar:"Oscar");
                  1998-05-22  [Fertiliser].Apply(amount: 100, type: "UreaN", depth: 10);
                Operations 3
                  1998-06-19  [Canola].Sow(population:70, rowSpacing:200, depth:20, cultivar:"Oscar");
                  1998-06-19  [Fertiliser].Apply(amount: 100, type: "UreaN", depth: 10);
                Operations 4
                  1998-07-10  [Canola].Sow(population:70, rowSpacing:200, depth:20, cultivar:"Oscar");
                  1998-07-10  [Fertiliser].Apply(amount: 100, type: "UreaN", depth: 10);
            Simulation W_Hills98_Base_Oscar_LowN: same as Incomplete.Northern NSW and WA.W_Hills98.HighN.W_Hills98_KarooTri_HighN.W_Hills98_Base_KarooTri_HighN
      Folder Winnathoola_98_monty
        Simulation Winnathoola_98_monty
          Summary summaryfile
          Zone paddock: Area=1; Slope=0; AspectAngle=0; Altitude=50
            Operations
              1998-05-15  [Canola].Sow(population:40, rowSpacing:200, depth:20, cultivar:"monty");
              1998-05-15  [Fertiliser].Apply(amount: 60, type: "NH4NO3N", depth: 50);
            SurfaceOrganicMatter: InitialResidueName=wheat_stubble; InitialResidueType=wheat; InitialResidueMass=1000; InitialStandingFraction=0; InitialCPR=0; InitialCNR=80
            Plant Canola
            MicroClimate: a_interception=0; b_interception=1; c_interception=0; d_interception=0; SoilHeatFluxFraction=0.4; MinimumHeightDiffForNewLayer=0; NightInterceptionFraction=0.5; ReferenceHeight=2
            Fertiliser
            Manager Harvesting: same as Incomplete.Northern NSW and WA.Crocantigh_98_monty.Crocantigh_98_monty.paddock.Harvesting
            Soil: Latitude=0; Longitude=0
              Physical: same as Incomplete.Northern NSW and WA.Crocantigh_98_monty.Crocantigh_98_monty.paddock.soil.Physical
              WaterBalance SoilWater: same as Incomplete.Northern NSW and WA.Crocantigh_98_monty.Crocantigh_98_monty.paddock.soil.SoilWater
              Organic: same as Incomplete.Northern NSW and WA.Crocantigh_98_monty.Crocantigh_98_monty.paddock.soil.Organic
              Chemical: Thickness=[100, 100, 200, 200, 100]; PH=[8.9, 8.9, 9, 9, 9]; PHUnits=Water
              Water: Thickness=[100, 100, 200, 200, 100]; InitialValues=[0.4, 0.41, 0.42, 0.42, 0.4]; FilledFromTop=false
              Nutrient
              Solute NO3: Thickness=[100, 100, 200, 200, 100]; InitialValues=[28, 15, 10, 1, 1]; InitialValuesUnits=ppm; WaterTableConcentration=0; D0=0; DepthConstant=0; MaxDepthSoluteAccessible=0; RunoffEffectivenessAtMovingSolute=0; MaxEffectiveRunoff=0
              Solute NH4: same as Incomplete.Northern NSW and WA.Crocantigh_98_monty.Crocantigh_98_monty.paddock.soil.NH4
              Solute Urea: same as Incomplete.Northern NSW and WA.Crocantigh_98_monty.Crocantigh_98_monty.paddock.soil.Urea
              SoilTemperature Temperature
            Report SowingReport: EventNames=[Canola].Sowing
              VariableNames:
                [Clock].Today
                [Canola].SowingData.Cultivar
                [IWeather].Latitude
                [IWeather].Longitude
          SoilArbitrator
          Report HarvestReport: same as Incomplete.Northern NSW and WA.Crocantigh_98_monty.Crocantigh_98_monty.HarvestReport
          Report DailyReport: same as Incomplete.Northern NSW and WA.Crocantigh_98_monty.Crocantigh_98_monty.DailyReport
          Clock: Start=1998-05-01; End=1998-12-26
          Weather: FileName=met/wallum978.met
    Folder DP Agronomy
      Memo MemoGreenethorpe
        IANDRA DUAL-PURPOSE CROP RESULTS

        2013
        NITROGEN: Mineral N to 2m: 19/2=90 kg/ha; 7/5=205 kg/ha
        		50 (spring crops)/100 (winter crops) kg N/ha top-dressed post-mowing
        PADDOCK HISTORY:	Lucerne, Removed September 2012
        PREPARATION:		Knock-down, Disk Harrow, Direct drill

        2014
        SOIL:				Deep Red Gradational Clay Loam
        				Surface 0-10 [pH=5.3; OC=0.8%; P=86 Colwell]
        MINERAL N to 1.6m:	18 March = 140 kg N/ha; 5 June = 15 kg N/ha (Hyola 971CL), 45 kg N/ha (Wedgetail), 75 kg N/ha (Hyola 575CL sown 1 Apr), 250 kgN/ha (early May sowing)
        PADDOCK HISTORY:	Lucerne, Removed September 2012
        				Canola/wheat removed September 2013
        PREPARATION:		Knock-down, Disk Harrow, Direct drill
      Experiment WaggaCR2008
        Memo
          McCormick et al 2012. irrigated experiment,3 cultivars, 3 densities, grazed and ungrazed
        Factors
          Permutation
            Factor Cv: Specification=[SowingRule].Script.CultivarName=AV_Garnet,ATR_Marlin,46Y78
            Memo Memo1
              [SowingRule].Script.CultivarName=AV_Garnet,ATR_Marlin,46Y78

              Next Gen needs parameters for all 3 - possibly not correct, but placeholders there
        Simulation WaggaWagga2008CR
          Clock: Start=2007-12-12; End=2008-12-31
          Summary summaryfile
          Weather: FileName=met/wagga_-35.05_147.30.met
          SoilArbitrator
          MicroClimate: a_interception=0; b_interception=1; c_interception=0; d_interception=0; SoilHeatFluxFraction=0.4; MinimumHeightDiffForNewLayer=0; NightInterceptionFraction=0.5; ReferenceHeight=2
          Zone Paddock: Area=1; Slope=0; AspectAngle=0; Altitude=50
            Irrigation
            Fertiliser
            SurfaceOrganicMatter: InitialResidueName=wheat_stubble; InitialResidueType=wheat; InitialResidueMass=1000; InitialStandingFraction=0; InitialCPR=0; InitialCNR=80
            Plant Canola
            Manager: same as Incomplete.Northern NSW and WA.Gatton2000_monty_s1_s2.Gatton2000Base.Paddock.manager
            Manager Harvesting
              script: same as in Validation.Phenology Experiments.OCP Phenology.Gatton2015.Gatton2015Base.Paddock.Harvesting
            Manager SowingRule
              CultivarName = AV_Garnet
              SowDate = 8-May
              SowingDepth = 40
              RowSpacing = 180
              Population = 45
              script: same as in Validation.Phenology Experiments.OCP Phenology.Gatton2015.Gatton2015Base.Paddock.SowingRule
            Manager Fertilise at sowing
              Crop = [Canola]
              FertiliserType = NH4N
              Amount = 31
              script: same as in Validation.Growth Experiments.Wagga.Wagga2008.WaggaWagga2008.Paddock.Fertilise at sowing
            Soil: SoilType=sand; Site=CSU; NearestTown=Wagga Wagga; Region=Southern NSW; State=NSW; Latitude=0; Longitude=0; YearOfSampling=0; DataSource=Kirsten Verburg; Comments=Greenethorpe
              Chemical: same as Incomplete.Southern NSW.Ginnindera_96.paddock.soil.Chemical
              Water: FilledFromTop=false
                Thickness=[100, 100, 100, 100, 100, 100, 100, 100, 100, 100, 100, 100, 100, 100, 100, 100, 100, 100, 100, 100]
                InitialValues=[0.127, 0.135, 0.151, 0.172, 0.19, 0.19, 0.219, 0.219, 0.247, 0.247, 0.265, 0.265, 0.275, 0.275, 0.285, 0.285, 0.285, 0.285, 0.285, 0.285]
              Physical
                Thickness  BD    AirDry  LL15  DUL   SAT
                100        1.48  0.03    0.11  0.28  0.34
                100        1.49  0.12    0.12  0.27  0.34
                100        1.41  0.14    0.14  0.25  0.32
                100        1.37  0.16    0.16  0.28  0.35
                100        1.41  0.18    0.18  0.28  0.35
                100        1.41  0.18    0.18  0.28  0.35
                100        1.52  0.21    0.21  0.3   0.34
                100        1.52  0.21    0.21  0.3   0.34
                100        1.62  0.24    0.24  0.31  0.33
                100        1.62  0.24    0.24  0.31  0.33
                100        1.66  0.26    0.26  0.31  0.34
                100        1.66  0.26    0.26  0.31  0.34
                100        1.62  0.27    0.27  0.32  0.34
                100        1.62  0.27    0.27  0.32  0.34
                100        1.62  0.28    0.28  0.33  0.36
                100        1.62  0.28    0.28  0.33  0.36
                100        1.62  0.28    0.28  0.33  0.36
                100        1.62  0.28    0.28  0.33  0.36
                100        1.62  0.28    0.28  0.33  0.36
                100        1.62  0.28    0.28  0.33  0.36
                SoilCrop CanolaSoil
                  LL=[0.11, 0.12, 0.14, 0.16, 0.18, 0.18, 0.21, 0.21, 0.24, 0.24, 0.26, 0.26, 0.27, 0.27, 0.28, 0.28, 0.28, 0.28, 0.28, 0.28]
                  KL=[0.08, 0.08, 0.06, 0.06, 0.05, 0.04, 0.04, 0.04, 0.04, 0.04, 0.04, 0.03, 0.03, 0.02, 0.02, 0.01, 0.01, 0.01, 0.01, 0.01]
                  XF=[1, 1, 1, 1, 1, 1, 1, 1, 1, 1, 1, 1, 1, 1, 1, 1, 0.8, 0.4, 0, 0]
              WaterBalance SoilWater: SummerDate=1-nov; SummerU=6; SummerCona=3.5; WinterDate=1-apr; WinterU=2; WinterCona=2; DiffusConst=44; DiffusSlope=16; Salb=0.13; CN2Bare=72; CNRed=20; CNCov=0.8; DischargeWidth=5; CatchmentArea=10; PSIDul=-100
                Thickness=[100, 100, 100, 100, 100, 100, 100, 100, 100, 100, 100, 100, 100, 100, 100, 100, 100, 100, 100, 100]
                SWCON=[0.8, 0.8, 0.8, 0.8, 0.8, 0.8, 0.8, 0.8, 0.8, 0.8, 0.8, 0.8, 0.8, 0.8, 0.8, 0.8, 0.6, 0.6, 0.6, 0.6]
              Organic: FOMCNRatio=60; CarbonUnits=Total
                Thickness  Carbon  SoilCNRatio  FBiom  FInert  FOM
                100        0.83    8            0.06   0.01    439.771
                100        0.35    8            0.05   0.01    378.5144
                100        0.33    8            0.04   0.31    325.7904
                100        0.22    8            0.03   0.35    280.4104
                100        0.22    8            0.02   0.4     241.3514
                100        0.22    8            0.01   0.45    207.7331
                100        0.19    8            0.01   0.5     178.7975
                100        0.17    8            0.01   0.6     153.8925
                100        0.15    8            0.01   0.7     132.4565
                100        0.12    8            0.01   0.8     114.0063
                100        0.11    8            0.01   0.9     98.1262
                100        0.1     8            0.01   0.99    84.458
                100        0.1     8            0.01   0.99    72.6937
                100        0.1     8            0.01   0.99    62.568
                100        0.1     8            0.01   0.99    53.8528
                100        0.1     8            0.01   0.99    46.3515
                100        0.08    8            0.01   0.99    39.8951
                100        0.06    8            0.01   0.99    34.3381
                100        0.05    8            0.01   0.99    29.555
                100        0.04    8            0.01   0.99    25.4383
              Nutrient
              Solute NO3: same as Validation.Growth Experiments.Wagga.Wagga2008.WaggaWagga2008.Paddock.Soil.NO3
              Solute NH4: same as Validation.Growth Experiments.Wagga.Wagga2008.WaggaWagga2008.Paddock.Soil.NH4
              Solute Urea: same as Validation.Growth Experiments.Wagga.Wagga2008.WaggaWagga2008.Paddock.Soil.Urea
              SoilTemperature Temperature
            Report DailyReport
            Report HarvestReport
            Report DailyBiomass: EventNames=[Clock].DoReport
              VariableNames:
                [Clock].Today
                [canola].AboveGround.Wt
                [Canola].AboveGroundLive.Wt
                [canola].Population
                [canola].AboveGround.NConc
                [canola].Grain.Wt
                [canola].Grain.Size
                [canola].Grain.Total.Wt
                [canola].Grain.N
                [canola].Grain.NConc
                [canola].Grain.Number
                [Canola].LAI
                [canola].Stem.Live.Wt
                [canola].Leaf.Live.Wt
                [canola].Stem.Wt
                [canola].Leaf.Wt
                [canola].Phenology.CurrentStageName
                [canola].Phenology.Stage
            Report SowingReport: EventNames=[Canola].Sowing
              VariableNames:
                [Clock].Today
                [Canola].SowingData.Cultivar
                [IWeather].Latitude
                [IWeather].Longitude
            Manager HarvestAfterDate
              HarvestDate = 24-Oct-2008
              script: same as in Validation.Growth Experiments.Wagga.Wagga2008.WaggaWagga2008.Paddock.HarvestAfterDate
    Folder OCP Agronomy
      Memo
        GRDC funded CSP00187: Optimised Canola Profitability project investigated tactical agronomic decisions and the physiology of yield and oil formation in canola and how they are affected by variety,

        enviroment and management (G x E x M).

        The project conducted > 50 experiments between 2014 and 2018 at 18 locations in south-eastern Australian canola growing regions (NSW, Vic, SA). Experiments investigated cultivar interactions with TOS_index, Plant density, water supply, N rate and timing of application.

        Contact: Julianne Lilley, John Kirkegaard (CSIRO)
      Folder AlmaPark_2015_Ex2a
        Experiment AlmaPark_2015_Ex2a
          Factors
            Permutation
              Factor TOS_index
                CompositeFactor 1: Specifications=[Sowing].Script.SowDate = 06-Apr
                CompositeFactor 2: Specifications=[Sowing].Script.SowDate = 21-Apr
              Factor CV: Specification=[Sowing].Script.CultivarName = 45Y88_CL,Hyola575_CL
              Factor Popn: Specification=[Sowing].Script.Population = 45
              Factor Fert: Specification=[codes].Script.fert_treat = nil
              Factor Irrig: Specification=[codes].Script.irrig_treat = nil
          Simulation AlmaPark2015_Ex2a_base
            Clock: Start=2015-03-01; End=2015-12-31
            Summary summaryfile
            Weather: FileName=met/74053_CombGSE.met
            SoilArbitrator
            Zone paddock: Area=1; Slope=0; AspectAngle=0; Altitude=50
              Folder manager
                Manager Reset on date
                  ResetDate = 05-Apr
                  ResetWater = Yes
                  ResetN = Yes
                  ResetSOM = No
```csharp
using Models.Interfaces;
using System;
using Models.Core;
using Models.PMF;
using Models.Soils;
using Models.Soils.Nutrients;
using Models.Utilities;
using Models.Surface;
using APSIM.Shared.Utilities;

namespace Models
{
    [Serializable]
    public class Script : Model
    {
        [Link] private Clock Clock;
        [Link] private Plant Wheat;
        [Link] private ISoilWater SoilWater;
        [Link] private INutrient nutrient;
        [Link] private SurfaceOrganicMatter SOM;
        [Link] private Summary summary;

        [Description("Date to reset on:")]
        public string ResetDate {get;set;}

        [Description("Reset Water?")]
        public string ResetWater {get;set;}

        [Description("Reset Nitrogen?")]
        public string ResetN {get;set;}

        [Description("Reset Surface Organic Matter?")]
        public string ResetSOM {get;set;}

        [EventSubscribe("DoManagement")]
        private void OnDoManagement(object sender, EventArgs e)
        {
            if (DateUtilities.WithinDates(ResetDate, Clock.Today, ResetDate))
            {
                if (ResetWater == "Yes")
                {
                    summary.WriteMessage(this, "Reset Water", MessageType.Diagnostic);
                    SoilWater.Reset();
                }
                if (ResetN == "Yes")
                {
                    summary.WriteMessage(this, "Reset Nitrogen", MessageType.Diagnostic);
                    nutrient.Reset();
                }
                if (ResetSOM == "Yes")
                {
                    summary.WriteMessage(this, "Reset Surface OM", MessageType.Diagnostic);
                    SOM.Reset();
                }
            }
        }
    }
}
```
                Manager Sowing
                  SowDate = 06-Apr
                  CultivarName = Hyola575_CL
                  SowingDepth = 20
                  RowSpacing = 250
                  Population = 45
                  script: same as in Validation.Growth Experiments.Kojonup.Kojonup2013.Kojonup2013Base.paddock.SowingRule
                Manager Fertilise on fixed dates
                  FertiliserType = UreaN
                  FertiliserDates = 06-apr
                  Amount = 108
                  AmountType = True
                  script: same as in Validation.Growth Experiments.Kojonup.Kojonup2013.Kojonup2013Base.paddock.Fertilise on fixed dates
                Manager codes
                  location = AlmaPark
                  TOS_index = 1
                  irrig_treat =
                  fert_treat = nil
                  trialcode =
```csharp
using Models.Soils;
using System;
using Models.Core;
using Models.PMF;
namespace Models
{
    [Serializable]
    [System.Xml.Serialization.XmlInclude(typeof(Model))]
    public class Script : Model
    {
        [Link] Clock Clock;

        [Description("location")]
        public string location { get; set; }

        [Description("Time of sowing")]
        public string TOS_index { get; set; }

        [Description("irrig_treat")]
        public string irrig_treat { get; set; }

        [Description("fert_treat")]
        public string fert_treat { get; set; }

        [Description("trial_code")]
        public string trialcode { get; set; }

        [EventSubscribe("StartOfSimulation")]
        private void OnSimulationCommencing(object sender, EventArgs e)
        {
          }
      

                                          /*
                location = '[location]' !'Condobolin'
irrig_treat = '[irrig_treat]' ! 'dry'
fert_treat = '[fert_treat]' ! 'nil'
trial_code = '[trial_code]' ! 'CSTB16COND2'
minn_tot = 0
TOS_index = [TOS_index] !'1'
exp = '2a'
            */
        }
    }
```
                Manager Canola Oil Conc Calculator
```csharp
using Models.Soils;
using System;
using Models.Climate;
using Models.Core;
using Models.PMF.Phen;
using Models.PMF;
namespace Models
{
    [Serializable]
    [System.Xml.Serialization.XmlInclude(typeof(Model))]
    public class Script : Model
    {
        [Link] Clock Clock;
        [Link] Weather wtr;
        [Link] private Plant canola;
        [Link(Type = LinkType.Path, Path = "[canola].Phenology")]
        private Phenology phenology;
        private int cum_days;
        private double cum_temp;
        private double cum_swdef;
        public double oil_conc { get; set; }


        [EventSubscribe("StartOfSimulation")]
        private void OnSimulationCommencing(object sender, EventArgs e)
        {
            cum_temp = 0;
            cum_swdef = 0;
            cum_days = 0;
            oil_conc = 0;
        }
        [EventSubscribe("DoManagement")]
        private void OnDoManagement(object sender, EventArgs e)
        {
            double avg_temp;
            double avg_swdef;
            
            if (canola.DaysAfterSowing == 1)
            {
                cum_temp = 0;
                cum_swdef = 0;
                cum_days = 0;
            }
            else if ((phenology.CurrentPhase.Name == "EarlyGrainFilling") ||
                (phenology.CurrentPhase.Name == "MidGrainFilling") ||
                (phenology.CurrentPhase.Name == "LateGrainFilling") ||
                (phenology.CurrentPhase.Name == "Maturing") ||
                (phenology.CurrentPhase.Name == "Ripening") ||
                (phenology.CurrentPhase.Name == "ReadyForHarvesting"))
            {
                cum_temp += (wtr.MaxT + wtr.MinT) / 2;
                //cum_swdef += swdef_photo;  // TODO: determine if swdef_photo can be found and used
                cum_days++;
            }
            else
            {
                cum_days = 0;
            }

             // calculate canola oil content
             if (cum_days > 0) 
             {
                avg_temp = cum_temp / cum_days;
                avg_swdef = cum_swdef / cum_days;
                if (avg_temp <= 14)
                       oil_conc =  47;
                else
                       oil_conc = (47 - ((avg_temp - 14)*1.21)) - (1.91*(1 - Math.Pow(avg_swdef,2)));
            }
             else
                oil_conc = 0;
             
        }
    }
}
```
                Manager CanolaFrostHeat
```csharp
using Models.Soils;
using System;
using Models.Core;
using Models.PMF;
namespace Models
{
    [Serializable]
    [System.Xml.Serialization.XmlInclude(typeof(Model))]
    public class Script : Model
    {
        [Link] Clock Clock;

        [EventSubscribe("StartOfSimulation")]
        private void OnSimulationCommencing(object sender, EventArgs e)
        {
            /*
                frost_multiplier=1
heat_multiplier=1
cum_frost_multiplier=1
cum_heat_multiplier=1
heat_exposure= 0
heat_stress_days = 0
mild_heat_stress_days = 0
mod_heat_stress_days = 0
sev_heat_stress_days = 0

frost_exposure = 0

mild_frost_days = 0
mod_frost_days = 0
sev_frost_days = 0
frost_days = 0

FrostHeatYield = 0
FrostHeatYieldWet = 0
FrostHeatGrain_Wt = 0

old_FrostHeatGrain = 0

canola_in = 0


! This work comes from:
!   Julianne M. Lilley, Lindsay W. Bell, and John A. Kirkegaard 
!     (2015) Optimising grain yield and grazing potential of crops across Australia’s 
!     high-rainfall zone: a simulation analysis. 2. Canola, 
!     Crop & Pasture Science, 66, 349-364


old_cum_frost_multiplier=1
old_cum_heat_multiplier=1
frost_multiplier_eq=1
heat_multiplier_eq=1
stage_factor_heat = 1
stage_factor_frost = 1
final_heat_multiplier = 1
final_frost_multiplier = 1

            */
        }
        [EventSubscribe("DoManagement")]
        private void OnDoManagement(object sender, EventArgs e)
        {
            /*
                !Rules for calculation of heat and frost risk
            
degree_days = (mint + maxt) / 2
if (canola.stage >= 6) then
   cum_degree_days = degree_days + cum_degree_days
else 
   cum_degree_days = 0
endif
            
if (cum_degree_days > 0 and cum_degree_days < 630 then ! 630 degree days approx 6 weeks @ 15 dd / day; approx flowering window
   heat_exposure = 1
else 
   heat_exposure = 0
endif
            

if (cum_degree_days > 140 and cum_degree_days < 800) then ! 140 degree days approx 2 weeks @ 10 dd / day, to 6weeks after that
                                                          ! approx water pod window
   frost_exposure = 1
else 
   frost_exposure = 0
endif
    
if (canola.stage > 0) then  ! reset  each day
   canola_in = 1
   frost_multiplier = 1  
   heat_multiplier = 1
   frost_multiplier_eq = 1  
   heat_multiplier_eq = 1
   stage_factor_heat = 1
   stage_factor_frost = 1
   final_heat_multiplier = 1
   final_frost_multiplier = 1
   frost_days = 0
   mild_frost_days = 0
   mod_frost_days = 0
   sev_frost_days = 0
   heat_stress_days = 0
   mild_heat_stress_days = 0
   mod_heat_stress_days = 0   
   sev_heat_stress_days = 0
else
   canola_in = 0
endif



if (heat_exposure = 1 AND maxt >= 30) then
 heat_multiplier_eq = -0.075*maxt + 3.25 ! heat_multiplier_eq = -0.0582*maxt + 2.7465
      if heat_multiplier_eq > 1 then
         heat_multiplier_eq = 1
      endif
      if heat_multiplier_eq < 0.65 then
         heat_multiplier_eq = 0.65
      endif

         !!!!!!!!!!!!!!!!!!!!!!!! new section - heat !!!!!!!!!!!!!!!!!!!!!!!!!!
   if cum_degree_days<=300 then
      stage_factor_heat = cum_degree_days * 1.5/300  ! stage_factor_heat = cum_degree_days /300
   else
      stage_factor_heat = 3 - cum_degree_days * 1.5/ 300  ! stage_factor_heat = 2 - cum_degree_days /300
   endif

   if stage_factor_heat >1 then
       stage_factor_heat = 1
   endif
   if stage_factor_heat <0 then
       stage_factor_heat = 0
   endif

   final_heat_multiplier = 1-((1-heat_multiplier_eq )*stage_factor_heat )
         !!!!!!!!!!!!!!!!!!!!!!!! new section finish !!!!!!!!!!!!!!!!!!!!!!!!!!
endif

if (frost_exposure = 1 AND mint <= 2 ) then  ! constrain to below 0, limit damage below -4 (where it = 0.9)
     frost_multiplier_eq = 0.025*mint + 1
   
     if frost_multiplier_eq >1 then
         frost_multiplier_eq = 1
     endif
     if frost_multiplier_eq <0.9 then
        frost_multiplier_eq = 0.9
     endif
         !!!!!!!!!!!!!!!!!!!!!!!! new section - frost !!!!!!!!!!!!!!!!!!!!!!!!!!
     if cum_degree_days<=440 then
        stage_factor_frost = (cum_degree_days - 140) *1.5/300       stage_factor_frost = (cum_degree_days - 140) /300
     else
        stage_factor_frost = 3 - (cum_degree_days - 140) *1.5/300  !     stage_factor_frost = 2 - (cum_degree_days - 140) /300
     endif

     if stage_factor_frost >1 then
        stage_factor_frost = 1
     endif
     if stage_factor_frost <0 then
        stage_factor_frost = 0
     endif

     final_frost_multiplier = 1-((1-frost_multiplier_eq )*stage_factor_frost )
         !!!!!!!!!!!!!!!!!!!!!!!! new section finish !!!!!!!!!!!!!!!!!!!!!!!!!!
endif

!!!!!!!!!!!!!! origingal Frost/heat !!!!!!!!!!!!!!!!!!!!!!!!!!!!!!!!!!!!!!!!!!!!!!!!!!!!!!!!!
                   
if (heat_exposure = 1 and maxt >= 30) then 
   heat_stress = 1
else
   heat_stress = 0
endif
                       
if (frost_exposure = 1 and mint <= 2) then
   light_frost_stress = 1
else 
   light_frost_stress = 0
endif
                        
if (frost_exposure = 1 and mint <= 0) then
   heavy_frost_stress = 1
else 
   heavy_frost_stress = 0
endif
            

if (heat_exposure = 1 AND maxt >= 30 AND maxt < 33) then
   heat_multiplier = 0.9
   mild_heat_stress_days = 1 
endif

if (heat_exposure = 1 AND maxt >= 33 AND maxt < 36) then
   heat_multiplier = 0.82
   mod_heat_stress_days = 1   
endif

if (heat_exposure = 1 AND maxt >= 36) then 
   heat_multiplier = 0.65
   sev_heat_stress_days = 1
endif


if (frost_exposure = 1 AND mint <= 2 AND mint > 0) then
    frost_multiplier = 1.0
    mild_frost_days = 1
endif

if (frost_exposure = 1 AND mint <= 0 AND mint > -2) then
    frost_multiplier = 0.98
    mod_frost_days = 1
endif

if (frost_exposure = 1 AND mint <= -2) then
    frost_multiplier = 0.90
    sev_frost_days = 1
endif

frost_days = mild_frost_days + mod_frost_days + sev_frost_days
heat_stress_days =  mild_heat_stress_days + mod_heat_stress_days + sev_heat_stress_days 

!!!!!!!!!!!!!!!!!!!!!!!!!!!!!!!!!!!!!!!!!!!!!!!!!!!!!!!!!!!!!!!!!!!!!!!!!!!!!!!!!!!!!!!!!!!!!!!!!!!!!!!!!!!!!

if (canola.stagename = 'sowing') then
   cum_heat_stress = 0
   cum_light_frost_stress = 0
   cum_heavy_frost_stress = 0
   cum_frost_multiplier=1
   old_cum_heat_multiplier=1
   old_cum_frost_multiplier=1
   cum_heat_multiplier=1
   FrostHeatYield = 0
   FrostHeatYieldWet = 0
   FrostHeatGrain_wt = 0
endif
          
if (cum_degree_days > 0 and cum_degree_days < 800) then  ! no longer just 630
    cum_heat_stress=cum_heat_stress + heat_stress
    cum_light_frost_stress=cum_light_frost_stress + light_frost_stress
    cum_heavy_frost_stress=cum_heavy_frost_stress + heavy_frost_stress
    cum_frost_multiplier=cum_frost_multiplier * final_FROST_multiplier  ! new equation running using critical period factor
    cum_heat_multiplier=cum_heat_multiplier * final_HEAT_multiplier     ! new equation running using critical period factor
  ! cum_frost_multiplier=cum_frost_multiplier * frost_multiplier_eq  ! new equation running 
  ! cum_heat_multiplier=cum_heat_multiplier * heat_multiplier_eq     ! new equation running
    old_cum_frost_multiplier=old_cum_frost_multiplier * frost_multiplier  ! new equation running
    old_cum_heat_multiplier=old_cum_heat_multiplier * heat_multiplier     ! new equation running
endif
  
if (canola.yield > 0) then
   old_FrostHeatGrain_wt=canola.Grain_wt*old_cum_frost_multiplier*old_cum_heat_multiplier
   FrostHeatGrain_wt=canola.Grain_wt*cum_frost_multiplier*cum_heat_multiplier
   FrostHeatYield=canola.Yield*cum_frost_multiplier*cum_heat_multiplier
   FrostHeatYieldWet=canola.Yieldwet*cum_frost_multiplier*cum_heat_multiplier
   HIfh = FrostheatGrain_wt /  canola.biomass_wt
   HI = canola.grain_wt / canola.biomass_wt
endif
            */
        }
    }
}
```
                Manager HarvestAfterDate
                  HarvestDate = 30-Oct
                  script: same as in Validation.Growth Experiments.Kojonup.Kojonup2013.Kojonup2013Base.paddock.HarvestAfterDate
              Plant canola: ResourceName=Canola
              Soil: SoilType=SNSW; Site=CSU; NearestTown=Wagga Wagga; Region=Southern NSW; State=NSW; Latitude=0; Longitude=0; DataSource=Kirsten Verburg
                Chemical: PHUnits=Water
                  Thickness=[100, 100, 100, 100, 100, 100, 100, 100, 100, 100, 100, 100, 100, 100, 100, 100, 100, 100, 100, 100]
                  PH=[4.6, 4.7, 4.7, 6.2811, 6.4622, 6.5527, 6.6433, 6.7338, 6.8244, 6.8244, 7.0054, 7.1865, 7.3676, 7.5487, 7.6392, 7.7297, 7.7297, 7.8203, 7.8203, 7.8203]
                Physical
                  Thickness  BD    AirDry  LL15  DUL   SAT
                  100        1.48  0.03    0.11  0.28  0.34
                  100        1.49  0.1     0.12  0.27  0.34
                  100        1.41  0.13    0.14  0.25  0.32
                  100        1.37  0.13    0.16  0.28  0.35
                  100        1.41  0.13    0.18  0.28  0.35
                  100        1.41  0.13    0.18  0.28  0.35
                  100        1.52  0.13    0.21  0.3   0.34
                  100        1.52  0.13    0.21  0.3   0.34
                  100        1.62  0.13    0.24  0.31  0.33
                  100        1.62  0.13    0.24  0.31  0.33
                  100        1.66  0.13    0.26  0.31  0.34
                  100        1.66  0.13    0.26  0.31  0.34
                  100        1.62  0.13    0.27  0.32  0.34
                  100        1.62  0.13    0.27  0.32  0.34
                  100        1.62  0.13    0.28  0.33  0.36
                  100        1.62  0.13    0.28  0.33  0.36
                  100        1.62  0.13    0.28  0.33  0.36
                  100        1.62  0.13    0.28  0.33  0.36
                  100        1.62  0.13    0.28  0.33  0.36
                  100        1.62  0.13    0.28  0.33  0.36
                  SoilCrop WheatSoil: same as Incomplete.DP Agronomy.WaggaCR2008.WaggaWagga2008CR.Paddock.Soil.Physical.CanolaSoil
                  SoilCrop CanolaSoil: same as Incomplete.DP Agronomy.WaggaCR2008.WaggaWagga2008CR.Paddock.Soil.Physical.CanolaSoil
                WaterBalance SoilWater: SummerDate=1-nov; SummerU=6; SummerCona=2; WinterDate=1-apr; WinterU=2; WinterCona=2; DiffusConst=44; DiffusSlope=16; Salb=0.13; CN2Bare=72; CNRed=20; CNCov=0.8; PSIDul=-100
                  Thickness=[100, 100, 100, 100, 100, 100, 100, 100, 100, 100, 100, 100, 100, 100, 100, 100, 100, 100, 100, 100]
                  SWCON=[0.5, 0.5, 0.5, 0.89, 0.8, 0.8, 0.6, 0.6, 0.4, 0.4, 0.2, 0.2, 0.2, 0.2, 0.2, 0.2, 0.2, 0.2, 0.2, 0.2]
                Nutrient
                Organic: FOMCNRatio=80; CarbonUnits=Total
                  Thickness  Carbon  SoilCNRatio  FBiom  FInert  FOM
                  100        1.17    8            0.06   0.01    293.1807
                  100        0.3     8            0.05   0.01    252.3429
                  100        0.3     8            0.04   0.31    217.1936
                  100        0.22    8            0.03   0.35    186.9402
                  100        0.22    8            0.02   0.4     160.901
                  100        0.22    8            0.01   0.45    138.4887
                  100        0.19    8            0.01   0.5     119.1984
                  100        0.17    8            0.01   0.6     102.595
                  100        0.15    8            0.01   0.7     88.3043
                  100        0.12    8            0.01   0.8     76.0042
                  100        0.11    8            0.01   0.9     65.4174
                  100        0.1     8            0.01   0.99    56.3053
                  100        0.1     8            0.01   0.99    48.4624
                  100        0.1     8            0.01   0.99    41.712
                  100        0.1     8            0.01   0.99    35.9019
                  100        0.1     8            0.01   0.99    30.901
                  100        0.08    8            0.01   0.99    26.5967
                  100        0.06    8            0.01   0.99    22.892
                  100        0.05    8            0.01   0.99    19.7034
                  100        0.04    8            0.01   0.99    16.9588
                Water: Thickness=[100, 200, 300, 300, 300, 300, 300, 200]; InitialValues=[0.268, 0.189, 0.195, 0.223, 0.26, 0.28, 0.28, 0.28]; FilledFromTop=false
                Solute NO3: InitialValuesUnits=ppm; WaterTableConcentration=0; D0=0; DepthConstant=0; MaxDepthSoluteAccessible=0; RunoffEffectivenessAtMovingSolute=0; MaxEffectiveRunoff=0
                  Thickness=[100, 100, 100, 100, 100, 100, 100, 100, 100, 100, 100, 100, 100, 100, 100, 100, 100, 100, 100, 100]
                  InitialValues=[31, 7, 7, 0, 0, 0, 0, 0, 0, 0, 0, 0, 0, 0, 0, 0, 0, 0, 0, 0]
                Solute NH4: InitialValuesUnits=ppm; WaterTableConcentration=0; D0=0; DepthConstant=0; MaxDepthSoluteAccessible=0; RunoffEffectivenessAtMovingSolute=0; MaxEffectiveRunoff=0
                  Thickness=[100, 100, 100, 100, 100, 100, 100, 100, 100, 100, 100, 100, 100, 100, 100, 100, 100, 100, 100, 100]
                  InitialValues=[5, 2, 2, 0, 0, 0, 0, 0, 0, 0, 0, 0, 0, 0, 0, 0, 0, 0, 0, 0]
                Solute Urea: same as Validation.Growth Experiments.Wagga.Wagga2008.WaggaWagga2008.Paddock.Soil.Urea
                SoilTemperature Temperature
              MicroClimate: a_interception=0; b_interception=0; c_interception=0; d_interception=0; SoilHeatFluxFraction=0; MinimumHeightDiffForNewLayer=0; NightInterceptionFraction=0; ReferenceHeight=2
              SurfaceOrganicMatter SurfaceOM: InitialResidueName=wheat; InitialResidueType=wheat; InitialResidueMass=6000; InitialStandingFraction=0; InitialCPR=0; InitialCNR=80
              Fertiliser
              Manager Fertilise at sowing
                Crop = [canola]
                FertiliserType = NH4N
                Amount = 11
                script: same as in Validation.Growth Experiments.Kojonup.Kojonup2013.Kojonup2013Base.paddock.Fertilise at sowing
              Report DailyReport: EventNames=[Clock].DoReport
                VariableNames:
                  [Clock].Today
                  [Canola].SowingData.Cultivar
                  [Canola].Phenology.CurrentStageName
                  [Weather].MeanT
                  [Soil].Water.Volumetric
                  [Soil].Water.MM
                  sum([Soil].Water.MM) as ProfileWater
                  [Canola].AboveGround.N
                  [Canola].AboveGround.Wt
                  [Canola].AboveGroundLive.N
                  [Canola].AboveGroundLive.N*10 as UptakeNKgHA
                  [Canola].AboveGroundLive.Wt
                  [Canola].Arbitrator.DM.TotalFixationSupply
                  [Canola].Grain.N
                  [Canola].Grain.NConc
                  [Canola].Grain.Number
                  [Canola].Grain.Size
                  [Canola].Grain.Wt
                  [Canola].Grain.Live.Wt
                  [Canola].Leaf.AppearedCohortNo
                  [Canola].Leaf.CoverDead
                  [Canola].Leaf.CoverGreen
                  [Canola].Leaf.CoverTotal
                  [Canola].Leaf.Dead.N
                  [Canola].Leaf.Dead.NConc
                  [Canola].Leaf.Dead.Wt
                  [Canola].Leaf.DeadCohortNo
                  [Canola].Leaf.GreenCohortNo
                  [Canola].Leaf.SenescingCohortNo
                  [Canola].Leaf.ExpandedCohortNo
                  [Canola].Leaf.Fn
                  [Canola].Leaf.Fw
                  [Canola].Leaf.Height
                  [Canola].Leaf.InitialisedCohortNo
                  [Canola].Leaf.LAI
                  [Canola].Leaf.Live.N
                  [Canola].Leaf.Live.NConc
                  [Canola].Leaf.Live.Wt
                  [Canola].Leaf.SpecificArea
                  [Canola].Leaf.Transpiration
                  [Canola].Phenology.CurrentPhase.Name
                  [Canola].Phenology.CurrentStageName
                  [Canola].Phenology.Photoperiod
                  [Canola].Phenology.Stage
                  [Canola].Phenology.ThermalTime
                  [Canola].Phenology.ThermalTime
                  [Canola].Root.Depth
                  [Canola].Root.N
                  [Canola].Root.Wt
                  [Canola].Root.NConc
                  [Canola].Root.WaterUptake
                  [Canola].Stem.N
                  [Canola].Stem.NConc
                  [Canola].Stem.Wt
                  [Canola].Stem.Live.StorageWt
                  [Canola].SowingData.Cultivar
                  [Canola].Structure.Height
                  [Canola].Structure.LeafTipsAppeared
                  [Canola].Structure.MainStemPopn
                  [Canola].Structure.TotalStemPopn
                  [SurfaceOrganicMatter].Wt
                  sum([Soil].NO3.kgha) as TotalSoilNitrogen
                  [Canola].Phenology.MaturityDAS
                  [Canola].Phenology.PhotoPeriod
                  [Canola].Phenology.Stage
                  [Clock].Today.Year
              Report HarvestReport: EventNames=[canola].Harvesting
                VariableNames:
                  [Clock].Today
                  [canola].SowingDate
                  [canola].SowingData.Cultivar
                  [canola].Phenology.CurrentStageName
                  [canola].Phenology.EmergenceDAS
                  [canola].Phenology.FloralInitiationDAS
                  [canola].Phenology.GreenBudDAS
                  [canola].Phenology.StartFloweringDAS
                  [canola].Phenology.CumulativeVernalTime
                  [canola].Grain.Wt
              Report DailyBiomass: EventNames=[Clock].DoReport
              Report SowingReport: EventNames=[Canola].Sowing
                VariableNames:
                  [Clock].Today
                  [Canola].SowingData.Cultivar
                  [IWeather].Latitude
                  [IWeather].Longitude
      Folder Breeza_2014_Ex1
        Experiment Breeza_2014_Ex1
          Factors
            Permutation
              Factor TOS_index
                CompositeFactor 1: Specifications=[Sowing].Script.SowDate = 10-Apr
                CompositeFactor 2: Specifications=[Sowing].Script.SowDate = 23-Apr
                CompositeFactor 3: Specifications=[Sowing].Script.SowDate = 8-May
                CompositeFactor 4: Specifications=[Sowing].Script.SowDate = 26-May
              Factor CV
                Specification=[Sowing].Script.CultivarName = 43C80_CL,44Y84_CL,44Y87_CL,45Y88_CL,Hyola575_CL,Hyola971_CL
              Factor Popn: Specification=[Sowing].Script.Population = 15, 45
              Factor Fert: Specification=[codes].Script.fert_treat = nil
              Factor Irrig: Specification=[codes].Script.irrig_treat = nil
          Simulation Breeza_2014_Ex1_Base
            Clock: Start=2014-03-01; End=2014-12-01
            Summary summaryfile
            Weather: FileName=met/55008_CombGSE.met
            SoilArbitrator
            Zone paddock: Area=1; Slope=0; AspectAngle=0; Altitude=50
              Folder manager
                Manager Sowing
                  SowDate = 25-Apr
                  CultivarName = Hyola575_CL
                  SowingDepth = 20
                  RowSpacing = 330
                  Population = 100
```csharp
using APSIM.Shared.Utilities;
using Models.Utilities;
using Models.Soils;
using Models.PMF;
using Models.Core;
using System;

namespace Models
{
    [Serializable]
    public class Script : Model
    {
        [Link] Clock Clock;
        [Link] Fertiliser Fertiliser;
        [Link] Summary Summary;
        [Link] Plant Canola;
        [Link] Soil Soil;
        Accumulator accumulatedRain;
        
        [Description("Sowing date (d-mmm)")]
        public string SowDate { get; set; }
        [Description("Cultivar to be sown")]
        public string CultivarName { get; set; }
        [Description("Sowing depth (mm)")]
        public double SowingDepth { get; set; }
        [Description("Row spacing (mm)")]
        public double RowSpacing { get; set; }
        [Description("Plant population (/m2)")]
        public double Population { get; set; }
        
        


        [EventSubscribe("DoManagement")]
        private void OnDoManagement(object sender, EventArgs e)
        {
        
            
            if (DateUtilities.WithinDates(SowDate, Clock.Today, SowDate))
            {
                Canola.Sow(population: Population, cultivar: CultivarName, depth: SowingDepth, rowSpacing: RowSpacing);    
            }
        
        }
        
    }
}
```
                Manager Reset on date
                  ResetDate = 04-Apr
                  ResetWater = Yes
                  ResetN = Yes
                  ResetSOM = No
```csharp
using Models.Interfaces;
using System;
using Models.Core;
using Models.PMF;
using Models.Soils;
using Models.Soils.Nutrients;
using Models.Utilities;
using Models.Surface;
using APSIM.Shared.Utilities;

namespace Models
{
    [Serializable]
    public class Script : Model
    {
        [Link] private Clock Clock;
        [Link] private Plant Wheat;
        [Link] private ISoilWater SoilWater;
        [Link] private INutrient nutrient;
        [Link] private SurfaceOrganicMatter SOM;
        [Link] private Summary Summary;

        [Description("Date to reset on:")]
        public string ResetDate {get;set;}

        [Description("Reset Water?")]
        public string ResetWater {get;set;}

        [Description("Reset Nitrogen?")]
        public string ResetN {get;set;}

        [Description("Reset Surface Organic Matter?")]
        public string ResetSOM {get;set;}

        [EventSubscribe("DoManagement")]
        private void OnDoManagement(object sender, EventArgs e)
        {
            if (DateUtilities.WithinDates(ResetDate, Clock.Today, ResetDate))
            {
                if (ResetWater == "Yes")
                {
                    Summary.WriteMessage(this, "Reset Water", MessageType.Diagnostic);
                    SoilWater.Reset();
                }
                if (ResetN == "Yes")
                {
                    Summary.WriteMessage(this, "Reset Nitrogen", MessageType.Diagnostic);
                    nutrient.Reset();
                }
                if (ResetSOM == "Yes")
                {
                    Summary.WriteMessage(this, "Reset Surface OM", MessageType.Diagnostic);
                    SOM.Reset();
                }
            }
        }
    }
}
```
                Manager Irrigate on fixed dates
                  IrrigateDates = 24-Sep
                  Amount = 100
                  Depth = 0
                  Efficiency = 1
                  WillRunoff = False
```csharp
using Models.Soils;
using System;
using Models.Core;
using Models.PMF;
using APSIM.Shared.Utilities;
namespace Models
{
    [Serializable]
    public class Script : Model
    {
        [Link] Clock Clock;
        [Link] Irrigation Irrigation;
        
        [Separator("A component to apply irrigation on one or more dates on every year of the simulation")]

        [Description("Enter the irrigation dates as dd-mmm with comma separation (any year information entered will be ignored)")] public string[] IrrigateDates { get; set; }
        
        [Description("Amount of irrigation to be applied (mm)")] public double Amount { get; set; }
        
        [Description("Depth in the soil to apply the  irrigation (mm)")] public double Depth { get; set; }
        
        [Description("Efficiency of irrigation (0-1)")] public double Efficiency { get; set; }
        
        [Description("Will the irrigation runoff?")] public bool WillRunoff { get; set; }
        
        [EventSubscribe("DoManagement")]
        private void OnDoManagement(object sender, EventArgs e)
        {
            foreach (string ddMMM in IrrigateDates)
            {
                if (DateUtilities.DatesEqual(ddMMM, Clock.Today))
                    Irrigation.Apply(amount: Amount, depth: Depth, efficiency: Efficiency, willRunoff: WillRunoff);
            }
        }
    }
}
```
                Manager codes
                  location = Breeza
                  TOS_index = 1
                  irrig_treat =
                  fert_treat = nil
                  trialcode =
                  script: same as in Incomplete.OCP Agronomy.AlmaPark_2015_Ex2a.AlmaPark_2015_Ex2a.AlmaPark2015_Ex2a_base.paddock.manager.codes
                Manager HarvestAfterDate
                  HarvestDate = 28-Oct
                  script: same as in Validation.Growth Experiments.Kojonup.Kojonup2013.Kojonup2013Base.paddock.HarvestAfterDate
              Plant canola: ResourceName=Canola
              Soil Grey-Black Vertosol (Breeza No123): ASCOrder=Vertosol; ASCSubOrder=Black; SoilType=SNSW; Site=Breeza; NearestTown=Breeza, NSW 2381; Region=North West Slopes and Plains; State=New South Wales; Country=Australia; NaturalVegetation=Grasslands; ApsoilNumber=123; Latitude=-31.304; Longitude=150.473; LocationAccuracy=+/- 20m; DataSource=CSIRO Plant Industry, Myall Vale (D Richards)
                Physical
                  Thickness  BD    AirDry  LL15  DUL   SAT
                  150        1.08  0.135   0.27  0.51  0.56
                  150        1.08  0.216   0.27  0.51  0.56
                  300        1.15  0.27    0.27  0.48  0.53
                  300        1.23  0.27    0.27  0.46  0.51
                  300        1.3   0.27    0.27  0.45  0.5
                  300        1.34  0.27    0.27  0.44  0.49
                  300        1.35  0.27    0.27  0.41  0.46
                  SoilCrop WheatSoil: LL=[0.27, 0.27, 0.27, 0.27, 0.32, 0.35, 0.39]; KL=[0.06, 0.06, 0.06, 0.04, 0.04, 0.02, 0.01]; XF=[1, 1, 1, 1, 1, 1, 1]
                    LL source: Field measured and checked for sensibility
                  SoilCrop BarleySoil: LL=[0.27, 0.27, 0.27, 0.27, 0.32, 0.35, 0.39]; KL=[0.07, 0.07, 0.07, 0.05, 0.05, 0.03, 0.02]; XF=[1, 1, 1, 1, 1, 1, 1]
                    LL source: Estimated based on local knowledge
                  SoilCrop ChickpeaSoil: LL=[0.27, 0.27, 0.3, 0.33, 0.36, 0.38, 0.41]; KL=[0.06, 0.06, 0.06, 0.06, 0.06, 0.06, 0.06]; XF=[1, 1, 1, 1, 1, 1, 1]
                    LL source: Field measured and checked for sensibility
                  SoilCrop CottonSoil: LL=[0.27, 0.27, 0.3, 0.31, 0.34, 0.36, 0.38]; KL=[0.1, 0.1, 0.1, 0.1, 0.09, 0.07, 0.05]; XF=[1, 1, 1, 1, 1, 1, 1]
                    LL source: Field measured and checked for sensibility
                  SoilCrop SorghumSoil: LL=[0.27, 0.27, 0.28, 0.28, 0.31, 0.34, 0.36]; KL=[0.07, 0.07, 0.07, 0.05, 0.05, 0.04, 0.03]; XF=[1, 1, 1, 1, 1, 1, 1]
                    LL source: Field measured and checked for sensibility
                  SoilCrop MungbeanSoil: LL=[0.27, 0.27, 0.32, 0.38, 0.38, 0.44, 0.41]; KL=[0.06, 0.06, 0.06, 0.04, 0.04, 0.01, 0.01]; XF=[1, 1, 1, 1, 1, 1, 1]
                    LL source: Field measured and checked for sensibility
                  SoilCrop CanolaSoil: LL=[0.27, 0.27, 0.27, 0.27, 0.32, 0.35, 0.39]; KL=[0.06, 0.06, 0.06, 0.04, 0.04, 0.02, 0.01]; XF=[1, 1, 1, 1, 1, 1, 1]
                WaterBalance SoilWater: SummerDate=1-Nov; SummerU=6; SummerCona=3.5; WinterDate=1-Apr; WinterU=4; WinterCona=2.5; DiffusConst=40; DiffusSlope=16; Salb=0.12; CN2Bare=73; CNRed=20; CNCov=0.8; PSIDul=-100; Thickness=[150, 150, 300, 300, 300, 300, 300]; SWCON=[0.3, 0.3, 0.3, 0.3, 0.3, 0.3, 0.3]
                Nutrient
                Organic: FOMCNRatio=40; CarbonUnits=Total
                  Thickness  Carbon  SoilCNRatio  FBiom  FInert  FOM
                  150        1.196   12           0.04   0.4     347.129
                  150        0.91    12           0.02   0.6     270.3444
                  300        0.793   12           0.02   0.8     163.9721
                  300        0.637   12           0.02   0.95    99.4541
                  300        0.559   12           0.01   0.95    60.322
                  300        0.1     12           0.01   0.95    36.5871
                  300        0.05    12           0.01   0.95    22.1912
                Chemical: Thickness=[150, 150, 300, 300, 300, 300, 300]; PH=[8.9, 8.9, 8.9, 8.9, 8.8, 7.5, 8.4]; PHUnits=Water
                  PH source: Estimated based on local knowledge
                Water: Thickness=[150, 150, 300, 300, 300, 300, 300]; InitialValues=[0.51, 0.51, 0.48, 0.46, 0.45, 0.44, 0.41]; FilledFromTop=true
                Solute NO3: Thickness=[150, 150, 300, 300, 300, 300, 300]; InitialValues=[13, 9, 11, 2, 1, 1, 1]; InitialValuesUnits=ppm; WaterTableConcentration=0; D0=0; DepthConstant=0; MaxDepthSoluteAccessible=0; RunoffEffectivenessAtMovingSolute=0; MaxEffectiveRunoff=0
                Solute NH4: Thickness=[150, 150, 300, 300, 300, 300, 300]; InitialValues=[5.3333, 6, 8, 4, 6, 5, 5]; InitialValuesUnits=ppm; WaterTableConcentration=0; D0=0; DepthConstant=0; MaxDepthSoluteAccessible=0; RunoffEffectivenessAtMovingSolute=0; MaxEffectiveRunoff=0
                Solute Urea: same as Validation.Phenology Experiments.OCP Phenology.Gatton2015.Gatton2015Base.Paddock.soil.Urea
                SoilTemperature Temperature
              MicroClimate: a_interception=0; b_interception=0; c_interception=0; d_interception=0; SoilHeatFluxFraction=0; MinimumHeightDiffForNewLayer=0; NightInterceptionFraction=0; ReferenceHeight=2
              SurfaceOrganicMatter SurfaceOM: InitialResidueName=wheat; InitialResidueType=wheat; InitialResidueMass=6000; InitialStandingFraction=0; InitialCPR=0; InitialCNR=80
              Fertiliser
              Manager Fertilise at sowing
                Crop = [canola]
                FertiliserType = UreaN
                Amount = 78.2
                script: same as in Validation.Growth Experiments.Kojonup.Kojonup2013.Kojonup2013Base.paddock.Fertilise at sowing
              Irrigation
              Report DailyReport: EventNames=[Clock].DoReport
                VariableNames:
                  [Clock].Today
                  [Canola].SowingData.Cultivar
                  [Canola].Phenology.CurrentStageName
                  [Weather].MeanT
                  [Soil].Water.Volumetric
                  [Soil].Water.MM
                  sum([Soil].Water.MM) as ProfileWater
                  [Canola].AboveGround.N
                  [Canola].AboveGround.Wt
                  [Canola].AboveGroundLive.N
                  [Canola].AboveGroundLive.N*10 as UptakeNKgHA
                  [Canola].AboveGroundLive.Wt
                  [Canola].AboveGroundDead.N
                  [Canola].AboveGroundDead.Wt
                  [Canola].Arbitrator.DMDemand
                  [Canola].Arbitrator.DM.TotalFixationSupply
                  [Canola].Ear.N
                  [Canola].Ear.NConc
                  [Canola].Ear.Wt
                  [Canola].Grain.N
                  [Canola].Grain.NConc
                  [Canola].Grain.Number
                  [Canola].Grain.Size
                  [Canola].Grain.Wt
                  [Canola].Grain.Live.Wt
                  [Canola].Leaf.AppearedCohortNo
                  [Canola].Leaf.CoverDead
                  [Canola].Leaf.CoverGreen
                  [Canola].Leaf.CoverTotal
                  [Canola].Leaf.Dead.N
                  [Canola].Leaf.Dead.NConc
                  [Canola].Leaf.Dead.Wt
                  [Canola].Leaf.DeadCohortNo
                  [Canola].Leaf.GreenCohortNo
                  [Canola].Leaf.SenescingCohortNo
                  [Canola].Leaf.ExpandedCohortNo
                  [Canola].Leaf.Fn
                  [Canola].Leaf.Fw
                  [Canola].Leaf.Height
                  [Canola].Leaf.InitialisedCohortNo
                  [Canola].Leaf.LAI
                  [Canola].Leaf.Live.N
                  [Canola].Leaf.Live.NConc
                  [Canola].Leaf.Live.Wt
                  [Canola].Leaf.SpecificArea
                  [Canola].Leaf.Transpiration
                  [Canola].Phenology.CurrentPhase.Name
                  [Canola].Phenology.CurrentStageName
                  [Canola].Phenology.DailyVernalisation
                  [Canola].Phenology.MeanTemp
                  [Canola].Phenology.Photoperiod
                  [Canola].Phenology.Stage
                  [Canola].Phenology.ThermalTime
                  [Canola].Phenology.ThermalTime
                  [Canola].Phenology.Vrn1
                  [Canola].Phenology.Vrn2
                  [Canola].Phenology.Vrn4
                  [Canola].Phenology.Zadok.Stage
                  [Canola].Root.Depth
                  [Canola].Root.N
                  [Canola].Root.Wt
                  [Canola].Root.NConc
                  [Canola].Root.WaterUptake
                  [Canola].Panicle.N
                  [Canola].Panicle.NConc
                  [Canola].Panicle.Wt
                  [Canola].Panicle.Live.StorageWt
                  [Canola].Stem.N
                  [Canola].Stem.NConc
                  [Canola].Stem.Wt
                  [Canola].Stem.PercentWSC
                  [Canola].Stem.Live.StorageWt
                  [Canola].StemPlusPanicle.Wt
                  [Canola].StemPlusPanicle.N
                  [Canola].SowingData.Cultivar
                  [Canola].Structure.HaunStageTerminalSpikelet
                  [Canola].Structure.HaunStage
                  [Canola].Structure.Height
                  [Canola].Structure.LeafTipsAppeared
                  [Canola].Structure.FinalLeafNumber
                  [Canola].Structure.FinalLeafNumber.ValueToHold.PhotoPLeaves
                  [Canola].Structure.MainStemPopn
                  [Canola].Structure.MeanTillerGrowthRate
                  [Canola].Structure.TotalStemPopn
                  [Canola].Total.N
                  [Canola].Total.Wt
                  [SurfaceOrganicMatter].Wt
                  ([Canola].Leaf.Transpiration + [Soil].SoilWater.Es + [MicroClimate].interception) as ET
                  sum([Soil].NO3.kgha) as TotalSoilNitrogen
                  [Canola].Phenology.FlagLeafDAS
                  [Canola].Phenology.FloweringDAS
                  [Canola].Phenology.MaturityDAS
                  [Canola].Phenology.PhotoPeriod
                  [Canola].Phenology.PhotoPeriodDeltaFunction
                  [Canola].Phenology.Stage
                  [Canola].Phenology.SoilTemperatureFunction
                  [Clock].Today.Year
                  [Canola].SowingData.Population
              Report HarvestReport
              Report DailyBiomass: EventNames=[Clock].DoReport
              Report SowingReport: EventNames=[Canola].Sowing
                VariableNames:
                  [Clock].Today
                  [Canola].SowingData.Cultivar
                  [IWeather].Latitude
                  [IWeather].Longitude
      Folder Breeza_2015_Ex1a
        Experiment Breeza_2015_Ex1a
          Factors
            Permutation
              Factor TOS_index
                CompositeFactor 1: Specifications=[Sowing].Script.SowDate = 17-Apr
                CompositeFactor 2: Specifications=[Sowing].Script.SowDate = 29-Apr
                CompositeFactor 3: Specifications=[Sowing].Script.SowDate = 19-May
              Factor CV
                Specification=[Sowing].Script.CultivarName = 43C80_CL,44Y89_CL,45Y86_CL,45Y88_CL,Hyola575_CL,Hyola577_CL
              Factor Popn: Specification=[Sowing].Script.Population = 45
              Factor Fert: Specification=[codes].Script.fert_treat = nil
              Factor Irrig: Specification=[codes].Script.irrig_treat = nil
          Simulation Breeza_OCP_2015_Ex1a
            Clock: Start=2015-03-01; End=2015-12-01
            Summary summaryfile
            Weather: FileName=met/55008_CombGSE.met
            SoilArbitrator
            Zone paddock: Area=1; Slope=0; AspectAngle=0; Altitude=50
              Folder manager
                Manager Reset on date
                  ResetDate = 15-Apr
                  ResetWater = Yes
                  ResetN = Yes
                  ResetSOM = No
```csharp
using Models.Interfaces;
using System;
using Models.Core;
using Models.PMF;
using Models.Soils;
using Models.Utilities;
using Models.Surface;
using Models.Soils.Nutrients;
using APSIM.Shared.Utilities;

namespace Models
{
    [Serializable]
    public class Script : Model
    {
        [Link] private Clock Clock;
        [Link] private Plant Wheat;
        [Link] private ISoilWater SoilWater;
        [Link] private INutrient nutrient;
        [Link] private SurfaceOrganicMatter SOM;
        [Link] private Summary summary;

        [Description("Date to reset on:")]
        public string ResetDate {get;set;}

        [Description("Reset Water?")]
        public string ResetWater {get;set;}

        [Description("Reset Nitrogen?")]
        public string ResetN {get;set;}

        [Description("Reset Surface Organic Matter?")]
        public string ResetSOM {get;set;}

        [EventSubscribe("DoManagement")]
        private void OnDoManagement(object sender, EventArgs e)
        {
            if (DateUtilities.WithinDates(ResetDate, Clock.Today, ResetDate))
            {
                if (ResetWater == "Yes")
                {
                    summary.WriteMessage(this, "Reset Water", MessageType.Diagnostic);
                    SoilWater.Reset();
                }
                if (ResetN == "Yes")
                {
                    summary.WriteMessage(this, "Reset Nitrogen", MessageType.Diagnostic);
                    nutrient.Reset();
                }
                if (ResetSOM == "Yes")
                {
                    summary.WriteMessage(this, "Reset Surface OM", MessageType.Diagnostic);
                    SOM.Reset();
                }
            }
        }
    }
}
```
                Manager Sowing
                  SowDate = 25-Apr
                  CultivarName = Hyola575
                  SowingDepth = 20
                  RowSpacing = 245
                  Population = 45
                  script: same as in Incomplete.OCP Agronomy.Breeza_2014_Ex1.Breeza_2014_Ex1.Breeza_2014_Ex1_Base.paddock.manager.Sowing
                Manager Fertilise
                  FertiliserType = UreaN
                  FertiliserDates = 10-Jun
                  fert_criteria = 1000
                  Amount = 69
                  FertiliserDepth = 0
```csharp
using APSIM.Shared.Utilities;
using Models.PMF;
using Models.Core;
using Models.Soils;
using Models.Soils.Nutrients;
using System;
namespace Models
{
    [Serializable]
    public class Script : Model
    {
        [Link] Clock Clock;
        [Link] Fertiliser Fertiliser;
        [Link] INutrient nutrient;
        [Link] Summary sum;
        
        [Separator("A component to apply fertiliser on one or more dates on every year of the simulation")]

        [Description("Type of fertiliser to apply? ")] 
        [Display(Type = DisplayType.FertiliserType)]public string FertiliserType { get; set; }

        [Description("Enter the fertilisation dates as dd-mmm with comma separation (any year information entered will be ignored): ")] 
        public string[] FertiliserDates { get; set; } 

        public string fert_treat{ get; set;}    // The treatment set in the experiment

        [Description("Don't add fertiliser if N in top 2 layers exceeds (kg/ha) : ")]
        public double fert_criteria { get; set; }

        [Description("Amount of fertiliser to be applied (kg /ha)")] 
        public double Amount { get; set; }

        [Description("Depth (mm)")] public double FertiliserDepth { get; set; }
        
        [EventSubscribe("DoManagement")]
        private void OnDoManagement(object sender, EventArgs e)
        {
            if (fert_treat != null)
            {
                if (fert_treat == "D3")
                    Amount = 26;
                if (fert_treat == "D9")
                    Amount = 186;
            }

            foreach (string ddMMM in FertiliserDates)
            {
                if (DateUtilities.DatesEqual(ddMMM, Clock.Today))
                {
                    double soil_N = nutrient.NH4.kgha[0] + nutrient.NO3.kgha[0] + nutrient.NH4.kgha[1] + nutrient.NO3.kgha[1];
                    if (soil_N <= fert_criteria) 
                         Fertiliser.Apply(amount: Amount / FertiliserDates.Length, type: FertiliserType, depth: FertiliserDepth);
                    else
                        sum.WriteMessage(this, "No fertilising as top two layers have " + soil_N.ToString() + "kg/ha N", MessageType.Diagnostic);
                }
            }
        }
    }
}
```
                Manager codes
                  location = Breeza
                  TOS_index = 1
                  irrig_treat =
                  fert_treat = nil
                  trialcode =
```csharp
using Models.Soils;
using System;
using Models.Core;
using Models.PMF;
namespace Models
{
    [Serializable]
    [System.Xml.Serialization.XmlInclude(typeof(Model))]
    public class Script : Model
    {
        [Link] Clock Clock;

        [Description("location")]
        public string location { get; set; }

        [Description("Time of sowing")]
        public string TOS_index { get; set; }

        [Description("irrig_treat")]
        public string irrig_treat { get; set; }

        [Description("fert_treat")]
        public string fert_treat { get; set; }

        [Description("trial_code")]
        public string trialcode { get; set; }

        [EventSubscribe("StartOfSimulation")]
        private void OnSimulationCommencing(object sender, EventArgs e)
        {
        }
    }
}
```
                Manager HarvestAfterDate
                  HarvestDate = 18-Oct
                  script: same as in Validation.Growth Experiments.Kojonup.Kojonup2013.Kojonup2013Base.paddock.HarvestAfterDate
              Fertiliser
              Manager Fertilise at sowing
                Crop = [canola]
                FertiliserType = UreaN
                Amount = 80
                script: same as in Validation.Growth Experiments.Kojonup.Kojonup2013.Kojonup2013Base.paddock.Fertilise at sowing
              Manager Fertilise at sowing1
                Crop = [canola]
                FertiliserType = NH4N
                Amount = 7.5
                script: same as in Validation.Growth Experiments.Kojonup.Kojonup2013.Kojonup2013Base.paddock.Fertilise at sowing
              Irrigation
              SurfaceOrganicMatter: InitialResidueName=wheat; InitialResidueType=wheat; InitialResidueMass=6000; InitialStandingFraction=0; InitialCPR=0; InitialCNR=80
              Plant canola: ResourceName=Canola
              Soil Grey-Black Vertosol (Breeza No123): ASCOrder=Vertosol; ASCSubOrder=Black; SoilType=SNSW; Site=Breeza; NearestTown=Breeza, NSW 2381; Region=North West Slopes and Plains; State=New South Wales; Country=Australia; NaturalVegetation=Grasslands; ApsoilNumber=123; Latitude=-31.304; Longitude=150.473; LocationAccuracy=+/- 20m; DataSource=CSIRO Plant Industry, Myall Vale (D Richards)
                Physical: same as Incomplete.OCP Agronomy.Breeza_2014_Ex1.Breeza_2014_Ex1.Breeza_2014_Ex1_Base.paddock.Grey-Black Vertosol (Breeza No123).Physical
                WaterBalance SoilWater: same as Incomplete.OCP Agronomy.Breeza_2014_Ex1.Breeza_2014_Ex1.Breeza_2014_Ex1_Base.paddock.Grey-Black Vertosol (Breeza No123).SoilWater
                Nutrient
                Organic: FOMCNRatio=40; CarbonUnits=Total
                  Thickness  Carbon  SoilCNRatio  FBiom  FInert  FOM
                  150        1.196   12           0.04   0.4     347.129
                  150        0.91    12           0.02   0.6     270.3444
                  300        0.793   12           0.02   0.8     163.9721
                  300        0.637   12           0.02   1       99.4541
                  300        0.559   12           0.01   1       60.322
                  300        0.1     12           0.01   1       36.5871
                  300        0.05    12           0.01   1       22.1912
                Chemical: same as Incomplete.OCP Agronomy.Breeza_2014_Ex1.Breeza_2014_Ex1.Breeza_2014_Ex1_Base.paddock.Grey-Black Vertosol (Breeza No123).Chemical
                Water: Thickness=[150, 150, 300, 300, 300, 300, 300]; InitialValues=[0.443, 0.426, 0.439, 0.447, 0.425, 0.425, 0.425]; FilledFromTop=false
                Solute NO3: Thickness=[150, 150, 300, 300, 300, 300, 300]; InitialValues=[34, 19, 8, 9, 9, 0, 0]; InitialValuesUnits=ppm; WaterTableConcentration=0; D0=0; DepthConstant=0; MaxDepthSoluteAccessible=0; RunoffEffectivenessAtMovingSolute=0; MaxEffectiveRunoff=0
                Solute NH4: Thickness=[150, 150, 300, 300, 300, 300, 300]; InitialValues=[6, 4, 3, 3, 3, 0, 0]; InitialValuesUnits=ppm; WaterTableConcentration=0; D0=0; DepthConstant=0; MaxDepthSoluteAccessible=0; RunoffEffectivenessAtMovingSolute=0; MaxEffectiveRunoff=0
                Solute Urea: same as Validation.Phenology Experiments.OCP Phenology.Gatton2015.Gatton2015Base.Paddock.soil.Urea
                SoilTemperature Temperature
              MicroClimate: a_interception=0; b_interception=1; c_interception=0; d_interception=0; SoilHeatFluxFraction=0; MinimumHeightDiffForNewLayer=0; NightInterceptionFraction=0; ReferenceHeight=2
              Report DailyReport: EventNames=[Clock].DoReport
              Report HarvestReport
              Report DailyBiomass: EventNames=[Clock].DoReport
              Report SowingReport: EventNames=[Canola].Sowing
                VariableNames:
                  [Clock].Today
                  [Canola].SowingData.Cultivar
                  [IWeather].Latitude
                  [IWeather].Longitude
      Folder Breeza_2016_Ex1a
        Experiment Breeza_2016_Ex1a
          Factors
            Permutation
              Factor TOS_index
                CompositeFactor 1: Specifications=[Sowing].Script.SowDate = 13-Apr
                CompositeFactor 2: Specifications=[Sowing].Script.SowDate = 16-May
                CompositeFactor 3: Specifications=[Sowing].Script.SowDate = 17-Jun
              Factor Cv
                Specification=[Sowing].Script.CultivarName = 43C80_CL,44Y89_CL,45Y86_CL,45Y88_CL,Archer,Hyola575_CL
              Factor Popn: Specification=[Sowing].Script.Population = 45
              Factor Fert: Specification=[codes].Script.fert_treat = nil
              Factor Irrig: Specification=[codes].Script.irrig_treat = nil
          Simulation Breeza_2016_Ex1_Base
            Clock: Start=2016-03-01; End=2016-12-30
            Summary summaryfile
            Weather: FileName=met/55008_CombGSE.met
            SoilArbitrator
            Zone paddock: Area=1; Slope=0; AspectAngle=0; Altitude=50
              Folder manager
                Manager Reset on date
                  ResetDate = 30-Mar
                  ResetWater = Yes
                  ResetN = Yes
                  ResetSOM = No
                  script: same as in Incomplete.OCP Agronomy.Breeza_2014_Ex1.Breeza_2014_Ex1.Breeza_2014_Ex1_Base.paddock.manager.Reset on date
                Manager Sowing
                  SowDate = 25-Apr
                  CultivarName = Hyola575
                  SowingDepth = 20
                  RowSpacing = 245
                  Population = 44
                  script: same as in Incomplete.OCP Agronomy.Breeza_2014_Ex1.Breeza_2014_Ex1.Breeza_2014_Ex1_Base.paddock.manager.Sowing
                Manager Fertilise on fixed dates
                  FertiliserType = UreaN
                  FertiliserDates = 07-apr
                  Amount = 161
                  FertiliserDepth = 20
```csharp
using Models.Soils;
using System;
using Models.Core;
using Models.PMF;
using APSIM.Shared.Utilities;
namespace Models
{
    [Serializable]
    public class Script : Model
    {
        [Link] Clock Clock;
        [Link] Fertiliser Fertiliser;
        
        [Separator("A component to apply fertiliser on one or more dates on every year of the simulation")]

        [Description("Type of fertiliser to apply? ")] [Display(Type = DisplayType.FertiliserType)]public string FertiliserType { get; set; }

        [Description("Enter the fertilisation dates as dd-mmm with comma separation (any year information entered will be ignored): ")] public string[] FertiliserDates { get; set; } 

        [Description("Amount of fertiliser to be applied (kg /ha)")] public double Amount { get; set; }

        [Description("Depth (mm)")] public double FertiliserDepth { get; set; }
        
        [EventSubscribe("DoManagement")]
        private void OnDoManagement(object sender, EventArgs e)
        {
            foreach (string ddMMM in FertiliserDates)
            {
                if (DateUtilities.DatesEqual(ddMMM, Clock.Today))
                {
                         Fertiliser.Apply(amount: Amount / FertiliserDates.Length, type: FertiliserType, depth: FertiliserDepth);
                }
            }
        }
    }
}
```
                Manager codes: same as Incomplete.OCP Agronomy.Breeza_2014_Ex1.Breeza_2014_Ex1.Breeza_2014_Ex1_Base.paddock.manager.codes
                Manager HarvestAfterDate
                  HarvestDate = 24-Nov
                  script: same as in Validation.Growth Experiments.Kojonup.Kojonup2013.Kojonup2013Base.paddock.HarvestAfterDate
              Plant canola: ResourceName=Canola
              MicroClimate: a_interception=0; b_interception=0; c_interception=0; d_interception=0; SoilHeatFluxFraction=0.1; MinimumHeightDiffForNewLayer=0; NightInterceptionFraction=0; ReferenceHeight=1
              SurfaceOrganicMatter SurfaceOM: InitialResidueName=wheat; InitialResidueType=wheat; InitialResidueMass=6000; InitialStandingFraction=0; InitialCPR=0; InitialCNR=80
              Fertiliser
              Manager Fertilise at sowing
                Crop = [canola]
                FertiliserType = NH4N
                Amount = 7
                script: same as in Validation.Growth Experiments.Kojonup.Kojonup2013.Kojonup2013Base.paddock.Fertilise at sowing
              Irrigation
              Soil Grey-Black Vertosol (Breeza No123)1: ASCOrder=Vertosol; ASCSubOrder=Black; SoilType=SNSW; Site=Breeza; NearestTown=Breeza, NSW 2381; Region=North West Slopes and Plains; State=New South Wales; Country=Australia; NaturalVegetation=Grasslands; ApsoilNumber=123; Latitude=-31.304; Longitude=150.473; LocationAccuracy=+/- 20m; DataSource=CSIRO Plant Industry, Myall Vale (D Richards)
                Physical: same as Incomplete.OCP Agronomy.Breeza_2014_Ex1.Breeza_2014_Ex1.Breeza_2014_Ex1_Base.paddock.Grey-Black Vertosol (Breeza No123).Physical
                WaterBalance SoilWater: same as Incomplete.OCP Agronomy.Breeza_2014_Ex1.Breeza_2014_Ex1.Breeza_2014_Ex1_Base.paddock.Grey-Black Vertosol (Breeza No123).SoilWater
                Nutrient
                Organic: FOMCNRatio=40; CarbonUnits=Total
                  Thickness  Carbon  SoilCNRatio  FBiom  FInert  FOM
                  150        0.88    12           0.04   0.4     347.129
                  150        0.76    12           0.02   0.6     270.3444
                  300        0.62    12           0.02   0.8     163.9721
                  300        0.32    12           0.02   1       99.4541
                  300        0.12    12           0.01   1       60.322
                  300        0.1     12           0.01   1       36.5871
                  300        0.05    12           0.01   1       22.1912
                Chemical: Thickness=[150, 150, 300, 300, 300, 300, 300]; PH=[7.6, 7.7, 8.5446, 8.273, 8.0919, 6.9149, 7.7297]; PHUnits=Water
                  PH source: Estimated based on local knowledge
                Water: Thickness=[150, 150, 300, 300, 300, 300, 300]; InitialValues=[0.51, 0.51, 0.48, 0.46, 0.45, 0.44, 0.41]; FilledFromTop=true
                Solute NO3: Thickness=[150, 150, 300, 300, 300, 300, 300]; InitialValues=[10.6667, 8, 6, 2, 1, 1, 1]; InitialValuesUnits=ppm; WaterTableConcentration=0; D0=0; DepthConstant=0; MaxDepthSoluteAccessible=0; RunoffEffectivenessAtMovingSolute=0; MaxEffectiveRunoff=0
                Solute NH4: Thickness=[150, 150, 300, 300, 300, 300, 300]; InitialValues=[2, 2, 2, 2, 1, 1, 1]; InitialValuesUnits=ppm; WaterTableConcentration=0; D0=0; DepthConstant=0; MaxDepthSoluteAccessible=0; RunoffEffectivenessAtMovingSolute=0; MaxEffectiveRunoff=0
                Solute Urea: same as Validation.Phenology Experiments.OCP Phenology.Gatton2015.Gatton2015Base.Paddock.soil.Urea
                SoilTemperature Temperature
              Report DailyReport: same as Incomplete.OCP Agronomy.AlmaPark_2015_Ex2a.AlmaPark_2015_Ex2a.AlmaPark2015_Ex2a_base.paddock.DailyReport
              Report HarvestReport
              Report DailyBiomass: same as Incomplete.DP Agronomy.WaggaCR2008.WaggaWagga2008CR.Paddock.DailyBiomass
              Report SowingReport: EventNames=[Canola].Sowing
                VariableNames:
                  [Clock].Today
                  [Canola].SowingData.Cultivar
                  [IWeather].Latitude
                  [IWeather].Longitude
      Folder Canowindra_2015_Ex1b
        Experiment Canowindra_2015_Ex1b
          Factors
            Permutation
              Factor TOS_index
                CompositeFactor 1: Specifications=[Sowing].Script.SowDate = 2-Apr
                CompositeFactor 2: Specifications=[Sowing].Script.SowDate = 15-Apr
                CompositeFactor 3: Specifications=[Sowing].Script.SowDate = 1-May
              Factor Cv
                Specification=[Sowing].Script.CultivarName = 44Y89_CL,45Y88_CL,ATR_Gem,ATR_Stingray,AV_Garnet,GT50_RR,Hyola559_TT,Hyola575_CL,Hyola577_CL,Hyola600_RR,Hyola750_TT,IH30_RR
              Factor Popn: Specification=[Sowing].Script.Population =  45
              Factor Fert: Specification=[codes].Script.fert_treat = nil
              Factor Irrig: Specification=[codes].Script.irrig_treat = nil
          Simulation Canowindra_OCP_2015_Ex1b
            Clock: Start=2015-03-01; End=2015-12-01
            Summary summaryfile
            Weather: FileName=met/65006_CombGSE.met
            SoilArbitrator
            Zone paddock: Area=1; Slope=0; AspectAngle=0; Altitude=50
              Folder manager
                Manager Reset on date
                  ResetDate = 1-Apr
                  ResetWater = Yes
                  ResetN = Yes
                  ResetSOM = No
                  script: same as in Incomplete.OCP Agronomy.Breeza_2014_Ex1.Breeza_2014_Ex1.Breeza_2014_Ex1_Base.paddock.manager.Reset on date
                Manager Sowing
                  SowDate = 1-Apr
                  CultivarName = 44Y89_CL
                  SowingDepth = 20
                  RowSpacing = 250
                  Population = 45
                  script: same as in Validation.Growth Experiments.Kojonup.Kojonup2013.Kojonup2013Base.paddock.SowingRule
                Manager Fertilise
                  FertiliserType = UreaN
                  FertiliserDates = 1-Jun
                  fert_criteria = 1000
                  Amount = 155
                  FertiliserDepth = 0
                  script: same as in Incomplete.OCP Agronomy.Breeza_2015_Ex1a.Breeza_2015_Ex1a.Breeza_OCP_2015_Ex1a.paddock.manager.Fertilise
                Manager codes
                  location = Breeza
                  TOS_index = 1
                  irrig_treat =
                  fert_treat = nil
                  trialcode =
                  script: same as in Incomplete.OCP Agronomy.Breeza_2015_Ex1a.Breeza_2015_Ex1a.Breeza_OCP_2015_Ex1a.paddock.manager.codes
                Manager HarvestAfterDate
                  HarvestDate = 3-Nov
                  script: same as in Validation.Growth Experiments.Kojonup.Kojonup2013.Kojonup2013Base.paddock.HarvestAfterDate
              Fertiliser
              Manager Fertilise at sowing: same as Incomplete.OCP Agronomy.Breeza_2016_Ex1a.Breeza_2016_Ex1a.Breeza_2016_Ex1_Base.paddock.Fertilise at sowing
              Irrigation
              SurfaceOrganicMatter: InitialResidueName=wheat; InitialResidueType=wheat; InitialResidueMass=6000; InitialStandingFraction=0; InitialCPR=0; InitialCNR=80
              Plant canola: ResourceName=Canola
              Soil: ASCOrder=Kandosol; ASCSubOrder=Red; SoilType=SNSW; Site=Greenethorpe; NearestTown=Greenethorpe; Region=Central West Slopes and Plains; State=New South Wales; Country=Australia; ApsoilNumber=619-YP; Latitude=-33.995; Longitude=148.404; LocationAccuracy=Regional Soil Type; Comments=All CLL estimated
                DataSource=YP. Made by James Hunt, BCG modified version of  SW Slopes-Greenthorpe  from M. Robertson &  J. Kirkegaard (CSIRO PI), requested by Farmlink. CLL/AirDry data taken from SW measurements made by Tony Swan of CSIRO PI in R. Taylors   Finns  paddock at Greenthorpe 19 April 2007. DUL is estimated based on CLL and original soil. OC in top 1 m measured.
                Physical
                  Thickness  BD    AirDry  LL15  DUL   SAT
                  100        1.28  0.05    0.1   0.2   0.442
                  100        1.32  0.08    0.13  0.23  0.434
                  200        1.34  0.22    0.23  0.33  0.43
                  200        1.33  0.24    0.24  0.34  0.423
                  200        1.42  0.23    0.23  0.33  0.408
                  200        1.5   0.25    0.25  0.35  0.396
                  200        1.51  0.25    0.25  0.35  0.396
                  200        1.54  0.25    0.25  0.35  0.396
                  200        1.52  0.25    0.25  0.35  0.396
                  200        1.53  0.25    0.25  0.35  0.396
                  SoilCrop WheatSoil
                    LL=[0.1, 0.13, 0.23, 0.24, 0.23, 0.25, 0.25, 0.28, 0.31, 0.31]
                    KL=[0.06, 0.06, 0.06, 0.06, 0.06, 0.04, 0.04, 0.04, 0.02, 0.01]
                    XF=[1, 1, 1, 1, 1, 1, 1, 1, 1, 1]
                    LL source: Estimated based on local knowledge
                  SoilCrop BarleySoil
                    LL=[0.1, 0.13, 0.23, 0.24, 0.23, 0.25, 0.25, 0.28, 0.31, 0.31]
                    KL=[0.07, 0.07, 0.07, 0.07, 0.05, 0.05, 0.05, 0.03, 0.03, 0.02]
                    XF=[1, 1, 1, 1, 1, 1, 1, 1, 1, 1]
                    LL source: Estimated based on local knowledge
                  SoilCrop OatsSoil: same as Incomplete.OCP Agronomy.Canowindra_2015_Ex1b.Canowindra_2015_Ex1b.Canowindra_OCP_2015_Ex1b.paddock.soil.Physical.WheatSoil
                  SoilCrop CanolaSoil: same as Incomplete.OCP Agronomy.Canowindra_2015_Ex1b.Canowindra_2015_Ex1b.Canowindra_OCP_2015_Ex1b.paddock.soil.Physical.WheatSoil
                WaterBalance SoilWater: SummerDate=1-Nov; SummerU=6; SummerCona=3.5; WinterDate=1-Apr; WinterU=2; WinterCona=2; DiffusConst=88; DiffusSlope=35; Salb=0.13; CN2Bare=73; CNRed=20; CNCov=0.8; PSIDul=-100; Thickness=[100, 100, 200, 200, 200, 200, 200, 200, 200, 200]; SWCON=[0.4, 0.4, 0.4, 0.4, 0.4, 0.4, 0.4, 0.4, 0.4, 0.4]
                Nutrient
                Organic: FOMCNRatio=40; CarbonUnits=Total
                  Thickness  Carbon  SoilCNRatio  FBiom  FInert  FOM
                  100        0.65    12.5         0.04   0.5     260.5874
                  100        0.3     12.5         0.02   0.5     220.5825
                  200        0.3     12.5         0.02   0.5     158.0542
                  200        0.2     12.5         0.01   0.6     113.2508
                  200        0.2     12.5         0.01   0.6     81.1478
                  200        0.1     12.5         0.01   0.6     58.1449
                  200        0.1     12.5         0.01   0.8     41.6626
                  200        0.1     12.5         0.01   0.8     29.8526
                  200        0.1     12.5         0.01   0.8     21.3903
                  200        0.1     12.5         0.01   1       15.3268
                Chemical: Thickness=[100, 100, 200, 200, 200, 200, 200, 200, 200, 200]; PH=[5.8, 5.9, 6.6, 6.8, 7, 7.1, 7.2, 7.3, 7.4, 7.4]; PHUnits=Water
                Water: Thickness=[100, 200, 300, 300, 300, 300, 300]; InitialValues=[0.1101, 0.1796, 0.2733, 0.2517, 0.2637, 0.3005, 0.3008]; FilledFromTop=false
                Solute NO3: Thickness=[100, 100, 200, 200, 200, 200, 200, 200, 200, 200]; InitialValues=[46.875, 11.2782, 6.8891, 2.5, 0, 0, 0, 0, 0, 0]; InitialValuesUnits=ppm; WaterTableConcentration=0; D0=0; DepthConstant=0; MaxDepthSoluteAccessible=0; RunoffEffectivenessAtMovingSolute=0; MaxEffectiveRunoff=0
                Solute NH4: Thickness=[100, 100, 200, 200, 200, 200, 200, 200, 200, 200]; InitialValues=[7.8125, 0.3759, 0.313, 0.25, 0, 0, 0, 0, 0, 0]; InitialValuesUnits=ppm; WaterTableConcentration=0; D0=0; DepthConstant=0; MaxDepthSoluteAccessible=0; RunoffEffectivenessAtMovingSolute=0; MaxEffectiveRunoff=0
                Solute Urea: Thickness=[100, 100, 200, 200, 200, 200, 200, 200, 200, 200]; InitialValues=[0, 0, 0, 0, 0, 0, 0, 0, 0, 0]; InitialValuesUnits=kg/ha; WaterTableConcentration=0; D0=0; DepthConstant=0; MaxDepthSoluteAccessible=0; RunoffEffectivenessAtMovingSolute=0; MaxEffectiveRunoff=0
                SoilTemperature Temperature
              MicroClimate: a_interception=0; b_interception=1; c_interception=0; d_interception=0; SoilHeatFluxFraction=0; MinimumHeightDiffForNewLayer=0; NightInterceptionFraction=0; ReferenceHeight=2
              Report DailyReport: same as Incomplete.OCP Agronomy.AlmaPark_2015_Ex2a.AlmaPark_2015_Ex2a.AlmaPark2015_Ex2a_base.paddock.DailyReport
              Report HarvestReport
              Report DailyBiomass: same as Incomplete.DP Agronomy.WaggaCR2008.WaggaWagga2008CR.Paddock.DailyBiomass
              Report SowingReport: EventNames=[Canola].Sowing
                VariableNames:
                  [Clock].Today
                  [Canola].SowingData.Cultivar
                  [IWeather].Latitude
                  [IWeather].Longitude
      Folder Canowindra_2016_Ex1b
        Experiment Canowindra_2016_Ex1b
          Factors
            Permutation
              Factor TOS_index
                CompositeFactor 1
                  Specifications:
                    [Sowing].Script.SowDate = 1-Apr
                    [Irrigate].Script.irrigDate = 4-Apr
                    [Irrigate].Script.amount = 16
                CompositeFactor 2
                  Specifications:
                    [Sowing].Script.SowDate = 14-Apr
                    [Irrigate].Script.irrigDate = 14-Apr
                    [Irrigate].Script.amount = 16
                CompositeFactor 3: Specifications=[Sowing].Script.SowDate = 28-Apr
              Factor Cv
                Specification=[Sowing].Script.CultivarName = 44Y89_CL,45Y88_CL,Archer,ATR_Gem,ATR_Stingray,GT50_RR,Hyola559_TT,Hyola575_CL,Hyola600_RR,Hyola750_TT,IH30_RR,NS_Diamond
              Factor Popn: Specification=[Sowing].Script.Population =  45
              Factor Fert: Specification=[codes].Script.fert_treat = nil
              Factor Irrig: Specification=[codes].Script.irrig_treat = nil
          Simulation Canowindra_OCP_2016_Ex1b
            Clock: Start=2016-03-01; End=2016-12-01
            Summary summaryfile
            Weather: FileName=met/65006_CombGSE.met
            SoilArbitrator
            Zone paddock: Area=1; Slope=0; AspectAngle=0; Altitude=50
              Folder manager
                Manager Reset on date
                  ResetDate = 21-Mar
                  ResetWater = Yes
                  ResetN = Yes
                  ResetSOM = No
                  script: same as in Incomplete.OCP Agronomy.Breeza_2014_Ex1.Breeza_2014_Ex1.Breeza_2014_Ex1_Base.paddock.manager.Reset on date
                Manager Sowing
                  SowDate = 06-Apr
                  CultivarName = Hyola575_CL
                  SowingDepth = 20
                  RowSpacing = 248
                  Population = 35
                  script: same as in Validation.Growth Experiments.Kojonup.Kojonup2013.Kojonup2013Base.paddock.SowingRule
                Manager Fertilise on fixed dates1
                  FertiliserType = NH4N
                  FertiliserDates = 28-Apr
                  fert_criteria = 1000
                  Amount = 16
                  FertiliserDepth = 20
```csharp
using APSIM.Shared.Utilities;
using Models.PMF;
using Models.Core;
using Models.Soils;
using Models.Soils.Nutrients;
using System;
namespace Models
{
    [Serializable]
    public class Script : Model
    {
        [Link] Clock Clock;
        [Link] Fertiliser Fertiliser;
        [Link] INutrient nutrient;
        
        [Separator("A component to apply fertiliser on one or more dates on every year of the simulation")]

        [Description("Type of fertiliser to apply? ")] 
        [Display(Type = DisplayType.FertiliserType)]public string FertiliserType { get; set; }

        [Description("Enter the fertilisation dates as dd-mmm with comma separation (any year information entered will be ignored): ")] 
        public string[] FertiliserDates { get; set; } 

        [Description("Don't add fertiliser if N in top 2 layers exceeds (kg/ha) : ")]
        public double fert_criteria { get; set; }

        [Description("Amount of fertiliser to be applied (kg /ha)")] 
        public double Amount { get; set; }

        [Description("Depth (mm)")] public double FertiliserDepth { get; set; }
        
        [EventSubscribe("DoManagement")]
        private void OnDoManagement(object sender, EventArgs e)
        {
            foreach (string ddMMM in FertiliserDates)
            {
                if (DateUtilities.DatesEqual(ddMMM, Clock.Today))
                {
                    double soil_N = nutrient.NH4.kgha[1] + nutrient.NO3.kgha[1] + nutrient.NH4.kgha[2] + nutrient.NO3.kgha[2];
                    if (soil_N <= fert_criteria) 
                         Fertiliser.Apply(amount: Amount / FertiliserDates.Length, type: FertiliserType, depth: FertiliserDepth);
                }
            }
        }
    }
}
```
                Manager Fertilise on fixed dates2
                  FertiliserType = UreaN
                  FertiliserDates = 16-Jun
                  fert_criteria = 1000
                  Amount = 74
                  FertiliserDepth = 0
                  script: same as in Incomplete.OCP Agronomy.Canowindra_2016_Ex1b.Canowindra_2016_Ex1b.Canowindra_OCP_2016_Ex1b.paddock.manager.Fertilise on fixed dates1
                Manager Irrigate
                  irrigDate = 4-Apr
                  amount = 0
```csharp
using Models.Soils;
using System;
using Models.Core;
using APSIM.Shared.Utilities;
namespace Models
{
    [Serializable]
    [System.Xml.Serialization.XmlInclude(typeof(Model))]
    public class Script : Model
    {
        [Link] Clock clock;    
           [Link] Irrigation irrigation;

           [Description("Date for irrigation")] 
        public string irrigDate { get; set; }

        [Description("Amount of irrigation (mm)")]
        public double amount {get; set; }

        [EventSubscribe("DoManagement")]
        private void OnDoManagement(object sender, EventArgs e)
        {
            if (DateUtilities.DatesAreEqual(irrigDate, clock.Today))
                irrigation.Apply(amount: amount);
        }
    }
}
```
                Manager codes
                  location = Breeza
                  TOS_index = 1
                  irrig_treat =
                  fert_treat = nil
                  trialcode =
                  script: same as in Incomplete.OCP Agronomy.Breeza_2015_Ex1a.Breeza_2015_Ex1a.Breeza_OCP_2015_Ex1a.paddock.manager.codes
                Manager HarvestAfterDate
                  HarvestDate = 6-Nov
                  script: same as in Validation.Growth Experiments.Kojonup.Kojonup2013.Kojonup2013Base.paddock.HarvestAfterDate
              Fertiliser
              Manager Fertilise at sowing
                Crop = [canola]
                FertiliserType = UreaN
                Amount = 56
                script: same as in Validation.Growth Experiments.Kojonup.Kojonup2013.Kojonup2013Base.paddock.Fertilise at sowing
              Irrigation
              SurfaceOrganicMatter: InitialResidueName=wheat; InitialResidueType=wheat; InitialResidueMass=6000; InitialStandingFraction=0; InitialCPR=0; InitialCNR=80
              Plant canola: ResourceName=Canola
              Soil: ASCOrder=Kandosol; ASCSubOrder=Red; SoilType=SNSW; Site=Greenethorpe; NearestTown=Greenethorpe; Region=Central West Slopes and Plains; State=New South Wales; Country=Australia; ApsoilNumber=619-YP; Latitude=-33.995; Longitude=148.404; LocationAccuracy=Regional Soil Type; Comments=All CLL estimated
                DataSource=YP. Made by James Hunt, BCG modified version of  SW Slopes-Greenthorpe  from M. Robertson &  J. Kirkegaard (CSIRO PI), requested by Farmlink. CLL/AirDry data taken from SW measurements made by Tony Swan of CSIRO PI in R. Taylors   Finns  paddock at Greenthorpe 19 April 2007. DUL is estimated based on CLL and original soil. OC in top 1 m measured.
                Physical
                  Thickness  BD    AirDry  LL15  DUL   SAT
                  100        1.4   0.05    0.1   0.2   0.442
                  100        1.4   0.08    0.13  0.23  0.434
                  200        1.4   0.23    0.23  0.33  0.43
                  200        1.45  0.24    0.24  0.34  0.423
                  200        1.5   0.23    0.23  0.33  0.408
                  200        1.5   0.25    0.25  0.35  0.396
                  200        1.55  0.25    0.25  0.35  0.396
                  200        1.54  0.25    0.25  0.35  0.396
                  200        1.52  0.25    0.25  0.35  0.396
                  200        1.53  0.25    0.25  0.35  0.396
                  SoilCrop WheatSoil: same as Incomplete.OCP Agronomy.Canowindra_2015_Ex1b.Canowindra_2015_Ex1b.Canowindra_OCP_2015_Ex1b.paddock.soil.Physical.WheatSoil
                  SoilCrop BarleySoil: same as Incomplete.OCP Agronomy.Canowindra_2015_Ex1b.Canowindra_2015_Ex1b.Canowindra_OCP_2015_Ex1b.paddock.soil.Physical.BarleySoil
                  SoilCrop OatsSoil: same as Incomplete.OCP Agronomy.Canowindra_2015_Ex1b.Canowindra_2015_Ex1b.Canowindra_OCP_2015_Ex1b.paddock.soil.Physical.WheatSoil
                  SoilCrop CanolaSoil
                    LL=[0.1, 0.13, 0.23, 0.24, 0.23, 0.25, 0.25, 0.28, 0.31, 0.31]
                    KL=[0.06, 0.06, 0.06, 0.06, 0.06, 0.04, 0.04, 0.04, 0.02, 0.01]
                    XF=[1, 1, 1, 1, 1, 1, 1, 1, 1, 1]
                WaterBalance SoilWater: same as Incomplete.OCP Agronomy.Canowindra_2015_Ex1b.Canowindra_2015_Ex1b.Canowindra_OCP_2015_Ex1b.paddock.soil.SoilWater
                Nutrient
                Organic: same as Incomplete.OCP Agronomy.Canowindra_2015_Ex1b.Canowindra_2015_Ex1b.Canowindra_OCP_2015_Ex1b.paddock.soil.Organic
                Chemical: Thickness=[100, 100, 200, 200, 200, 200, 200, 200, 200, 200]; PH=[6.2, 5.9, 6.6, 6.8, 7, 7.1, 7.2, 7.3, 7.4, 7.4]; PHUnits=Water
                Water: Thickness=[100, 200, 300, 300, 300, 600]; InitialValues=[0.175, 0.237, 0.305, 0.314, 0.3, 0.3]; FilledFromTop=false
                Solute NO3: Thickness=[100, 100, 200, 200, 200, 200, 200, 200, 200, 200]; InitialValues=[47, 5, 4.5, 4, 3, 3, 3, 1, 1, 1]; InitialValuesUnits=ppm; WaterTableConcentration=0; D0=0; DepthConstant=0; MaxDepthSoluteAccessible=0; RunoffEffectivenessAtMovingSolute=0; MaxEffectiveRunoff=0
                Solute NH4: Thickness=[100, 100, 200, 200, 200, 200, 200, 200, 200, 200]; InitialValues=[3, 3, 3, 3, 2, 3, 4, 1, 1, 1]; InitialValuesUnits=ppm; WaterTableConcentration=0; D0=0; DepthConstant=0; MaxDepthSoluteAccessible=0; RunoffEffectivenessAtMovingSolute=0; MaxEffectiveRunoff=0
                Solute Urea: same as Incomplete.OCP Agronomy.Canowindra_2015_Ex1b.Canowindra_2015_Ex1b.Canowindra_OCP_2015_Ex1b.paddock.soil.Urea
                SoilTemperature Temperature
              MicroClimate: a_interception=0; b_interception=1; c_interception=0; d_interception=0; SoilHeatFluxFraction=0; MinimumHeightDiffForNewLayer=0; NightInterceptionFraction=0; ReferenceHeight=2
              Report DailyReport: same as Incomplete.OCP Agronomy.AlmaPark_2015_Ex2a.AlmaPark_2015_Ex2a.AlmaPark2015_Ex2a_base.paddock.DailyReport
              Report HarvestReport
              Report DailyBiomass: same as Incomplete.DP Agronomy.WaggaCR2008.WaggaWagga2008CR.Paddock.DailyBiomass
              Report SowingReport: EventNames=[Canola].Sowing
                VariableNames:
                  [Clock].Today
                  [Canola].SowingData.Cultivar
                  [IWeather].Latitude
                  [IWeather].Longitude
      Folder Canowindra_2018_Ex1a
        Experiment Canowindra_2018_Ex1a
          Factors
            Permutation
              Factor TOS_index
                CompositeFactor 1
                  Specifications:
                    [Sowing].Script.SowDate = 4-Apr
                    [Fertilise].Script.FertiliserDates = 4-Apr
                    [Irrigate].Script.irrigDate = 5-Apr
                    [Irrigate].Script.amount = 10.3
                CompositeFactor 2
                  Specifications:
                    [Sowing].Script.SowDate = 26-Apr
                    [Fertilise].Script.FertiliserDates = 26-Apr
                    [Irrigate].Script.irrigDate = 27-Apr
                    [Irrigate].Script.amount = 10.3
              Factor Cv
                Specification=[Sowing].Script.CultivarName = 44Y90_CL,45Y91_CL,Archer,ATR_Bonito,ATR_Stingray,ATR_Wahoo,IVT4510,NS_Diamond
              Factor Popn: Specification=[Sowing].Script.Population =  45
              Factor Fert
                CompositeFactor D3: Specifications=[Fertilise].Script.Amount = 26
                CompositeFactor D9: Specifications=[Fertilise].Script.Amount = 186
              Factor Irrig: Specification=[codes].Script.irrig_treat = nil
          Simulation Canowindra_OCP_2018
            Clock: Start=2018-03-01; End=2018-12-01
            Summary summaryfile
            Weather: FileName=met/65006.met
            SoilArbitrator
            Zone paddock: Area=1; Slope=0; AspectAngle=0; Altitude=50
              Folder manager
                Manager Reset on date
                  ResetDate = 29-Mar
                  ResetWater = Yes
                  ResetN = Yes
                  ResetSOM = No
                  script: same as in Incomplete.OCP Agronomy.Breeza_2014_Ex1.Breeza_2014_Ex1.Breeza_2014_Ex1_Base.paddock.manager.Reset on date
                Manager Sowing
                  SowDate = 4-Apr
                  CultivarName = Hyola575_CL
                  SowingDepth = 20
                  RowSpacing = 250
                  Population = 45
                  script: same as in Validation.Growth Experiments.Kojonup.Kojonup2013.Kojonup2013Base.paddock.SowingRule
                Manager Fertilise
                  FertiliserType = NH4N
                  FertiliserDates = 4-Apr
                  fert_criteria = 1000
                  Amount = 0
                  FertiliserDepth = 20
```csharp
using APSIM.Shared.Utilities;
using Models.PMF;
using Models.Core;
using Models.Soils;
using Models.Soils.Nutrients;
using System;
namespace Models
{
    [Serializable]
    public class Script : Model
    {
        [Link] Clock Clock;
        [Link] Fertiliser Fertiliser;
        [Link] INutrient nutrient;
        [Link] Summary sum;
        
        [Separator("A component to apply fertiliser on one or more dates on every year of the simulation")]

        [Description("Type of fertiliser to apply? ")] 
        [Display(Type = DisplayType.FertiliserType)]public string FertiliserType { get; set; }

        [Description("Enter the fertilisation dates as dd-mmm with comma separation (any year information entered will be ignored): ")] 
        public string[] FertiliserDates { get; set; } 

        [Description("Don't add fertiliser if N in top 2 layers exceeds (kg/ha) : ")]
        public double fert_criteria { get; set; }

        [Description("Amount of fertiliser to be applied each time(kg /ha)")] 
        public double Amount { get; set; }

        [Description("Depth (mm)")] public double FertiliserDepth { get; set; }
        
        [EventSubscribe("DoManagement")]
        private void OnDoManagement(object sender, EventArgs e)
        {
            foreach (string ddMMM in FertiliserDates)
            {
                if (DateUtilities.DatesEqual(ddMMM, Clock.Today))
                {
                    double soil_N = nutrient.NH4.kgha[0] + nutrient.NO3.kgha[0] + nutrient.NH4.kgha[1] + nutrient.NO3.kgha[1];
                    if (soil_N <= fert_criteria) 
                         Fertiliser.Apply(amount: Amount, type: FertiliserType, depth: FertiliserDepth);
                    else
                        sum.WriteMessage(this, "No fertilising as top two layers have " + soil_N.ToString() + "kg/ha N", MessageType.Diagnostic);
                }
            }
        }
    }
}
```
                Manager Irrigate: same as Incomplete.OCP Agronomy.Canowindra_2016_Ex1b.Canowindra_2016_Ex1b.Canowindra_OCP_2016_Ex1b.paddock.manager.Irrigate
                Manager codes: same as Incomplete.OCP Agronomy.Canowindra_2015_Ex1b.Canowindra_2015_Ex1b.Canowindra_OCP_2015_Ex1b.paddock.manager.codes
                Manager HarvestAfterDate: same as Incomplete.OCP Agronomy.Canowindra_2016_Ex1b.Canowindra_2016_Ex1b.Canowindra_OCP_2016_Ex1b.paddock.manager.HarvestAfterDate
              Fertiliser
              Manager Fertilise at sowing
                Crop = [canola]
                FertiliserType = NH4N
                Amount = 9.1
                script: same as in Validation.Growth Experiments.Kojonup.Kojonup2013.Kojonup2013Base.paddock.Fertilise at sowing
              Irrigation
              SurfaceOrganicMatter: InitialResidueName=wheat; InitialResidueType=wheat; InitialResidueMass=6000; InitialStandingFraction=0; InitialCPR=0; InitialCNR=80
              Plant canola: ResourceName=Canola
              Soil: ASCOrder=Kandosol; ASCSubOrder=Red; SoilType=SNSW; Site=Greenethorpe; NearestTown=Greenethorpe; Region=Central West Slopes and Plains; State=New South Wales; Country=Australia; ApsoilNumber=619-YP; Latitude=-33.995; Longitude=148.404; LocationAccuracy=Regional Soil Type; Comments=All CLL estimated
                DataSource=YP. Made by James Hunt, BCG modified version of  SW Slopes-Greenthorpe  from M. Robertson &  J. Kirkegaard (CSIRO PI), requested by Farmlink. CLL/AirDry data taken from SW measurements made by Tony Swan of CSIRO PI in R. Taylors   Finns  paddock at Greenthorpe 19 April 2007. DUL is estimated based on CLL and original soil. OC in top 1 m measured.
                Physical: same as Incomplete.OCP Agronomy.Canowindra_2016_Ex1b.Canowindra_2016_Ex1b.Canowindra_OCP_2016_Ex1b.paddock.soil.Physical
                WaterBalance SoilWater: same as Incomplete.OCP Agronomy.Canowindra_2015_Ex1b.Canowindra_2015_Ex1b.Canowindra_OCP_2015_Ex1b.paddock.soil.SoilWater
                Nutrient
                Organic: FOMCNRatio=40; CarbonUnits=Total
                  Thickness  Carbon  SoilCNRatio  FBiom  FInert  FOM
                  100        1.01    12.5         0.04   0.5     260.5874
                  100        0.3     12.5         0.02   0.5     220.5825
                  200        0.3     12.5         0.02   0.5     158.0542
                  200        0.2     12.5         0.01   0.6     113.2508
                  200        0.2     12.5         0.01   0.6     81.1478
                  200        0.1     12.5         0.01   0.6     58.1449
                  200        0.1     12.5         0.01   0.8     41.6626
                  200        0.1     12.5         0.01   0.8     29.8526
                  200        0.1     12.5         0.01   0.8     21.3903
                  200        0.1     12.5         0.01   1       15.3268
                Chemical: Thickness=[100, 100, 200, 200, 200, 200, 200, 200, 200, 200]; PH=[6.2, 5.9, 6.6, 6.8, 7, 7.1, 7.2, 7.3, 7.4, 7.4]; PHUnits=Water
                Water: Thickness=[100, 200, 300, 300, 300]; InitialValues=[0.107, 0.14, 0.23, 0.234, 0.201]; FilledFromTop=false
                Solute NO3: Thickness=[100, 100, 200, 200, 200, 200, 200, 200, 200, 200]; InitialValues=[21, 7, 5.5, 4, 3, 3, 3, 1, 1, 1]; InitialValuesUnits=ppm; WaterTableConcentration=0; D0=0; DepthConstant=0; MaxDepthSoluteAccessible=0; RunoffEffectivenessAtMovingSolute=0; MaxEffectiveRunoff=0
                Solute NH4: Thickness=[100, 100, 200, 200, 200, 200, 200, 200, 200, 200]; InitialValues=[2, 1, 1, 1, 0.5, 1.25, 2, 0.2, 0.2, 0.2]; InitialValuesUnits=ppm; WaterTableConcentration=0; D0=0; DepthConstant=0; MaxDepthSoluteAccessible=0; RunoffEffectivenessAtMovingSolute=0; MaxEffectiveRunoff=0
                Solute Urea: same as Incomplete.OCP Agronomy.Canowindra_2015_Ex1b.Canowindra_2015_Ex1b.Canowindra_OCP_2015_Ex1b.paddock.soil.Urea
                SoilTemperature Temperature
              MicroClimate: a_interception=0; b_interception=1; c_interception=0; d_interception=0; SoilHeatFluxFraction=0; MinimumHeightDiffForNewLayer=0; NightInterceptionFraction=0; ReferenceHeight=2
              Report DailyReport: same as Incomplete.OCP Agronomy.AlmaPark_2015_Ex2a.AlmaPark_2015_Ex2a.AlmaPark2015_Ex2a_base.paddock.DailyReport
              Report HarvestReport
              Report DailyBiomass: same as Incomplete.DP Agronomy.WaggaCR2008.WaggaWagga2008CR.Paddock.DailyBiomass
              Report SowingReport: EventNames=[Canola].Sowing
                VariableNames:
                  [Clock].Today
                  [Canola].SowingData.Cultivar
                  [IWeather].Latitude
                  [IWeather].Longitude
      Folder Condo_2014_Ex1
        Experiment Condo_2014_Ex1
          Factors
            Permutation
              Factor TOS_index
                CompositeFactor 1: Specifications=[Sowing].Script.SowDate = 1-Apr
                CompositeFactor 2: Specifications=[Sowing].Script.SowDate = 15-Apr
                CompositeFactor 3: Specifications=[Sowing].Script.SowDate = 28-Apr
                CompositeFactor 4: Specifications=[Sowing].Script.SowDate = 13-May
              Factor Cv
                Specification=[Sowing].Script.CultivarName = 43C80_CL,44Y87_CL,Hyola575_CL
              Factor Popn: Specification=[Sowing].Script.Population =  15,45
              Factor Fert: Specification=[codes].Script.fert_treat = nil
              Factor Irrig: Specification=[codes].Script.irrig_treat = nil
          Simulation Condo_OCP_2014
            Clock: Start=2014-03-01; End=2015-01-31
            Summary summaryfile
            Weather: FileName=met/50052_CombGSE.met
            SoilArbitrator
            Zone paddock: Area=1; Slope=0; AspectAngle=0; Altitude=50
              Folder manager
                Manager Reset on date
                  ResetDate = 28-Mar
                  ResetWater = Yes
                  ResetN = No
                  ResetSOM = No
                  script: same as in Incomplete.OCP Agronomy.Breeza_2014_Ex1.Breeza_2014_Ex1.Breeza_2014_Ex1_Base.paddock.manager.Reset on date
                Manager Sowing
                  SowDate = 06-Apr
                  CultivarName = Hyola575_CL
                  SowingDepth = 20
                  RowSpacing = 330
                  Population = 45
                  script: same as in Validation.Growth Experiments.Kojonup.Kojonup2013.Kojonup2013Base.paddock.SowingRule
                Manager codes
                  location = condo
                  TOS_index = 1
                  irrig_treat = nil
                  fert_treat =
                  trial_code = CSTA14COND2
```csharp
using Models.Soils;
using System;
using Models.Core;
using Models.PMF;
namespace Models
{
    [Serializable]
    [System.Xml.Serialization.XmlInclude(typeof(Model))]
    public class Script : Model
    {
        [Link] Clock Clock;

        [Description("location")]
        public string location { get; set; }

        [Description("Time of sowing")]
        public string TOS_index { get; set; }

        [Description("irrig_treat")]
        public string irrig_treat { get; set; }

        [Description("fert_treat")]
        public string fert_treat { get; set; }

        [Description("trial_code")]
        public string trial_code { get; set; }

        [EventSubscribe("StartOfSimulation")]
        private void OnSimulationCommencing(object sender, EventArgs e)
        {

        }
    }
}
```
                Manager HarvestAfterDate
                  HarvestDate = 22-Oct
                  script: same as in Validation.Growth Experiments.Kojonup.Kojonup2013.Kojonup2013Base.paddock.HarvestAfterDate
              Fertiliser
              Manager Fertilise at sowing: same as Incomplete.OCP Agronomy.Breeza_2016_Ex1a.Breeza_2016_Ex1a.Breeza_2016_Ex1_Base.paddock.Fertilise at sowing
              Irrigation
              SurfaceOrganicMatter: InitialResidueName=lucerne; InitialResidueType=lucerne; InitialResidueMass=4000; InitialStandingFraction=0; InitialCPR=0; InitialCNR=40
              Plant canola: ResourceName=Canola
              Soil condobolin: SoilType=SNSW; Latitude=0; Longitude=0; DataSource=John Kirkegaard; Comments=Red Kandosol
                Chemical: PHUnits=Water
                  Thickness=[100, 100, 100, 100, 100, 100, 100, 100, 100, 100, 100, 100, 100, 100, 100, 300]
                  PH=[5.5, 6.2, 6.6, 6.8, 7, 7.1, 7.2, 7.3, 7.4, 7.4, 7.6, 7.8, 8, 8.2, 8.3, 8.4]
                Physical
                  Thickness  BD     AirDry  LL15   DUL    SAT
                  100        1.3    0.023   0.07   0.21   0.489
                  100        1.45   0.018   0.094  0.27   0.433
                  100        1.43   0.025   0.122  0.275  0.44
                  100        1.39   0.041   0.209  0.28   0.455
                  100        1.42   0.048   0.237  0.327  0.444
                  100        1.45   0.055   0.261  0.364  0.433
                  100        1.45   0.054   0.256  0.339  0.433
                  100        1.45   0.053   0.245  0.315  0.433
                  100        1.51   0.061   0.257  0.319  0.41
                  100        1.57   0.069   0.268  0.322  0.388
                  100        1.585  0.069   0.275  0.325  0.382
                  100        1.6    0.07    0.28   0.328  0.376
                  100        1.66   0.071   0.285  0.33   0.354
                  100        1.72   0.071   0.29   0.332  0.333
                  100        1.71   0.067   0.29   0.33   0.335
                  300        1.7    0.064   0.293  0.328  0.338
                  SoilCrop WheatSoil
                    LL=[0.07, 0.094, 0.122, 0.209, 0.237, 0.261, 0.256, 0.245, 0.257, 0.268, 0.275, 0.28, 0.285, 0.29, 0.29, 0.293]
                    KL=[0.08, 0.08, 0.08, 0.08, 0.08, 0.08, 0.08, 0.08, 0.08, 0.07, 0.05, 0.03, 0.02, 0.02, 0.02, 0.02]
                    XF=[1, 1, 1, 1, 1, 1, 1, 1, 1, 0.7, 0.4, 0.3, 0.2, 0.2, 0.5, 0.5]
                  SoilCrop CanolaSoil: same as Incomplete.OCP Agronomy.Condo_2014_Ex1.Condo_2014_Ex1.Condo_OCP_2014.paddock.condobolin.Physical.WheatSoil
                WaterBalance SoilWater: SummerDate=1-Nov; SummerU=6; SummerCona=3.5; WinterDate=1-Apr; WinterU=6; WinterCona=3.5; DiffusConst=88; DiffusSlope=35.4; Salb=0.13; CN2Bare=72; CNRed=20; CNCov=0.8; PSIDul=-100
                  Thickness=[100, 100, 100, 100, 100, 100, 100, 100, 100, 100, 100, 100, 100, 100, 100, 300]
                  SWCON=[0.6, 0.6, 0.6, 0.6, 0.6, 0.6, 0.6, 0.6, 0.6, 0.6, 0.6, 0.6, 0.6, 0.6, 0.6, 0.6]
                Nutrient
                Organic: FOMCNRatio=10; CarbonUnits=Total
                  Thickness  Carbon  SoilCNRatio  FBiom  FInert  FOM
                  100        1.31    13.1         0.04   0.25    165.6176
                  100        1       13.1         0.02   0.28    140.1922
                  100        0.8     13.1         0.02   0.31    118.6702
                  100        0.2     13.1         0.02   0.75    100.4521
                  100        0.2     13.1         0.01   0.9     85.0309
                  100        0.2     13.1         0.01   0.95    71.9771
                  100        0.2     13.1         0.01   0.95    60.9273
                  100        0.15    13.1         0.01   0.95    51.5738
                  100        0.15    13.1         0.01   0.95    43.6563
                  100        0.1     13.1         0.01   0.95    36.9543
                  100        0.1     13.1         0.01   0.95    31.2811
                  100        0.1     13.1         0.01   0.99    26.4789
                  100        0.1     13.1         0.01   0.99    22.4139
                  100        0.1     13.1         0.01   0.99    18.973
                  100        0.1     13.1         0.01   0.99    16.0603
                  300        0.1     13.1         0.01   0.99    9.741
                Water: FilledFromTop=false
                  Thickness=[100, 100, 100, 100, 100, 100, 100, 100, 100, 100, 100, 100, 100, 100, 100, 300]
                  InitialValues=[0.11, 0.19, 0.19, 0.27, 0.27, 0.27, 0.27, 0.27, 0.27, 0.23, 0.23, 0.24, 0.26, 0.26, 0.26, 0.25]
                Solute NO3: InitialValuesUnits=ppm; WaterTableConcentration=0; D0=0; DepthConstant=0; MaxDepthSoluteAccessible=0; RunoffEffectivenessAtMovingSolute=0; MaxEffectiveRunoff=0
                  Thickness=[100, 100, 100, 100, 100, 100, 100, 100, 100, 100, 100, 100, 100, 100, 100, 300]
                  InitialValues=[23.0769, 6.8966, 6.993, 7.1942, 7.0423, 6.8966, 6.8966, 6.8966, 6.6225, 6.3694, 6.3091, 6.25, 3.012, 2.907, 2.924, 3.9216]
                Solute NH4: InitialValues=[0, 0, 0, 0, 0, 0, 0, 0, 0, 0, 0, 0, 0, 0, 0, 0]; InitialValuesUnits=ppm; WaterTableConcentration=0; D0=0; DepthConstant=0; MaxDepthSoluteAccessible=0; RunoffEffectivenessAtMovingSolute=0; MaxEffectiveRunoff=0
                  Thickness=[100, 100, 100, 100, 100, 100, 100, 100, 100, 100, 100, 100, 100, 100, 100, 300]
                Solute Urea: InitialValues=[0, 0, 0, 0, 0, 0, 0, 0, 0, 0, 0, 0, 0, 0, 0, 0]; InitialValuesUnits=kg/ha; WaterTableConcentration=0; D0=0; DepthConstant=0; MaxDepthSoluteAccessible=0; RunoffEffectivenessAtMovingSolute=0; MaxEffectiveRunoff=0
                  Thickness=[100, 100, 100, 100, 100, 100, 100, 100, 100, 100, 100, 100, 100, 100, 100, 300]
                SoilTemperature Temperature
              MicroClimate: a_interception=0; b_interception=1; c_interception=0; d_interception=0; SoilHeatFluxFraction=0; MinimumHeightDiffForNewLayer=0; NightInterceptionFraction=0; ReferenceHeight=2
              Report DailyReport: same as Incomplete.OCP Agronomy.AlmaPark_2015_Ex2a.AlmaPark_2015_Ex2a.AlmaPark2015_Ex2a_base.paddock.DailyReport
              Report HarvestReport
              Report DailyBiomass: same as Incomplete.DP Agronomy.WaggaCR2008.WaggaWagga2008CR.Paddock.DailyBiomass
              Report SowingReport: EventNames=[Canola].Sowing
                VariableNames:
                  [Clock].Today
                  [Canola].SowingData.Cultivar
                  [IWeather].Latitude
                  [IWeather].Longitude
      Folder Condo_2015_Ex1a
        Experiment Condo_2015_Ex1a
          Factors
            Permutation
              Factor TOS_index
                CompositeFactor 1: Specifications=[Sowing].Script.SowDate = 17-Apr
                CompositeFactor 2: Specifications=[Sowing].Script.SowDate = 4-May
                CompositeFactor 3: Specifications=[Sowing].Script.SowDate = 19-May
              Factor Cv
                Specification=[Sowing].Script.CultivarName = 43C80_CL,44Y89_CL,45Y86_CL,45Y88_CL,Hyola575_CL,Hyola577_CL
              Factor Popn: Specification=[Sowing].Script.Population =  45
              Factor Fert: Specification=[codes].Script.fert_treat = nil
              Factor Irrig: Specification=[codes].Script.irrig_treat = nil
          Simulation condo_OCP_2015_Ex1a
            Clock: Start=2015-03-01; End=2015-12-01
            Summary summaryfile
            Weather: FileName=met/50052_CombGSE.met
            SoilArbitrator
            Zone paddock: Area=1; Slope=0; AspectAngle=0; Altitude=50
              Folder manager
                Manager Reset on date
                  ResetDate = 27-Apr
                  ResetWater = Yes
                  ResetN = No
                  ResetSOM = No
                  script: same as in Incomplete.OCP Agronomy.Breeza_2014_Ex1.Breeza_2014_Ex1.Breeza_2014_Ex1_Base.paddock.manager.Reset on date
                Manager Sowing
                  SowDate = 06-Apr
                  CultivarName = Hyola575_CL
                  SowingDepth = 20
                  RowSpacing = 250
                  Population = 44
                  script: same as in Validation.Growth Experiments.Kojonup.Kojonup2013.Kojonup2013Base.paddock.SowingRule
                Manager Irrigate
                  irrigDates = 26-Mar, 29-Apr
                  amount = 13
                  script: same as in Validation.Growth Experiments.Wagga.Wagga2008.WaggaWagga2008.Paddock.Irrigate
                Manager codes
                  location = Condo
                  TOS_index = 1
                  fert_treat =
                  irrig_treat = nil
                  trial_code = CSTA15COND2
```csharp
using Models.Soils;
using System;
using Models.Core;
using Models.PMF;
namespace Models
{
    [Serializable]
    [System.Xml.Serialization.XmlInclude(typeof(Model))]
    public class Script : Model
    {
        [Link] Clock Clock;

        [Description("location")]
        public string location { get; set; }

        [Description("Time of sowing")]
        public string TOS_index { get; set; }

        [Description("fert_treat")]
        public string fert_treat { get; set; }

        [Description("irrig_treat")]
        public string irrig_treat { get; set; }

        [Description("trial_code")]
        public string trial_code { get; set; }

        [EventSubscribe("StartOfSimulation")]
        private void OnSimulationCommencing(object sender, EventArgs e)
        {

        }
    }
}
```
                Manager HarvestAfterDate
                  HarvestDate = 25-Oct
                  script: same as in Validation.Growth Experiments.Kojonup.Kojonup2013.Kojonup2013Base.paddock.HarvestAfterDate
              Fertiliser
              Manager Fertilise at sowing: same as Incomplete.OCP Agronomy.Breeza_2016_Ex1a.Breeza_2016_Ex1a.Breeza_2016_Ex1_Base.paddock.Fertilise at sowing
              Irrigation
              SurfaceOrganicMatter: InitialResidueName=lucerne; InitialResidueType=lucerne; InitialResidueMass=4000; InitialStandingFraction=0; InitialCPR=0; InitialCNR=40
              Plant canola: ResourceName=Canola
              Soil condobolin: SoilType=SNSW; Latitude=0; Longitude=0; DataSource=John Kirkegaard; Comments=Red Kandosol
                Chemical: same as Incomplete.OCP Agronomy.Condo_2014_Ex1.Condo_2014_Ex1.Condo_OCP_2014.paddock.condobolin.Chemical
                Physical
                  Thickness  BD     AirDry  LL15   DUL    SAT
                  100        1.3    0.023   0.07   0.21   0.489
                  100        1.45   0.018   0.094  0.27   0.433
                  100        1.43   0.025   0.122  0.275  0.44
                  100        1.39   0.041   0.209  0.28   0.455
                  100        1.42   0.048   0.237  0.327  0.444
                  100        1.45   0.055   0.261  0.364  0.433
                  100        1.45   0.054   0.256  0.339  0.433
                  100        1.45   0.053   0.245  0.315  0.433
                  100        1.51   0.061   0.257  0.319  0.41
                  100        1.57   0.069   0.268  0.322  0.388
                  100        1.585  0.069   0.275  0.325  0.382
                  100        1.6    0.07    0.28   0.328  0.376
                  100        1.66   0.071   0.285  0.33   0.354
                  100        1.72   0.071   0.29   0.332  0.338
                  100        1.71   0.067   0.29   0.33   0.335
                  300        1.7    0.064   0.293  0.328  0.338
                  SoilCrop WheatSoil: same as Incomplete.OCP Agronomy.Condo_2014_Ex1.Condo_2014_Ex1.Condo_OCP_2014.paddock.condobolin.Physical.WheatSoil
                  SoilCrop CanolaSoil: same as Incomplete.OCP Agronomy.Condo_2014_Ex1.Condo_2014_Ex1.Condo_OCP_2014.paddock.condobolin.Physical.WheatSoil
                WaterBalance SoilWater: same as Incomplete.OCP Agronomy.Condo_2014_Ex1.Condo_2014_Ex1.Condo_OCP_2014.paddock.condobolin.SoilWater
                Nutrient
                Organic: same as Incomplete.OCP Agronomy.Condo_2014_Ex1.Condo_2014_Ex1.Condo_OCP_2014.paddock.condobolin.Organic
                Water: FilledFromTop=false
                  Thickness=[100, 100, 100, 100, 100, 100, 100, 100, 100, 100, 100, 100, 100, 100, 100, 300]
                  InitialValues=[0.086, 0.135, 0.135, 0.205, 0.205, 0.205, 0.174, 0.174, 0.174, 0.175, 0.175, 0.175, 0.196, 0.196, 0.196, 0.197]
                Solute NO3: InitialValues=[40, 9, 9, 8, 8, 8, 11, 11, 11, 10, 10, 10, 6, 6, 6, 5]; InitialValuesUnits=ppm; WaterTableConcentration=0; D0=0; DepthConstant=0; MaxDepthSoluteAccessible=0; RunoffEffectivenessAtMovingSolute=0; MaxEffectiveRunoff=0
                  Thickness=[100, 100, 100, 100, 100, 100, 100, 100, 100, 100, 100, 100, 100, 100, 100, 300]
                Solute NH4: same as Incomplete.OCP Agronomy.Condo_2014_Ex1.Condo_2014_Ex1.Condo_OCP_2014.paddock.condobolin.NH4
                Solute Urea: same as Incomplete.OCP Agronomy.Condo_2014_Ex1.Condo_2014_Ex1.Condo_OCP_2014.paddock.condobolin.Urea
                SoilTemperature Temperature
              MicroClimate: a_interception=0; b_interception=1; c_interception=0; d_interception=0; SoilHeatFluxFraction=0; MinimumHeightDiffForNewLayer=0; NightInterceptionFraction=0; ReferenceHeight=2
              Report DailyReport: same as Incomplete.OCP Agronomy.AlmaPark_2015_Ex2a.AlmaPark_2015_Ex2a.AlmaPark2015_Ex2a_base.paddock.DailyReport
              Report HarvestReport
              Report DailyBiomass: same as Incomplete.DP Agronomy.WaggaCR2008.WaggaWagga2008CR.Paddock.DailyBiomass
              Report SowingReport: EventNames=[Canola].Sowing
                VariableNames:
                  [Clock].Today
                  [Canola].SowingData.Cultivar
                  [IWeather].Latitude
                  [IWeather].Longitude
      Folder Condo_2015_Ex2b
        Experiment Condo_2015_Ex2b
          Factors
            Permutation
              Factor TOS_index
                CompositeFactor 1: Specifications=[Sowing].Script.SowDate = 17-Apr
                CompositeFactor 2: Specifications=[Sowing].Script.SowDate = 4-May
              Factor Cv: Specification=[Sowing].Script.CultivarName = 45Y88_CL,Hyola575_CL
              Factor Popn: Specification=[Sowing].Script.Population =  15,45
              Factor Fert: Specification=[codes].Script.fert_treat = nil
              Factor Irrig: Specification=[codes].Script.irrig_treat = dry,wet
              Memo Question
                Strange values in the PAWC column

                Need to determine what wet and dry mean here. Can't work it out from the original sim. It may be initial water
          Simulation condo_OCP_2015_ex2b
            Clock: Start=2015-03-01; End=2015-12-01
            Summary summaryfile
            Weather: FileName=met/50052_CombGSE.met
            SoilArbitrator
            Zone paddock: Area=1; Slope=0; AspectAngle=0; Altitude=50
              Folder manager
                Manager Reset on date
                  ResetDate = 15-Apr
                  ResetWater = Yes
                  ResetN = Yes
                  ResetSOM = No
                  script: same as in Incomplete.OCP Agronomy.Breeza_2014_Ex1.Breeza_2014_Ex1.Breeza_2014_Ex1_Base.paddock.manager.Reset on date
                Manager Sowing
                  SowDate = 06-Apr
                  CultivarName = Hyola575_CL
                  SowingDepth = 20
                  RowSpacing = 250
                  Population = 15
                  script: same as in Validation.Growth Experiments.Kojonup.Kojonup2013.Kojonup2013Base.paddock.SowingRule
                Manager codes
                  location = Condo
                  TOS_index = 1
                  irrig_treat = dry
                  fert_treat =
                  trial_code = CSTB15COND2
                  script: same as in Incomplete.OCP Agronomy.Condo_2014_Ex1.Condo_2014_Ex1.Condo_OCP_2014.paddock.manager.codes
                Manager HarvestAfterDate
                  HarvestDate = 16-Oct
                  script: same as in Validation.Growth Experiments.Kojonup.Kojonup2013.Kojonup2013Base.paddock.HarvestAfterDate
              Fertiliser
              Manager Fertilise at sowing: same as Incomplete.OCP Agronomy.Breeza_2016_Ex1a.Breeza_2016_Ex1a.Breeza_2016_Ex1_Base.paddock.Fertilise at sowing
              Irrigation
              SurfaceOrganicMatter: InitialResidueName=lucerne; InitialResidueType=lucerne; InitialResidueMass=4000; InitialStandingFraction=0; InitialCPR=0; InitialCNR=40
              Plant canola: ResourceName=Canola
              Soil condobolin: SoilType=SNSW; Latitude=0; Longitude=0; DataSource=John Kirkegaard; Comments=Red Kandosol
                Chemical: same as Incomplete.OCP Agronomy.Condo_2014_Ex1.Condo_2014_Ex1.Condo_OCP_2014.paddock.condobolin.Chemical
                Physical: same as Incomplete.OCP Agronomy.Condo_2014_Ex1.Condo_2014_Ex1.Condo_OCP_2014.paddock.condobolin.Physical
                WaterBalance SoilWater: same as Incomplete.OCP Agronomy.Condo_2014_Ex1.Condo_2014_Ex1.Condo_OCP_2014.paddock.condobolin.SoilWater
                Nutrient
                Organic: same as Incomplete.OCP Agronomy.Condo_2014_Ex1.Condo_2014_Ex1.Condo_OCP_2014.paddock.condobolin.Organic
                Water: FilledFromTop=false
                  Thickness=[100, 100, 100, 100, 100, 100, 100, 100, 100, 100, 100, 100, 100, 100, 100, 300]
                  InitialValues=[0.114, 0.199, 0.199, 0.333, 0.333, 0.333, 0.282, 0.282, 0.282, 0.267, 0.267, 0.267, 0.249, 0.249, 0.249, 0.22]
                Solute NO3: InitialValuesUnits=ppm; WaterTableConcentration=0; D0=0; DepthConstant=0; MaxDepthSoluteAccessible=0; RunoffEffectivenessAtMovingSolute=0; MaxEffectiveRunoff=0
                  Thickness=[100, 100, 100, 100, 100, 100, 100, 100, 100, 100, 100, 100, 100, 100, 100, 300]
                  InitialValues=[27.6438, 4.5731, 4.6371, 6.3317, 6.1979, 6.0697, 8.7669, 8.7669, 8.4185, 6.2287, 6.1697, 6.1119, 3.5789, 3.4541, 3.4743, 2.3727]
                Solute NH4: same as Incomplete.OCP Agronomy.Condo_2014_Ex1.Condo_2014_Ex1.Condo_OCP_2014.paddock.condobolin.NH4
                Solute Urea: same as Incomplete.OCP Agronomy.Condo_2014_Ex1.Condo_2014_Ex1.Condo_OCP_2014.paddock.condobolin.Urea
                SoilTemperature Temperature
              MicroClimate: a_interception=0; b_interception=1; c_interception=0; d_interception=0; SoilHeatFluxFraction=0; MinimumHeightDiffForNewLayer=0; NightInterceptionFraction=0; ReferenceHeight=2
              Report SowingReport: EventNames=[Canola].Sowing
                VariableNames:
                  [Clock].Today
                  [Canola].SowingData.Cultivar
                  [IWeather].Latitude
                  [IWeather].Longitude
            Report DailyReport: same as Incomplete.OCP Agronomy.AlmaPark_2015_Ex2a.AlmaPark_2015_Ex2a.AlmaPark2015_Ex2a_base.paddock.DailyReport
            Report HarvestReport
            Report DailyBiomass: same as Incomplete.DP Agronomy.WaggaCR2008.WaggaWagga2008CR.Paddock.DailyBiomass
      Folder Condo_2016_Ex2
        Experiment Condo_2016_Ex2
          Factors
            Permutation
              Factor TOS_index
                CompositeFactor 1
                  Specifications:
                    [Sowing].Script.SowDate = 6-Apr
                    [FertiliseUF].Script.FertiliserDates = 6-apr
                    [FertiliseTD].Script.FertiliserDates = 6-may
                CompositeFactor 2
                  Specifications:
                    [Sowing].Script.SowDate = 20-Apr
                    [FertiliseUF].Script.FertiliserDates = 20-apr
                    [FertiliseTD].Script.FertiliserDates = 25-may
              Factor Cv
                Specification=[Sowing].Script.CultivarName = 44Y89_CL,Archer,ATR_Stingray,ATR_Wahoo
              Factor Popn: Specification=[Sowing].Script.Population =  45
              Factor Fert
                CompositeFactor nil
                  Specifications:
                    [FertiliseUF].Script.Amount = 0
                    [FertiliseTD].Script.Amount = 0
                CompositeFactor up_front
                  Specifications:
                    [FertiliseUF].Script.Amount = 125
                    [FertiliseTD].Script.Amount = 0
                CompositeFactor top_dress
                  Specifications:
                    [FertiliseUF].Script.Amount = 0
                    [FertiliseTD].Script.Amount = 125
              Factor Irrig
                CompositeFactor dry: Specifications=[Irrigate].Script.amount = 0
                CompositeFactor wet
                  Specifications:
                    [Irrigate].Script.irrigDates = 16-Mar,25-Mar
                    [Irrigate].Script.amount = 25
              Memo Question
                There seems to be different soils in the wet experiments
          Simulation condo_OCP_2016_Ex2
            Clock: Start=2016-03-01; End=2016-12-01
            Summary summaryfile
            Weather: FileName=met/50052_CombGSE.met
            SoilArbitrator
            Zone paddock: Area=1; Slope=0; AspectAngle=0; Altitude=50
              Folder manager
                Manager Reset on date
                  ResetDate = 4-Apr
                  ResetWater = Yes
                  ResetN = No
                  ResetSOM = No
                  script: same as in Incomplete.OCP Agronomy.Breeza_2014_Ex1.Breeza_2014_Ex1.Breeza_2014_Ex1_Base.paddock.manager.Reset on date
                Manager Sowing: same as Incomplete.OCP Agronomy.Condo_2015_Ex1a.Condo_2015_Ex1a.condo_OCP_2015_Ex1a.paddock.manager.Sowing
                Manager FertiliseUF
                  FertiliserType = UreaN
                  FertiliserDates = 6-Dec
                  fert_criteria = 1000
                  Amount = 0
                  FertiliserDepth = 50
                  script: same as in Incomplete.OCP Agronomy.Canowindra_2018_Ex1a.Canowindra_2018_Ex1a.Canowindra_OCP_2018.paddock.manager.Fertilise
                Manager FertiliseTD: same as Incomplete.OCP Agronomy.Condo_2016_Ex2.Condo_2016_Ex2.condo_OCP_2016_Ex2.paddock.manager.FertiliseUF
                Manager Irrigate
                  irrigDates = 16-Mar, 23-Mar
                  amount = 0
                  script: same as in Validation.Growth Experiments.Wagga.Wagga2008.WaggaWagga2008.Paddock.Irrigate
                Manager Irrigate1
                  irrigDates = 1-Apr
                  amount = 22
                  script: same as in Validation.Growth Experiments.Wagga.Wagga2008.WaggaWagga2008.Paddock.Irrigate
                Manager Irrigate2
                  irrigDates = 12-Apr
                  amount = 12
                  script: same as in Validation.Growth Experiments.Wagga.Wagga2008.WaggaWagga2008.Paddock.Irrigate
                Manager Irrigate3
                  irrigDates = 28-Apr
                  amount = 32
                  script: same as in Validation.Growth Experiments.Wagga.Wagga2008.WaggaWagga2008.Paddock.Irrigate
                Manager codes
                  location = Condo
                  TOS_index = 1
                  irrig_treat = dry
                  fert_treat =
                  trial_code = CSTB16COND2
                  script: same as in Incomplete.OCP Agronomy.Condo_2014_Ex1.Condo_2014_Ex1.Condo_OCP_2014.paddock.manager.codes
                Manager HarvestAfterDate
                  HarvestDate = 16-Nov
                  script: same as in Validation.Growth Experiments.Kojonup.Kojonup2013.Kojonup2013Base.paddock.HarvestAfterDate
              Fertiliser
              Manager Fertilise at sowing: same as Incomplete.OCP Agronomy.Breeza_2016_Ex1a.Breeza_2016_Ex1a.Breeza_2016_Ex1_Base.paddock.Fertilise at sowing
              Irrigation
              SurfaceOrganicMatter: InitialResidueName=wheat; InitialResidueType=wheat; InitialResidueMass=6000; InitialStandingFraction=0; InitialCPR=0; InitialCNR=80
              Plant canola: ResourceName=Canola
              Soil condobolin: SoilType=SNSW; Latitude=0; Longitude=0; DataSource=John Kirkegaard; Comments=Red Kandosol
                Chemical: same as Incomplete.OCP Agronomy.Condo_2014_Ex1.Condo_2014_Ex1.Condo_OCP_2014.paddock.condobolin.Chemical
                Physical: same as Incomplete.OCP Agronomy.Condo_2014_Ex1.Condo_2014_Ex1.Condo_OCP_2014.paddock.condobolin.Physical
                WaterBalance SoilWater: same as Incomplete.OCP Agronomy.Condo_2014_Ex1.Condo_2014_Ex1.Condo_OCP_2014.paddock.condobolin.SoilWater
                Nutrient
                Organic: FOMCNRatio=10; CarbonUnits=Total
                  Thickness  Carbon  SoilCNRatio  FBiom  FInert  FOM
                  100        1.08    13.1         0.04   0.25    165.6176
                  100        0.6     13.1         0.02   0.28    140.1922
                  100        0.4     13.1         0.02   0.31    118.6702
                  100        0.2     13.1         0.02   0.75    100.4521
                  100        0.2     13.1         0.01   0.9     85.0309
                  100        0.2     13.1         0.01   0.95    71.9771
                  100        0.2     13.1         0.01   0.95    60.9273
                  100        0.15    13.1         0.01   0.95    51.5738
                  100        0.15    13.1         0.01   0.95    43.6563
                  100        0.1     13.1         0.01   0.95    36.9543
                  100        0.1     13.1         0.01   0.95    31.2811
                  100        0.1     13.1         0.01   0.99    26.4789
                  100        0.1     13.1         0.01   0.99    22.4139
                  100        0.1     13.1         0.01   0.99    18.973
                  100        0.1     13.1         0.01   0.99    16.0603
                  300        0.1     13.1         0.01   0.99    9.741
                Water: FilledFromTop=false
                  Thickness=[100, 100, 100, 100, 100, 100, 100, 100, 100, 100, 100, 100, 100, 100, 100, 300]
                  InitialValues=[0.14, 0.291, 0.291, 0.364, 0.364, 0.364, 0.312, 0.312, 0.312, 0.305, 0.305, 0.305, 0.293, 0.293, 0.293, 0.29]
                Solute NO3: InitialValuesUnits=ppm; WaterTableConcentration=0; D0=0; DepthConstant=0; MaxDepthSoluteAccessible=0; RunoffEffectivenessAtMovingSolute=0; MaxEffectiveRunoff=0
                  Thickness=[100, 100, 100, 100, 100, 100, 100, 100, 100, 100, 100, 100, 100, 100, 100, 300]
                  InitialValues=[39.7, 10.8, 10.8, 8.5, 8.5, 8.5, 12.2, 12.2, 12.2, 9.8, 9.8, 9.8, 6, 6, 6, 4.2]
                Solute NH4: InitialValues=[1.5, 1, 1, 1, 1, 1, 1, 1, 1, 1, 1, 1, 1, 1, 1, 1]; InitialValuesUnits=ppm; WaterTableConcentration=0; D0=0; DepthConstant=0; MaxDepthSoluteAccessible=0; RunoffEffectivenessAtMovingSolute=0; MaxEffectiveRunoff=0
                  Thickness=[100, 100, 100, 100, 100, 100, 100, 100, 100, 100, 100, 100, 100, 100, 100, 300]
                Solute Urea: same as Incomplete.OCP Agronomy.Condo_2014_Ex1.Condo_2014_Ex1.Condo_OCP_2014.paddock.condobolin.Urea
                SoilTemperature Temperature
              MicroClimate: a_interception=0; b_interception=1; c_interception=0; d_interception=0; SoilHeatFluxFraction=0; MinimumHeightDiffForNewLayer=0; NightInterceptionFraction=0; ReferenceHeight=2
              Report DailyReport: same as Incomplete.OCP Agronomy.AlmaPark_2015_Ex2a.AlmaPark_2015_Ex2a.AlmaPark2015_Ex2a_base.paddock.DailyReport
              Report HarvestReport
              Report DailyBiomass: same as Incomplete.DP Agronomy.WaggaCR2008.WaggaWagga2008CR.Paddock.DailyBiomass
              Report SowingReport: EventNames=[Canola].Sowing
                VariableNames:
                  [Clock].Today
                  [Canola].SowingData.Cultivar
                  [IWeather].Latitude
                  [IWeather].Longitude
      Folder Condo_2017_Ex1c
        Experiment Condo_2017_Ex1c
          Factors
            Permutation
              Factor TOS_index
                CompositeFactor 1: Specifications=[Sowing].Script.SowDate = 6-Apr
                CompositeFactor 2: Specifications=[Sowing].Script.SowDate = 20-Apr
              Factor Cv
                Specification=[Sowing].Script.CultivarName = Archer,ATR_Stingray,ATR_Wahoo,NS_Diamond
              Factor Popn: Specification=[Sowing].Script.Population =  45
              Factor Fert
                CompositeFactor D5: Specifications=[Fertilise1].Script.Amount = 0
                CompositeFactor D9: Specifications=[Fertilise1].Script.Amount = 100
              Factor Irrig
                CompositeFactor dry
                  Specifications:
                    [Irrigate30].Script.amount = 0
                    [Irrigate15].Script.amount = 0
                CompositeFactor wet
                  Specifications:
                    [Irrigate30].Script.irrigDates = 9-Mar,28-Mar,20-Jun
                    [Irrigate30].Script.amount = 30
                    [Irrigate15].Script.irrigDates = 15-Aug,1-Sep,5-Sep,20-Sep
                    [Irrigate15].Script.amount = 15
              Memo Question
                Original Simulation gives no clue to wet or dry meaning
              Memo Question1
                Original Simulation gives no clue to the meaning of D5,D9
          Simulation condo_OCP_2017_Ex1c
            Clock: Start=2017-03-01; End=2017-12-01
            Summary summaryfile
            Weather: FileName=met/50052_CombGSE.met
            SoilArbitrator
            Zone paddock: Area=1; Slope=0; AspectAngle=0; Altitude=50
              Folder manager
                Manager Reset on date
                  ResetDate = 4-Apr
                  ResetWater = Yes
                  ResetN = Yes
                  ResetSOM = No
                  script: same as in Incomplete.OCP Agronomy.Breeza_2014_Ex1.Breeza_2014_Ex1.Breeza_2014_Ex1_Base.paddock.manager.Reset on date
                Manager Sowing: same as Incomplete.OCP Agronomy.AlmaPark_2015_Ex2a.AlmaPark_2015_Ex2a.AlmaPark2015_Ex2a_base.paddock.manager.Sowing
                Manager Fertilise
                  FertiliserType = UreaN
                  FertiliserDates = 5-Apr
                  fert_criteria = 1000
                  Amount = 50
                  FertiliserDepth = 50
                  script: same as in Incomplete.OCP Agronomy.Canowindra_2018_Ex1a.Canowindra_2018_Ex1a.Canowindra_OCP_2018.paddock.manager.Fertilise
                Manager Fertilise1
                  FertiliserType = UreaN
                  FertiliserDates = 18-May
                  fert_criteria = 1000
                  Amount = 0
                  FertiliserDepth = 50
                  script: same as in Incomplete.OCP Agronomy.Canowindra_2018_Ex1a.Canowindra_2018_Ex1a.Canowindra_OCP_2018.paddock.manager.Fertilise
                Manager Irrigate
                  irrigDate = 8-Mar
                  amount = 30
```csharp
using Models.Soils;
using System.Collections.Generic;
using System;
using Models.Core;
using APSIM.Shared.Utilities;
namespace Models
{
    [Serializable]
    [System.Xml.Serialization.XmlInclude(typeof(Model))]
    public class Script : Model
    {
        [Link] Clock clock;    
           [Link] Irrigation irrigation;

           [Description("Date for irrigation")] 
        public string irrigDate { get; set; }

        [Description("Amount of irrigation (mm)")]
        public double amount {get; set; }

        [EventSubscribe("DoManagement")]
        private void OnDoManagement(object sender, EventArgs e)
        {
            string[] dates = irrigDate.Split(',');
            foreach (string ddMMM in dates)
            {
                if (DateUtilities.DatesEqual(ddMMM, clock.Today))
                    irrigation.Apply(amount: amount);
            }
        }
    }
}
```
                Manager Irrigate1
                  irrigDate = 13-Apr
                  amount = 15
                  script: same as in Incomplete.OCP Agronomy.Condo_2017_Ex1c.Condo_2017_Ex1c.condo_OCP_2017_Ex1c.paddock.manager.Irrigate
                Manager codes
                  location = Condo
                  TOS_index = 1
                  irrig_treat = dry
                  trial_code = CSTB17COND2
                  fert_code = D5
```csharp
using Models.Soils;
using System;
using Models.Core;
using Models.PMF;
namespace Models
{
    [Serializable]
    [System.Xml.Serialization.XmlInclude(typeof(Model))]
    public class Script : Model
    {
        [Link] Clock Clock;

        [Description("location")]
        public string location { get; set; }

        [Description("Time of sowing")]
        public string TOS_index { get; set; }

        [Description("irrig_treat")]
        public string irrig_treat { get; set; }

        [Description("trial_code")]
        public string trial_code { get; set; }

        [Description("fert_code")]
        public string fert_code { get; set; }

        [EventSubscribe("StartOfSimulation")]
        private void OnSimulationCommencing(object sender, EventArgs e)
        {

        }
    }
}
```
                Memo Question
                  Why reset water after an irrigation?
                Manager Irrigate30
                  irrigDates = 6-Dec
                  amount = 0
                  script: same as in Validation.Growth Experiments.Wagga.Wagga2008.WaggaWagga2008.Paddock.Irrigate
                Manager Irrigate15
                  irrigDates = 6-Dec
                  amount = 15
                  script: same as in Validation.Growth Experiments.Wagga.Wagga2008.WaggaWagga2008.Paddock.Irrigate
                Manager HarvestAfterDate: same as Incomplete.OCP Agronomy.Canowindra_2016_Ex1b.Canowindra_2016_Ex1b.Canowindra_OCP_2016_Ex1b.paddock.manager.HarvestAfterDate
              Fertiliser
              Manager Fertilise at sowing: same as Incomplete.OCP Agronomy.Breeza_2016_Ex1a.Breeza_2016_Ex1a.Breeza_2016_Ex1_Base.paddock.Fertilise at sowing
              Irrigation
              SurfaceOrganicMatter: InitialResidueName=wheat; InitialResidueType=wheat; InitialResidueMass=6000; InitialStandingFraction=0; InitialCPR=0; InitialCNR=80
              Plant canola: ResourceName=Canola
              Soil condobolin: SoilType=SNSW; Latitude=0; Longitude=0; DataSource=John Kirkegaard; Comments=Red Kandosol
                Chemical: PHUnits=Water
                  Thickness=[100, 100, 100, 100, 100, 100, 100, 100, 100, 100, 100, 100, 100, 100, 100, 300]
                  PH=[4.7, 4.5, 4.5, 6.2811, 6.4622, 6.5527, 6.6433, 6.7338, 6.8244, 6.8244, 7.0054, 7.1865, 7.3676, 7.5487, 7.6392, 7.7297]
                Physical: same as Incomplete.OCP Agronomy.Condo_2014_Ex1.Condo_2014_Ex1.Condo_OCP_2014.paddock.condobolin.Physical
                WaterBalance SoilWater: same as Incomplete.OCP Agronomy.Condo_2014_Ex1.Condo_2014_Ex1.Condo_OCP_2014.paddock.condobolin.SoilWater
                Nutrient
                Organic: FOMCNRatio=10; CarbonUnits=Total
                  Thickness  Carbon  SoilCNRatio  FBiom  FInert  FOM
                  100        1.33    13.1         0.04   0.25    165.6176
                  100        0.73    13.1         0.02   0.28    140.1922
                  100        0.73    13.1         0.02   0.31    118.6702
                  100        0.2     13.1         0.02   0.75    100.4521
                  100        0.2     13.1         0.01   0.9     85.0309
                  100        0.2     13.1         0.01   0.95    71.9771
                  100        0.2     13.1         0.01   0.95    60.9273
                  100        0.15    13.1         0.01   0.95    51.5738
                  100        0.15    13.1         0.01   0.95    43.6563
                  100        0.1     13.1         0.01   0.95    36.9543
                  100        0.1     13.1         0.01   0.95    31.2811
                  100        0.1     13.1         0.01   0.99    26.4789
                  100        0.1     13.1         0.01   0.99    22.4139
                  100        0.1     13.1         0.01   0.99    18.973
                  100        0.1     13.1         0.01   0.99    16.0603
                  300        0.1     13.1         0.01   0.99    9.741
                Water: Thickness=[100, 200, 300, 300, 300, 600]; InitialValues=[0.149, 0.235, 0.323, 0.356, 0.333, 0.333]; FilledFromTop=false
                Solute NO3: InitialValues=[12, 5, 5, 2, 2, 2, 2, 2, 2, 2, 2, 2, 1, 1, 1, 1]; InitialValuesUnits=ppm; WaterTableConcentration=0; D0=0; DepthConstant=0; MaxDepthSoluteAccessible=0; RunoffEffectivenessAtMovingSolute=0; MaxEffectiveRunoff=0
                  Thickness=[100, 100, 100, 100, 100, 100, 100, 100, 100, 100, 100, 100, 100, 100, 100, 300]
                Solute NH4: InitialValues=[2, 2, 2, 1, 1, 1, 1, 1, 1, 1, 1, 1, 0.5, 0.5, 0.5, 0.5]; InitialValuesUnits=ppm; WaterTableConcentration=0; D0=0; DepthConstant=0; MaxDepthSoluteAccessible=0; RunoffEffectivenessAtMovingSolute=0; MaxEffectiveRunoff=0
                  Thickness=[100, 100, 100, 100, 100, 100, 100, 100, 100, 100, 100, 100, 100, 100, 100, 300]
                Solute Urea: same as Incomplete.OCP Agronomy.Condo_2014_Ex1.Condo_2014_Ex1.Condo_OCP_2014.paddock.condobolin.Urea
                SoilTemperature Temperature
              MicroClimate: a_interception=0; b_interception=1; c_interception=0; d_interception=0; SoilHeatFluxFraction=0; MinimumHeightDiffForNewLayer=0; NightInterceptionFraction=0; ReferenceHeight=2
              Report DailyReport: same as Incomplete.OCP Agronomy.AlmaPark_2015_Ex2a.AlmaPark_2015_Ex2a.AlmaPark2015_Ex2a_base.paddock.DailyReport
              Report HarvestReport
              Report DailyBiomass: same as Incomplete.DP Agronomy.WaggaCR2008.WaggaWagga2008CR.Paddock.DailyBiomass
              Report SowingReport: EventNames=[Canola].Sowing
                VariableNames:
                  [Clock].Today
                  [Canola].SowingData.Cultivar
                  [IWeather].Latitude
                  [IWeather].Longitude
      Folder Downside_2016_Ex1b
        Memo Check this
          Observed biomass may have some wrong dates in the spreadsheet
        Experiment Downside_2016_Ex1b
          Factors
            Permutation
              Factor TOS_index
                CompositeFactor 1
                  Specifications:
                    [Sowing].Script.SowDate = 31-Mar
                    [Irrigate].Script.irrigDates = 4-Apr
                    [Irrigate].Script.amount = 11
                CompositeFactor 2
                  Specifications:
                    [Sowing].Script.SowDate = 13-Apr
                    [Irrigate].Script.irrigDates = 14-Apr
                    [Irrigate].Script.amount = 11
                CompositeFactor 3: Specifications=[Sowing].Script.SowDate = 29-Apr
              Factor Cv
                Specification=[Sowing].Script.CultivarName = 44Y89_CL,45Y88_CL,Archer,ATR_Gem,ATR_Stingray,GT50_RR,Hyola559_TT,Hyola575_CL,Hyola600_RR,Hyola725_RT,IH30_RR,NS_Diamond
              Factor Popn: Specification=[Sowing].Script.Population =  45
              Factor Fert: Specification=[codes].Script.fert_treat = nil
              Factor Irrig: Specification=[codes].Script.irrig_treat = nil
              Memo
                Sowing poulation differences
          Simulation Downside_OCP_2016_Ex1b
            Clock: Start=2016-03-01; End=2016-12-31
            Summary summaryfile
            Weather: FileName=met/72150_CombGSE.met
            SoilArbitrator
            Zone paddock: Area=1; Slope=0; AspectAngle=0; Altitude=50
              Folder manager
                Manager Reset on date
                  ResetDate = 29-Apr
                  ResetWater = Yes
                  ResetN = Yes
                  ResetSOM = No
                  script: same as in Incomplete.OCP Agronomy.Breeza_2014_Ex1.Breeza_2014_Ex1.Breeza_2014_Ex1_Base.paddock.manager.Reset on date
                Manager Sowing: same as Incomplete.OCP Agronomy.AlmaPark_2015_Ex2a.AlmaPark_2015_Ex2a.AlmaPark2015_Ex2a_base.paddock.manager.Sowing
                Manager Fertilise
                  FertiliserType = UreaN
                  FertiliserDates = 30-Mar
                  fert_criteria = 1000
                  Amount = 100
                  FertiliserDepth = 20
```csharp
using APSIM.Shared.Utilities;
using Models.PMF;
using Models.Core;
using Models.Soils;
using Models.Soils.Nutrients;
using System;
namespace Models
{
    [Serializable]
    public class Script : Model
    {
        [Link] Clock Clock;
        [Link] Fertiliser Fertiliser;
        [Link] INutrient nutrient;
        [Link] Summary sum;
        
        [Separator("A component to apply fertiliser on one or more dates on every year of the simulation")]

        [Description("Type of fertiliser to apply? ")] 
        [Display(Type = DisplayType.FertiliserType)]public string FertiliserType { get; set; }

        [Description("Enter the fertilisation dates as dd-mmm with comma separation (any year information entered will be ignored): ")] 
        public string[] FertiliserDates { get; set; } 

        public string fert_treat{ get; set;}    // The treatment set in the experiment

        [Description("Don't add fertiliser if N in top 2 layers exceeds (kg/ha) : ")]
        public double fert_criteria { get; set; }

        [Description("Amount of fertiliser to be applied each time (kg /ha)")] 
        public double Amount { get; set; }

        [Description("Depth (mm)")] public double FertiliserDepth { get; set; }
        
        [EventSubscribe("DoManagement")]
        private void OnDoManagement(object sender, EventArgs e)
        {
            if (fert_treat != null)
            {
                if (fert_treat == "D3")
                    Amount = 26;
                if (fert_treat == "D9")
                    Amount = 186;
            }

            foreach (string ddMMM in FertiliserDates)
            {
                if (DateUtilities.DatesEqual(ddMMM, Clock.Today))
                {
                    double soil_N = nutrient.NH4.kgha[0] + nutrient.NO3.kgha[0] + nutrient.NH4.kgha[1] + nutrient.NO3.kgha[1];
                    if (soil_N <= fert_criteria) 
                         Fertiliser.Apply(amount: Amount, type: FertiliserType, depth: FertiliserDepth);
                    else
                        sum.WriteMessage(this, "No fertilising as top two layers have " + soil_N.ToString() + "kg/ha N", MessageType.Diagnostic);
                }
            }
        }
    }
}
```
                Manager Fertilise1
                  FertiliserType = UreaN
                  FertiliserDates = 8-Jun
                  fert_criteria = 1000
                  Amount = 100
                  FertiliserDepth = 20
                  script: same as in Incomplete.OCP Agronomy.Downside_2016_Ex1b.Downside_2016_Ex1b.Downside_OCP_2016_Ex1b.paddock.manager.Fertilise
                Manager codes
                  location = Condo
                  TOS_index = 1
                  fert_treat =
                  irrig_treat = dry
                  trial_code = CSTB17COND2
                  fert_code = D5
```csharp
using Models.Soils;
using System;
using Models.Core;
using Models.PMF;
namespace Models
{
    [Serializable]
    [System.Xml.Serialization.XmlInclude(typeof(Model))]
    public class Script : Model
    {
        [Link] Clock Clock;

        [Description("location")]
        public string location { get; set; }

        [Description("Time of sowing")]
        public string TOS_index { get; set; }

        [Description("fert_treat")]
        public string fert_treat { get; set; }

        [Description("irrig_treat")]
        public string irrig_treat { get; set; }

        [Description("trial_code")]
        public string trial_code { get; set; }

        [Description("fert_code")]
        public string fert_code { get; set; }

        [EventSubscribe("StartOfSimulation")]
        private void OnSimulationCommencing(object sender, EventArgs e)
        {

        }
    }
}
```
                Manager Irrigate: same as Incomplete.OCP Agronomy.Condo_2017_Ex1c.Condo_2017_Ex1c.condo_OCP_2017_Ex1c.paddock.manager.Irrigate30
                Manager HarvestAfterDate
                  HarvestDate = 18-Nov
                  script: same as in Validation.Growth Experiments.Kojonup.Kojonup2013.Kojonup2013Base.paddock.HarvestAfterDate
              Fertiliser
              Manager Fertilise at sowing
                Crop = [canola]
                FertiliserType = NH4N
                Amount = 10
                script: same as in Validation.Growth Experiments.Kojonup.Kojonup2013.Kojonup2013Base.paddock.Fertilise at sowing
              Irrigation
              SurfaceOrganicMatter: InitialResidueName=lucerne; InitialResidueType=lucerne; InitialResidueMass=3000; InitialStandingFraction=0; InitialCPR=0; InitialCNR=40
              Plant canola: ResourceName=Canola
              Soil: SoilType=SNSW; Site=CSU; NearestTown=Wagga Wagga; Region=Southern NSW; State=NSW; Latitude=0; Longitude=0; DataSource=Kirsten Verburg
                Chemical: PHUnits=Water
                  Thickness=[100, 100, 100, 100, 100, 100, 100, 100, 100, 100, 100, 100, 100, 100, 100, 100, 100, 100, 100, 100]
                  PH=[5.3757, 5.4663, 6.1, 6.2811, 6.4622, 6.5527, 6.6433, 6.7338, 6.8244, 6.8244, 7.0054, 7.1865, 7.3676, 7.5487, 7.6392, 7.7297, 7.7297, 7.8203, 7.8203, 7.8203]
                Physical: same as Incomplete.OCP Agronomy.AlmaPark_2015_Ex2a.AlmaPark_2015_Ex2a.AlmaPark2015_Ex2a_base.paddock.soil.Physical
                WaterBalance SoilWater: same as Incomplete.OCP Agronomy.AlmaPark_2015_Ex2a.AlmaPark_2015_Ex2a.AlmaPark2015_Ex2a_base.paddock.soil.SoilWater
                Nutrient
                Organic: FOMCNRatio=80; CarbonUnits=Total
                  Thickness  Carbon  SoilCNRatio  FBiom  FInert  FOM
                  100        1.29    8            0.06   0.01    293.1807
                  100        0.53    8            0.05   0.01    252.3429
                  100        0.53    8            0.04   0.31    217.1936
                  100        0.22    8            0.03   0.35    186.9402
                  100        0.22    8            0.02   0.4     160.901
                  100        0.22    8            0.01   0.45    138.4887
                  100        0.19    8            0.01   0.5     119.1984
                  100        0.17    8            0.01   0.6     102.595
                  100        0.15    8            0.01   0.7     88.3043
                  100        0.12    8            0.01   0.8     76.0042
                  100        0.11    8            0.01   0.9     65.4174
                  100        0.1     8            0.01   0.99    56.3053
                  100        0.1     8            0.01   0.99    48.4624
                  100        0.1     8            0.01   0.99    41.712
                  100        0.1     8            0.01   0.99    35.9019
                  100        0.1     8            0.01   0.99    30.901
                  100        0.08    8            0.01   0.99    26.5967
                  100        0.06    8            0.01   0.99    22.892
                  100        0.05    8            0.01   0.99    19.7034
                  100        0.04    8            0.01   0.99    16.9588
                Water: Thickness=[100, 200, 300, 300, 300, 300, 500]; InitialValues=[0.171, 0.213, 0.27, 0.295, 0.31, 0.305, 0.305]; FilledFromTop=false
                Solute NO3: InitialValuesUnits=ppm; WaterTableConcentration=0; D0=0; DepthConstant=0; MaxDepthSoluteAccessible=0; RunoffEffectivenessAtMovingSolute=0; MaxEffectiveRunoff=0
                  Thickness=[100, 100, 100, 100, 100, 100, 100, 100, 100, 100, 100, 100, 100, 100, 100, 100, 100, 100, 100, 100]
                  InitialValues=[21.75, 7.75, 7.75, 6.5, 6.5, 6.5, 4.5, 4.5, 4.5, 3.33, 3.33, 3.33, 2, 2, 2, 0, 0, 0, 0, 0]
                Solute NH4: InitialValuesUnits=ppm; WaterTableConcentration=0; D0=0; DepthConstant=0; MaxDepthSoluteAccessible=0; RunoffEffectivenessAtMovingSolute=0; MaxEffectiveRunoff=0
                  Thickness=[100, 100, 100, 100, 100, 100, 100, 100, 100, 100, 100, 100, 100, 100, 100, 100, 100, 100, 100, 100]
                  InitialValues=[2.5, 1.25, 1.25, 1.25, 1.25, 1.25, 1, 1, 1, 1, 1, 1, 0.5, 0.5, 0.5, 0, 0, 0, 0, 0]
                Solute Urea: same as Validation.Growth Experiments.Wagga.Wagga2008.WaggaWagga2008.Paddock.Soil.Urea
                SoilTemperature Temperature
              MicroClimate: a_interception=0; b_interception=1; c_interception=0; d_interception=0; SoilHeatFluxFraction=0; MinimumHeightDiffForNewLayer=0; NightInterceptionFraction=0; ReferenceHeight=2
              Report DailyReport: same as Incomplete.OCP Agronomy.AlmaPark_2015_Ex2a.AlmaPark_2015_Ex2a.AlmaPark2015_Ex2a_base.paddock.DailyReport
              Report HarvestReport
              Report DailyBiomass: same as Incomplete.DP Agronomy.WaggaCR2008.WaggaWagga2008CR.Paddock.DailyBiomass
              Report SowingReport: EventNames=[Canola].Sowing
                VariableNames:
                  [Clock].Today
                  [Canola].SowingData.Cultivar
                  [IWeather].Latitude
                  [IWeather].Longitude
      Folder Galong_2015_Ex2a
        Experiment Galong_2015_Ex2a
          Factors
            Permutation
              Factor TOS_index
                CompositeFactor 1: Specifications=[Sowing].Script.SowDate = 30-Apr
              Factor Cv
                Specification=[Sowing].Script.CultivarName = ATR_Stingray,ATR_Wahoo,Hyola450_TT,Hyola650_TT
              Factor Popn: Specification=[Sowing].Script.Population =  15,45
              Factor Fert
                CompositeFactor 1: Specifications=[Fertilise].Script.FertiliserDates = 27-May
                CompositeFactor 2: Specifications=[Fertilise].Script.FertiliserDates = 8-Jul
                CompositeFactor 3: Specifications=[Fertilise].Script.FertiliserDates = 10-Aug
              Factor Irrig: Specification=[codes].Script.irrig_treat = nil
              Memo Question
                Not sure fertilise is correct
          Simulation Galong_OCP_2015
            Clock: Start=2015-03-01; End=2015-12-01
            Summary summaryfile
            Weather: FileName=met/73013_CombGSE.met
            SoilArbitrator
            Zone paddock: Area=1; Slope=0; AspectAngle=0; Altitude=50
              Folder manager
                Manager Reset on date: same as Incomplete.OCP Agronomy.Canowindra_2015_Ex1b.Canowindra_2015_Ex1b.Canowindra_OCP_2015_Ex1b.paddock.manager.Reset on date
                Manager Sowing: same as Incomplete.OCP Agronomy.AlmaPark_2015_Ex2a.AlmaPark_2015_Ex2a.AlmaPark2015_Ex2a_base.paddock.manager.Sowing
                Manager Fertilise
                  FertiliserType = UreaN
                  FertiliserDates = 27-May
                  fert_criteria = 1000
                  Amount = 200
                  FertiliserDepth = 20
                  script: same as in Incomplete.OCP Agronomy.Canowindra_2018_Ex1a.Canowindra_2018_Ex1a.Canowindra_OCP_2018.paddock.manager.Fertilise
                Manager codes
                  location = Galong
                  TOS_index = 1
                  fert_treat =
                  irrig_treat = nil
                  trial_code = CFZA15GAL02
                  script: same as in Incomplete.OCP Agronomy.Condo_2015_Ex1a.Condo_2015_Ex1a.condo_OCP_2015_Ex1a.paddock.manager.codes
                Manager HarvestAfterDate
                  HarvestDate = 15-Nov
                  script: same as in Validation.Growth Experiments.Kojonup.Kojonup2013.Kojonup2013Base.paddock.HarvestAfterDate
              Fertiliser
              Manager Fertilise at sowing: same as Incomplete.OCP Agronomy.Downside_2016_Ex1b.Downside_2016_Ex1b.Downside_OCP_2016_Ex1b.paddock.Fertilise at sowing
              Irrigation
              SurfaceOrganicMatter: InitialResidueName=wheat; InitialResidueType=wheat; InitialResidueMass=6000; InitialStandingFraction=0; InitialCPR=0; InitialCNR=80
              Plant canola: ResourceName=Canola
              Soil: ASCOrder=Kandosol; ASCSubOrder=Red; SoilType=?; Site=Galong; NearestTown=Galong; Region=South West Slopes; State=New South Wales; Country=Australia; ApsoilNumber=545; Latitude=-34.598; Longitude=148.558; LocationAccuracy=Regional Soil Type; DataSource=Michael Robertson, CSIRO Sustainable Ecosystems; Comments=Canola CLL measured, other crops estimated
                Physical
                  Thickness  BD    AirDry  LL15  DUL   SAT
                  100        1.22  0.05    0.1   0.17  0.51
                  100        1.45  0.104   0.13  0.19  0.42
                  100        1.45  0.14    0.14  0.2   0.42
                  150        1.45  0.14    0.14  0.23  0.42
                  200        1.45  0.14    0.14  0.27  0.42
                  200        1.5   0.14    0.14  0.29  0.4
                  200        1.5   0.14    0.14  0.33  0.4
                  200        1.5   0.14    0.14  0.34  0.4
                  200        1.5   0.14    0.14  0.36  0.4
                  600        1.5   0.14    0.14  0.38  0.4
                  SoilCrop WheatSoil
                    LL=[0.1, 0.13, 0.14, 0.15, 0.19, 0.22, 0.24, 0.24, 0.26, 0.27]
                    KL=[0.06, 0.06, 0.06, 0.04, 0.04, 0.04, 0.04, 0.02, 0.02, 0.02]
                    XF=[1, 1, 1, 1, 1, 1, 1, 1, 1, 1]
                    LL source: Estimated based on local knowledge
                  SoilCrop CanolaSoil
                    LL=[0.1, 0.13, 0.14, 0.15, 0.19, 0.22, 0.24, 0.24, 0.26, 0.27]
                    KL=[0.08, 0.08, 0.08, 0.08, 0.08, 0.07, 0.06, 0.05, 0.03, 0.01]
                    XF=[1, 1, 1, 1, 1, 1, 1, 1, 1, 1]
                    LL source: Field measured and checked for sensibility
                WaterBalance SoilWater: SummerDate=1-Nov; SummerU=6; SummerCona=3.5; WinterDate=1-Apr; WinterU=2; WinterCona=2; DiffusConst=88; DiffusSlope=35.4; Salb=0.13; CN2Bare=72; CNRed=20; CNCov=0.8; PSIDul=-100; Thickness=[100, 100, 100, 150, 200, 200, 200, 200, 200, 600]; SWCON=[0.4, 0.4, 0.4, 0.4, 0.4, 0.4, 0.4, 0.4, 0.4, 0.4]
                Nutrient
                Organic: FOMCNRatio=30; CarbonUnits=Total
                  Thickness  Carbon  SoilCNRatio  FBiom  FInert  FOM
                  100        1.69    14.5         0.04   0.5     432.7805
                  100        1.3     14.5         0.02   0.5     373.8629
                  100        1.04    14.5         0.02   0.5     322.9662
                  150        0.806   14.5         0.01   0.6     259.3129
                  200        0.546   14.5         0.01   0.6     193.5145
                  200        0.286   14.5         0.01   0.6     144.4119
                  200        0.247   14.5         0.01   0.8     107.7686
                  200        0.221   14.5         0.01   0.8     80.4233
                  200        0.195   14.5         0.01   0.8     60.0166
                  600        0.156   14.5         0.01   1       24.9425
                Chemical: Thickness=[100, 100, 100, 150, 200, 200, 200, 200, 200, 600]; PH=[5.8, 5.9, 6.6, 6.8, 7, 7.1, 7.2, 7.3, 7.4, 7.4]; PHUnits=Water
                  PH source: Unknown source or quality of data
                Water: Thickness=[100, 100, 100, 150, 200, 200, 200, 200, 200, 600]; FilledFromTop=false
                  InitialValues=[0.107, 0.136, 0.146, 0.149, 0.153, 0.155, 0.159, 0.16, 0.162, 0.164]
                Solute NO3: Thickness=[100, 100, 100, 150, 200, 200, 200, 200, 200, 600]; InitialValues=[33, 12, 12, 1, 1, 1, 1, 1, 1, 1]; InitialValuesUnits=ppm; WaterTableConcentration=0; D0=0; DepthConstant=0; MaxDepthSoluteAccessible=0; RunoffEffectivenessAtMovingSolute=0; MaxEffectiveRunoff=0
                Solute NH4: Thickness=[100, 100, 100, 150, 200, 200, 200, 200, 200, 600]; InitialValues=[25, 2, 2, 0.2, 0.2, 0.2, 0.2, 0.2, 0.2, 0.2]; InitialValuesUnits=ppm; WaterTableConcentration=0; D0=0; DepthConstant=0; MaxDepthSoluteAccessible=0; RunoffEffectivenessAtMovingSolute=0; MaxEffectiveRunoff=0
                Solute Urea: same as Incomplete.Southern NSW.Galong_03_S1.paddock.soil.Urea
                SoilTemperature Temperature
              MicroClimate: a_interception=0; b_interception=1; c_interception=0; d_interception=0; SoilHeatFluxFraction=0; MinimumHeightDiffForNewLayer=0; NightInterceptionFraction=0; ReferenceHeight=2
              Report DailyReport: same as Incomplete.OCP Agronomy.AlmaPark_2015_Ex2a.AlmaPark_2015_Ex2a.AlmaPark2015_Ex2a_base.paddock.DailyReport
              Report HarvestReport
              Report DailyBiomass: same as Incomplete.DP Agronomy.WaggaCR2008.WaggaWagga2008CR.Paddock.DailyBiomass
              Report SowingReport: EventNames=[Canola].Sowing
                VariableNames:
                  [Clock].Today
                  [Canola].SowingData.Cultivar
                  [IWeather].Latitude
                  [IWeather].Longitude
      Folder Ganmain_2014_Ex1
        Experiment Ganmain_2014_Ex1
          Factors
            Permutation
              Factor TOS_index
                CompositeFactor 1
                  Specifications:
                    [Sowing].Script.SowDate = 1-Apr
                    [Fertilise1].Script.FertiliserDates = 29-May
                    [Fertilise1].Script.Amount = 42.5
                CompositeFactor 2
                  Specifications:
                    [Sowing].Script.SowDate = 15-Apr
                    [Fertilise1].Script.FertiliserDates = 14-Jul
                    [Fertilise1].Script.Amount = 69
                CompositeFactor 3: Specifications=[Sowing].Script.SowDate = 28-Apr
                CompositeFactor 4: Specifications=[Sowing].Script.SowDate = 13-May
              Factor Cv
                Specification=[Sowing].Script.CultivarName = 44Y87_CL,45Y88_CL,ATR_Gem,Hyola559_TT,Hyola575_CL,Hyola971_CL
              Factor Popn: Specification=[Sowing].Script.Population =  15,45
              Factor Fert: Specification=[codes].Script.fert_treat = nil
              Factor Irrig: Specification=[codes].Script.irrig_treat = nil
          Simulation Ganmain_OCP_2014
            Clock: Start=2014-01-01; End=2015-01-31
            Summary summaryfile
            Weather: FileName=met/74202_CombGSE.met
            SoilArbitrator
            Zone paddock: Area=1; Slope=0; AspectAngle=0; Altitude=50
              Folder manager
                Manager Sowing: same as Incomplete.OCP Agronomy.AlmaPark_2015_Ex2a.AlmaPark_2015_Ex2a.AlmaPark2015_Ex2a_base.paddock.manager.Sowing
                Manager Fertilise
                  FertiliserType = UreaN
                  FertiliserDates = 31-Mar
                  fert_criteria = 1000
                  Amount = 46
                  FertiliserDepth = 20
                  script: same as in Incomplete.OCP Agronomy.Downside_2016_Ex1b.Downside_2016_Ex1b.Downside_OCP_2016_Ex1b.paddock.manager.Fertilise
                Manager Reset on date
                  ResetDate = 3-May
                  ResetWater = No
                  ResetN = Yes
                  ResetSOM = No
                  script: same as in Incomplete.OCP Agronomy.Breeza_2014_Ex1.Breeza_2014_Ex1.Breeza_2014_Ex1_Base.paddock.manager.Reset on date
                Manager Fertilise1
                  FertiliserType = UreaN
                  FertiliserDates = 31-Mar
                  fert_criteria = 1000
                  Amount = 125
                  FertiliserDepth = 20
                  script: same as in Incomplete.OCP Agronomy.Downside_2016_Ex1b.Downside_2016_Ex1b.Downside_OCP_2016_Ex1b.paddock.manager.Fertilise
                Manager codes
                  location = Ganmain
                  TOS_index = 1
                  fert_treat =
                  irrig_treat = nil
                  trial_code = CSTA14GANM2
                  script: same as in Incomplete.OCP Agronomy.Condo_2015_Ex1a.Condo_2015_Ex1a.condo_OCP_2015_Ex1a.paddock.manager.codes
                Manager HarvestAfterDate
                  HarvestDate = 19-Nov
                  script: same as in Validation.Growth Experiments.Kojonup.Kojonup2013.Kojonup2013Base.paddock.HarvestAfterDate
              Fertiliser
              Manager Fertilise at sowing: same as Incomplete.OCP Agronomy.Downside_2016_Ex1b.Downside_2016_Ex1b.Downside_OCP_2016_Ex1b.paddock.Fertilise at sowing
              Irrigation
              SurfaceOrganicMatter: InitialResidueName=wheat; InitialResidueType=wheat; InitialResidueMass=6000; InitialStandingFraction=0; InitialCPR=0; InitialCNR=80
              Plant canola: ResourceName=Canola
              Soil: SoilType=SNSW; Site=CSU; NearestTown=Wagga Wagga; Region=Southern NSW; State=NSW; Latitude=0; Longitude=0; DataSource=Kirsten Verburg
                Chemical: PHUnits=Water
                  Thickness=[100, 100, 100, 100, 100, 100, 100, 100, 100, 100, 100, 100, 100, 100, 100, 100, 100, 100, 100, 600]
                  PH=[5.8, 5.9, 6.6, 6.8, 7, 7.1, 7.2, 7.3, 7.4, 7.4, 7.6, 7.8, 8, 8.2, 8.3, 8.4, 8.4, 8.5, 8.5, 8.5]
                WaterBalance SoilWater: SummerDate=1-nov; SummerU=6; SummerCona=2; WinterDate=1-apr; WinterU=2; WinterCona=2; DiffusConst=44; DiffusSlope=16; Salb=0.13; CN2Bare=72; CNRed=20; CNCov=0.8; PSIDul=-100
                  Thickness=[100, 100, 100, 100, 100, 100, 100, 100, 100, 100, 100, 100, 100, 100, 100, 100, 100, 100, 100, 600]
                  SWCON=[0.5, 0.5, 0.5, 0.89, 0.8, 0.8, 0.6, 0.6, 0.4, 0.4, 0.2, 0.2, 0.2, 0.2, 0.2, 0.2, 0.2, 0.2, 0.2, 0.2]
                Organic: FOMCNRatio=80; CarbonUnits=Total
                  Thickness  Carbon  SoilCNRatio  FBiom  FInert  FOM
                  100        0.83    8            0.06   0.01    250.1585
                  100        0.35    8            0.05   0.01    221.8706
                  100        0.33    8            0.04   0.31    196.7816
                  100        0.22    8            0.03   0.35    174.5296
                  100        0.22    8            0.02   0.4     154.7939
                  100        0.22    8            0.01   0.45    137.2899
                  100        0.19    8            0.01   0.5     121.7652
                  100        0.17    8            0.01   0.6     107.996
                  100        0.15    8            0.01   0.7     95.7839
                  100        0.12    8            0.01   0.8     84.9527
                  100        0.11    8            0.01   0.9     75.3463
                  100        0.1     8            0.01   0.99    66.8262
                  100        0.1     8            0.01   0.99    59.2695
                  100        0.1     8            0.01   0.99    52.5673
                  100        0.1     8            0.01   0.99    46.623
                  100        0.1     8            0.01   0.99    41.3509
                  100        0.08    8            0.01   0.99    36.675
                  100        0.06    8            0.01   0.99    32.5278
                  100        0.05    8            0.01   0.99    28.8496
                  600        0.04    8            0.01   0.99    14.0426
                Water: FilledFromTop=false
                  Thickness=[100, 100, 100, 100, 100, 100, 100, 100, 100, 100, 100, 100, 100, 100, 100, 100, 100, 100, 100, 100, 500]
                  InitialValues=[0.12315, 0.136, 0.16735, 0.2087, 0.2467, 0.2657, 0.2717, 0.27455, 0.27445, 0.27825, 0.2832, 0.2832, 0.28395, 0.28395, 0.28395, 0.28395, 0.28395, 0.28395, 0.28395, 0.28395, 0.28395]
                Physical
                  Thickness  BD    AirDry  LL15   DUL    SAT
                  100        1.48  0.03    0.115  0.278  0.34
                  100        1.49  0.1     0.127  0.307  0.34
                  100        1.41  0.1     0.16   0.307  0.4
                  100        1.37  0.13    0.2    0.374  0.4
                  100        1.41  0.13    0.24   0.374  0.4
                  100        1.41  0.13    0.26   0.374  0.4
                  100        1.52  0.13    0.265  0.399  0.426
                  100        1.52  0.13    0.268  0.399  0.426
                  100        1.62  0.13    0.27   0.359  0.389
                  100        1.62  0.13    0.274  0.359  0.389
                  100        1.66  0.13    0.28   0.344  0.374
                  100        1.66  0.13    0.28   0.344  0.374
                  100        1.62  0.13    0.28   0.359  0.389
                  100        1.62  0.13    0.28   0.359  0.389
                  100        1.62  0.13    0.28   0.359  0.389
                  100        1.62  0.13    0.28   0.359  0.389
                  100        1.62  0.13    0.28   0.359  0.389
                  100        1.62  0.13    0.28   0.359  0.389
                  100        1.62  0.13    0.28   0.359  0.389
                  100        1.62  0.13    0.28   0.359  0.389
                  500        1.62  0.13    0.28   0.359  0.389
                  SoilCrop WheatSoil
                    LL=[0.127, 0.156, 0.148, 0.253, 0.261, 0.261, 0.268, 0.268, 0.285, 0.274, 0.281, 0.281, 0.254, 0.254, 0.254, 0.256, 0.256, 0.256, 0.256, 0.256, 0.256]
                    KL=[0.08, 0.08, 0.06, 0.06, 0.05, 0.04, 0.04, 0.04, 0.04, 0.04, 0.04, 0.03, 0.03, 0.02, 0.02, 0.01, 0.01, 0.01, 0.01, 0.01, 0.01]
                    XF=[1, 1, 1, 1, 1, 1, 1, 1, 1, 1, 1, 1, 1, 1, 1, 1, 0.8, 0.4, 0, 0, 0]
                  SoilCrop CanolaSoil
                    LL=[0.115, 0.127, 0.16, 0.2, 0.24, 0.26, 0.265, 0.268, 0.27, 0.274, 0.28, 0.28, 0.28, 0.28, 0.28, 0.28, 0.28, 0.28, 0.28, 0.28, 0.28]
                    KL=[0.08, 0.08, 0.06, 0.06, 0.05, 0.04, 0.04, 0.04, 0.04, 0.04, 0.04, 0.03, 0.03, 0.02, 0.02, 0.01, 0.01, 0.01, 0.01, 0.01, 0.01]
                    XF=[1, 1, 1, 1, 1, 1, 1, 1, 1, 1, 1, 1, 1, 1, 0.7, 0.7, 0.7, 0.5, 0.5, 0.2, 0.2]
                Nutrient
                Solute NO3: InitialValuesUnits=ppm; WaterTableConcentration=0; D0=0; DepthConstant=0; MaxDepthSoluteAccessible=0; RunoffEffectivenessAtMovingSolute=0; MaxEffectiveRunoff=0
                  Thickness=[100, 100, 100, 100, 100, 100, 100, 100, 100, 100, 100, 100, 100, 100, 100, 100, 100, 100, 100, 600]
                  InitialValues=[2, 7, 7, 3, 3, 3, 4, 4, 4, 5, 5, 5, 5, 5, 5, 4, 4, 4, 1, 1]
                Solute NH4: InitialValuesUnits=ppm; WaterTableConcentration=0; D0=0; DepthConstant=0; MaxDepthSoluteAccessible=0; RunoffEffectivenessAtMovingSolute=0; MaxEffectiveRunoff=0
                  Thickness=[100, 100, 100, 100, 100, 100, 100, 100, 100, 100, 100, 100, 100, 100, 100, 100, 100, 100, 100, 600]
                  InitialValues=[8, 7, 7, 1, 1, 1, 1, 1, 1, 1, 1, 1, 1, 1, 1, 2, 2, 2, 0.5, 0.5]
                Solute Urea: InitialValuesUnits=kg/ha; WaterTableConcentration=0; D0=0; DepthConstant=0; MaxDepthSoluteAccessible=0; RunoffEffectivenessAtMovingSolute=0; MaxEffectiveRunoff=0
                  Thickness=[100, 100, 100, 100, 100, 100, 100, 100, 100, 100, 100, 100, 100, 100, 100, 100, 100, 100, 100, 600]
                  InitialValues=[0, 0, 0, 0, 0, 0, 0, 0, 0, 0, 0, 0, 0, 0, 0, 0, 0, 0, 0, 0]
                SoilTemperature Temperature
              MicroClimate: a_interception=0; b_interception=1; c_interception=0; d_interception=0; SoilHeatFluxFraction=0; MinimumHeightDiffForNewLayer=0; NightInterceptionFraction=0; ReferenceHeight=2
              Report DailyReport: same as Incomplete.OCP Agronomy.AlmaPark_2015_Ex2a.AlmaPark_2015_Ex2a.AlmaPark2015_Ex2a_base.paddock.DailyReport
              Report HarvestReport
              Report DailyBiomass: same as Incomplete.DP Agronomy.WaggaCR2008.WaggaWagga2008CR.Paddock.DailyBiomass
              Report SowingReport: EventNames=[Canola].Sowing
                VariableNames:
                  [Clock].Today
                  [Canola].SowingData.Cultivar
                  [IWeather].Latitude
                  [IWeather].Longitude
      Folder Ganmain_2015_Ex1b
        Experiment Ganmain_2015_Ex1b
          Factors
            Permutation
              Factor TOS_index
                CompositeFactor 1: Specifications=[Sowing].Script.SowDate = 1-Apr
                CompositeFactor 2: Specifications=[Sowing].Script.SowDate = 15-Apr
                CompositeFactor 3: Specifications=[Sowing].Script.SowDate = 30-Apr
              Factor Cv
                Specification=[Sowing].Script.CultivarName = 44Y89_CL,45Y88_CL,Archer,Hyola575_CL
              Factor Popn: Specification=[Sowing].Script.Population =  45
              Factor Fert: Specification=[codes].Script.fert_treat = nil
              Factor Irrig: Specification=[codes].Script.irrig_treat = nil
          Simulation Ganmain_OCP_2015_Ex1b
            Clock: Start=2014-11-15; End=2015-12-01
            Summary summaryfile
            Weather: FileName=met/74202_CombGSE.met
            SoilArbitrator
            Zone paddock: Area=1; Slope=0; AspectAngle=0; Altitude=50
              Folder manager
                Manager Reset on date
                  ResetDate = 17-Mar
                  ResetWater = No
                  ResetN = Yes
                  ResetSOM = No
                  script: same as in Incomplete.OCP Agronomy.Breeza_2014_Ex1.Breeza_2014_Ex1.Breeza_2014_Ex1_Base.paddock.manager.Reset on date
                Manager Sowing: same as Incomplete.OCP Agronomy.AlmaPark_2015_Ex2a.AlmaPark_2015_Ex2a.AlmaPark2015_Ex2a_base.paddock.manager.Sowing
                Manager Fertilise
                  FertiliserType = UreaN
                  FertiliserDates = 1-Apr
                  fert_criteria = 1000
                  Amount = 108
                  FertiliserDepth = 20
                  script: same as in Incomplete.OCP Agronomy.Downside_2016_Ex1b.Downside_2016_Ex1b.Downside_OCP_2016_Ex1b.paddock.manager.Fertilise
                Manager codes
                  location = Ganmain
                  TOS_index = 1
                  fert_treat =
                  irrig_treat = nil
                  trial_code = CSTA15GANM2
                  script: same as in Incomplete.OCP Agronomy.Condo_2015_Ex1a.Condo_2015_Ex1a.condo_OCP_2015_Ex1a.paddock.manager.codes
                Manager Irrigate
                  irrigDate = 1-Apr
                  amount = 14
                  script: same as in Incomplete.OCP Agronomy.Canowindra_2016_Ex1b.Canowindra_2016_Ex1b.Canowindra_OCP_2016_Ex1b.paddock.manager.Irrigate
                Manager HarvestAfterDate
                  HarvestDate = 1-Nov
                  script: same as in Validation.Growth Experiments.Kojonup.Kojonup2013.Kojonup2013Base.paddock.HarvestAfterDate
              Fertiliser
              Manager Fertilise at sowing: same as Incomplete.OCP Agronomy.AlmaPark_2015_Ex2a.AlmaPark_2015_Ex2a.AlmaPark2015_Ex2a_base.paddock.Fertilise at sowing
              Irrigation
              SurfaceOrganicMatter: InitialResidueName=wheat; InitialResidueType=wheat; InitialResidueMass=6000; InitialStandingFraction=0; InitialCPR=0; InitialCNR=80
              Plant canola: ResourceName=Canola
              Soil: SoilType=SNSW; Site=CSU; NearestTown=Wagga Wagga; Region=Southern NSW; State=NSW; Latitude=0; Longitude=0; DataSource=Kirsten Verburg
                Chemical: PHUnits=Water
                  Thickness=[100, 100, 100, 100, 100, 100, 100, 100, 100, 100, 100, 100, 100, 100, 100, 100, 100, 100, 100, 600]
                  PH=[5.7, 5.4663, 6.1, 6.2811, 6.4622, 6.5527, 6.6433, 6.7338, 6.8244, 6.8244, 7.0054, 7.1865, 7.3676, 7.5487, 7.6392, 7.7297, 7.7297, 7.8203, 7.8203, 7.8203]
                WaterBalance SoilWater: same as Incomplete.OCP Agronomy.Ganmain_2014_Ex1.Ganmain_2014_Ex1.Ganmain_OCP_2014.paddock.soil.SoilWater
                Organic: FOMCNRatio=80; CarbonUnits=Total
                  Thickness  Carbon  SoilCNRatio  FBiom  FInert  FOM
                  100        0.56    8            0.06   0.01    250.1585
                  100        0.43    8            0.05   0.01    221.8706
                  100        0.43    8            0.04   0.31    196.7816
                  100        0.22    8            0.03   0.35    174.5296
                  100        0.22    8            0.02   0.4     154.7939
                  100        0.22    8            0.01   0.45    137.2899
                  100        0.19    8            0.01   0.5     121.7652
                  100        0.17    8            0.01   0.6     107.996
                  100        0.15    8            0.01   0.7     95.7839
                  100        0.12    8            0.01   0.8     84.9527
                  100        0.11    8            0.01   0.9     75.3463
                  100        0.1     8            0.01   0.99    66.8262
                  100        0.1     8            0.01   0.99    59.2695
                  100        0.1     8            0.01   0.99    52.5673
                  100        0.1     8            0.01   0.99    46.623
                  100        0.1     8            0.01   0.99    41.3509
                  100        0.08    8            0.01   0.99    36.675
                  100        0.06    8            0.01   0.99    32.5278
                  100        0.05    8            0.01   0.99    28.8496
                  600        0.04    8            0.01   0.99    14.0426
                Water: FilledFromTop=false
                  Thickness=[100, 100, 100, 100, 100, 100, 100, 100, 100, 100, 100, 100, 100, 100, 100, 100, 100, 100, 100, 100, 500]
                  InitialValues=[0.12315, 0.136, 0.16735, 0.2087, 0.2467, 0.2657, 0.2717, 0.27455, 0.27445, 0.27825, 0.28315, 0.2832, 0.28395, 0.28395, 0.28395, 0.28395, 0.28395, 0.28395, 0.28395, 0.28395, 0.28395]
                Physical
                  Thickness  BD    AirDry  LL15   DUL    SAT
                  100        1.48  0.03    0.115  0.278  0.34
                  100        1.49  0.1     0.127  0.307  0.34
                  100        1.41  0.1     0.16   0.307  0.4
                  100        1.37  0.13    0.2    0.374  0.4
                  100        1.41  0.13    0.24   0.374  0.4
                  100        1.41  0.13    0.26   0.374  0.4
                  100        1.52  0.13    0.265  0.399  0.426
                  100        1.52  0.13    0.268  0.399  0.426
                  100        1.62  0.13    0.27   0.359  0.389
                  100        1.62  0.13    0.274  0.359  0.389
                  100        1.66  0.13    0.28   0.343  0.374
                  100        1.66  0.13    0.28   0.344  0.374
                  100        1.62  0.13    0.28   0.359  0.389
                  100        1.62  0.13    0.28   0.359  0.389
                  100        1.62  0.13    0.28   0.359  0.389
                  100        1.62  0.13    0.28   0.359  0.389
                  100        1.62  0.13    0.28   0.359  0.389
                  100        1.62  0.13    0.28   0.359  0.389
                  100        1.62  0.13    0.28   0.359  0.389
                  100        1.62  0.13    0.28   0.359  0.389
                  500        1.62  0.13    0.28   0.359  0.389
                  SoilCrop WheatSoil: same as Incomplete.OCP Agronomy.Ganmain_2014_Ex1.Ganmain_2014_Ex1.Ganmain_OCP_2014.paddock.soil.Physical.WheatSoil
                  SoilCrop CanolaSoil: same as Incomplete.OCP Agronomy.Ganmain_2014_Ex1.Ganmain_2014_Ex1.Ganmain_OCP_2014.paddock.soil.Physical.CanolaSoil
                Nutrient
                Solute NO3: InitialValuesUnits=ppm; WaterTableConcentration=0; D0=0; DepthConstant=0; MaxDepthSoluteAccessible=0; RunoffEffectivenessAtMovingSolute=0; MaxEffectiveRunoff=0
                  Thickness=[100, 100, 100, 100, 100, 100, 100, 100, 100, 100, 100, 100, 100, 100, 100, 100, 100, 100, 100, 600]
                  InitialValues=[16, 2.75, 2.75, 1.5, 1.5, 1.5, 1, 1, 1, 1, 1, 1, 1, 1, 1, 1, 1, 1, 1, 1]
                Solute NH4: InitialValuesUnits=ppm; WaterTableConcentration=0; D0=0; DepthConstant=0; MaxDepthSoluteAccessible=0; RunoffEffectivenessAtMovingSolute=0; MaxEffectiveRunoff=0
                  Thickness=[100, 100, 100, 100, 100, 100, 100, 100, 100, 100, 100, 100, 100, 100, 100, 100, 100, 100, 100, 600]
                  InitialValues=[3.25, 2.5, 2.5, 1.25, 1.25, 1.25, 1, 1, 1, 1, 1, 1, 1, 1, 1, 1, 1, 1, 1, 1]
                Solute Urea: same as Incomplete.OCP Agronomy.Ganmain_2014_Ex1.Ganmain_2014_Ex1.Ganmain_OCP_2014.paddock.soil.Urea
                SoilTemperature Temperature
              MicroClimate: a_interception=0; b_interception=1; c_interception=0; d_interception=0; SoilHeatFluxFraction=0; MinimumHeightDiffForNewLayer=0; NightInterceptionFraction=0; ReferenceHeight=2
              Report DailyReport: same as Incomplete.OCP Agronomy.AlmaPark_2015_Ex2a.AlmaPark_2015_Ex2a.AlmaPark2015_Ex2a_base.paddock.DailyReport
              Report HarvestReport
              Report DailyBiomass: same as Incomplete.DP Agronomy.WaggaCR2008.WaggaWagga2008CR.Paddock.DailyBiomass
              Report SowingReport: EventNames=[Canola].Sowing
                VariableNames:
                  [Clock].Today
                  [Canola].SowingData.Cultivar
                  [IWeather].Latitude
                  [IWeather].Longitude
      Folder Ganmain_2015_Ex2b
        Experiment Ganmain_2015_Ex2b
          Factors
            Permutation
              Factor TOS_index
                CompositeFactor 1: Specifications=[Sowing].Script.SowDate = 9-Apr
                CompositeFactor 2
                  Specifications:
                    [Sowing].Script.SowDate = 20-Apr
                    [Irrigate].Script.irrigDate = 8-Mar
              Factor Cv: Specification=[Sowing].Script.CultivarName = 45Y88_CL,Hyola575_CL
              Factor Popn: Specification=[Sowing].Script.Population =  15,45
              Factor Fert: Specification=[codes].Script.fert_treat = nil
              Factor Irrig
                CompositeFactor dry: Specifications=[Irrigate].Script.amount = 0
                CompositeFactor wet: Specifications=[Irrigate].Script.amount = 38
          Simulation ganmain_OCP_2015_ex2b
            Clock: Start=2015-03-01; End=2015-12-01
            Summary summaryfile
            Weather: FileName=met/74202_CombGSE.met
            SoilArbitrator
            Zone paddock: Area=1; Slope=0; AspectAngle=0; Altitude=50
              Folder manager
                Manager Reset on date
                  ResetDate = 17-Mar
                  ResetWater = Yes
                  ResetN = Yes
                  ResetSOM = No
                  script: same as in Incomplete.OCP Agronomy.Breeza_2014_Ex1.Breeza_2014_Ex1.Breeza_2014_Ex1_Base.paddock.manager.Reset on date
                Manager Sowing: same as Incomplete.OCP Agronomy.AlmaPark_2015_Ex2a.AlmaPark_2015_Ex2a.AlmaPark2015_Ex2a_base.paddock.manager.Sowing
                Manager Fertilise
                  FertiliserType = UreaN
                  FertiliserDates = 9-Apr
                  fert_criteria = 1000
                  Amount = 108
                  FertiliserDepth = 20
                  script: same as in Incomplete.OCP Agronomy.Downside_2016_Ex1b.Downside_2016_Ex1b.Downside_OCP_2016_Ex1b.paddock.manager.Fertilise
                Manager Fertilise1
                  FertiliserType = UreaN
                  FertiliserDates = 16-Jun
                  fert_criteria = 1000
                  Amount = 46
                  FertiliserDepth = 20
                  script: same as in Incomplete.OCP Agronomy.Downside_2016_Ex1b.Downside_2016_Ex1b.Downside_OCP_2016_Ex1b.paddock.manager.Fertilise
                Manager codes
                  location = Ganmain
                  TOS_index = 1
                  fert_treat =
                  irrig_treat = dry
                  trial_code = CSTB15GANM2
                  script: same as in Incomplete.OCP Agronomy.Condo_2015_Ex1a.Condo_2015_Ex1a.condo_OCP_2015_Ex1a.paddock.manager.codes
                Manager Irrigate
                  irrigDate = 8-Mar
                  amount = 0
                  script: same as in Incomplete.OCP Agronomy.Canowindra_2016_Ex1b.Canowindra_2016_Ex1b.Canowindra_OCP_2016_Ex1b.paddock.manager.Irrigate
                Manager HarvestAfterDate
                  HarvestDate = 17-Oct
                  script: same as in Validation.Growth Experiments.Kojonup.Kojonup2013.Kojonup2013Base.paddock.HarvestAfterDate
              Fertiliser
              Manager Fertilise at sowing: same as Incomplete.OCP Agronomy.AlmaPark_2015_Ex2a.AlmaPark_2015_Ex2a.AlmaPark2015_Ex2a_base.paddock.Fertilise at sowing
              Irrigation
              SurfaceOrganicMatter: InitialResidueName=wheat; InitialResidueType=wheat; InitialResidueMass=6000; InitialStandingFraction=0; InitialCPR=0; InitialCNR=80
              Plant canola: ResourceName=Canola
              Soil: SoilType=SNSW; Site=CSU; NearestTown=Wagga Wagga; Region=Southern NSW; State=NSW; Latitude=0; Longitude=0; DataSource=Kirsten Verburg
                Chemical: PHUnits=Water
                  Thickness=[100, 100, 100, 100, 100, 100, 100, 100, 100, 100, 100, 100, 100, 100, 100, 100, 100, 100, 100, 600]
                  PH=[5.5, 5.4663, 6.1, 6.2811, 6.4622, 6.5527, 6.6433, 6.7338, 6.8244, 6.8244, 7.0054, 7.1865, 7.3676, 7.5487, 7.6392, 7.7297, 7.7297, 7.8203, 7.8203, 7.8203]
                WaterBalance SoilWater: same as Incomplete.OCP Agronomy.Ganmain_2014_Ex1.Ganmain_2014_Ex1.Ganmain_OCP_2014.paddock.soil.SoilWater
                Nutrient
                Organic: FOMCNRatio=80; CarbonUnits=Total
                  Thickness  Carbon  SoilCNRatio  FBiom  FInert  FOM
                  100        0.96    8            0.06   0.01    250.1585
                  100        0.42    8            0.05   0.01    221.8706
                  100        0.42    8            0.04   0.31    196.7816
                  100        0.22    8            0.03   0.35    174.5296
                  100        0.22    8            0.02   0.4     154.7939
                  100        0.22    8            0.01   0.45    137.2899
                  100        0.19    8            0.01   0.5     121.7652
                  100        0.17    8            0.01   0.6     107.996
                  100        0.15    8            0.01   0.7     95.7839
                  100        0.12    8            0.01   0.8     84.9527
                  100        0.11    8            0.01   0.9     75.3463
                  100        0.1     8            0.01   0.99    66.8262
                  100        0.1     8            0.01   0.99    59.2695
                  100        0.1     8            0.01   0.99    52.5673
                  100        0.1     8            0.01   0.99    46.623
                  100        0.1     8            0.01   0.99    41.3509
                  100        0.08    8            0.01   0.99    36.675
                  100        0.06    8            0.01   0.99    32.5278
                  100        0.05    8            0.01   0.99    28.8496
                  600        0.04    8            0.01   0.99    14.0426
                Water: Thickness=[100, 200, 300, 300, 300, 300, 300, 700]; FilledFromTop=false
                  InitialValues=[0.1154, 0.1392, 0.271, 0.3169, 0.373, 0.3208, 0.277, 0.277]
                Physical
                  Thickness  BD    AirDry  LL15   DUL    SAT
                  100        1.48  0.03    0.127  0.278  0.34
                  100        1.49  0.1     0.156  0.307  0.34
                  100        1.41  0.1     0.148  0.307  0.4
                  100        1.37  0.13    0.253  0.374  0.4
                  100        1.41  0.13    0.261  0.374  0.4
                  100        1.41  0.13    0.261  0.374  0.4
                  100        1.52  0.13    0.268  0.399  0.425
                  100        1.52  0.13    0.268  0.399  0.425
                  100        1.62  0.13    0.285  0.358  0.388
                  100        1.62  0.13    0.274  0.358  0.388
                  100        1.66  0.13    0.281  0.344  0.374
                  100        1.66  0.13    0.281  0.344  0.374
                  100        1.62  0.13    0.254  0.353  0.388
                  100        1.62  0.13    0.254  0.353  0.388
                  100        1.62  0.13    0.254  0.353  0.388
                  100        1.62  0.13    0.256  0.353  0.388
                  100        1.62  0.13    0.256  0.353  0.388
                  100        1.62  0.13    0.256  0.353  0.388
                  100        1.62  0.13    0.256  0.353  0.388
                  100        1.62  0.13    0.256  0.353  0.388
                  500        1.62  0.13    0.256  0.353  0.388
                  SoilCrop WheatSoil: same as Incomplete.OCP Agronomy.Ganmain_2014_Ex1.Ganmain_2014_Ex1.Ganmain_OCP_2014.paddock.soil.Physical.WheatSoil
                  SoilCrop CanolaSoil
                    LL=[0.127, 0.156, 0.148, 0.253, 0.261, 0.261, 0.268, 0.268, 0.285, 0.274, 0.281, 0.281, 0.254, 0.254, 0.254, 0.256, 0.256, 0.256, 0.256, 0.256, 0.256]
                    KL=[0.08, 0.08, 0.06, 0.06, 0.05, 0.04, 0.04, 0.04, 0.04, 0.04, 0.04, 0.03, 0.03, 0.02, 0.02, 0.01, 0.01, 0.01, 0.01, 0.01, 0.01]
                    XF=[1, 1, 1, 1, 1, 1, 1, 1, 1, 1, 1, 1, 1, 1, 1, 1, 1, 1, 1, 1, 0.8]
                Solute NO3: InitialValuesUnits=ppm; WaterTableConcentration=0; D0=0; DepthConstant=0; MaxDepthSoluteAccessible=0; RunoffEffectivenessAtMovingSolute=0; MaxEffectiveRunoff=0
                  Thickness=[100, 100, 100, 100, 100, 100, 100, 100, 100, 100, 100, 100, 100, 100, 100, 100, 100, 100, 100, 600]
                  InitialValues=[15.33, 2, 2, 1, 1, 1, 1, 1, 1, 1, 1, 1, 1, 1, 1, 1, 1, 1, 1, 1]
                Solute NH4: InitialValuesUnits=ppm; WaterTableConcentration=0; D0=0; DepthConstant=0; MaxDepthSoluteAccessible=0; RunoffEffectivenessAtMovingSolute=0; MaxEffectiveRunoff=0
                  Thickness=[100, 100, 100, 100, 100, 100, 100, 100, 100, 100, 100, 100, 100, 100, 100, 100, 100, 100, 100, 600]
                  InitialValues=[2.66, 1.33, 1.33, 1.33, 1.33, 1.33, 1, 1, 1, 1, 1, 1, 1, 1, 1, 1, 1, 1, 1, 1]
                Solute Urea: same as Incomplete.OCP Agronomy.Ganmain_2014_Ex1.Ganmain_2014_Ex1.Ganmain_OCP_2014.paddock.soil.Urea
                SoilTemperature Temperature
              MicroClimate: a_interception=0; b_interception=1; c_interception=0; d_interception=0; SoilHeatFluxFraction=0; MinimumHeightDiffForNewLayer=0; NightInterceptionFraction=0; ReferenceHeight=2
              Report DailyReport: same as Incomplete.OCP Agronomy.AlmaPark_2015_Ex2a.AlmaPark_2015_Ex2a.AlmaPark2015_Ex2a_base.paddock.DailyReport
              Report HarvestReport
              Report DailyBiomass: same as Incomplete.DP Agronomy.WaggaCR2008.WaggaWagga2008CR.Paddock.DailyBiomass
              Report SowingReport: EventNames=[Canola].Sowing
                VariableNames:
                  [Clock].Today
                  [Canola].SowingData.Cultivar
                  [IWeather].Latitude
                  [IWeather].Longitude
      Folder Ganmain_2016_Ex2
        Experiment Ganmain_2016_Ex2
          Factors
            Permutation
              Factor TOS_index
                CompositeFactor 1
                  Specifications:
                    [Sowing].Script.SowDate = 7-Apr
                    [Irrigate].Script.irrigDate = 7-Apr
                    [Irrigate].Script.amount = 15
                    [FertiliseSplit].Script.FertiliserDates = 7-Apr,25-May
                CompositeFactor 2
                  Specifications:
                    [Sowing].Script.SowDate = 21-Apr
                    [FertiliseSplit].Script.FertiliserDates = 21-Apr,8-Jun
              Factor Cv
                Specification=[Sowing].Script.CultivarName = 44Y89_CL,Archer,ATR_Stingray,ATR_Wahoo
              Factor Popn: Specification=[Sowing].Script.Population =  45
              Factor Fert
                CompositeFactor nil: Specifications=[Fertilise].Script.Amount = 0
                CompositeFactor up_front
                  Specifications:
                    [Fertilise].Script.Amount = 200
                    [Fertilise].Script.FertiliserDates = 7-Apr
                CompositeFactor split: Specifications=[FertiliseSplit].Script.Amount = 200
                CompositeFactor top_dress: Specifications=[Fertilise].Script.Amount = 200
              Factor Irrig: Specification=[codes].Script.irrig_treat = nil
              Memo Question
                Not sure I have the top_dress correct
          Simulation Ganmain_2016_Ex2
            Clock: Start=2016-03-01; End=2016-12-01
            Summary summaryfile
            Weather: FileName=met/74202_CombGSE.met
            SoilArbitrator
            Zone paddock: Area=1; Slope=0; AspectAngle=0; Altitude=50
              Folder manager
                Manager Reset on date: same as Incomplete.OCP Agronomy.Ganmain_2014_Ex1.Ganmain_2014_Ex1.Ganmain_OCP_2014.paddock.manager.Reset on date
                Manager Sowing
                  SowDate = 6-Apr
                  CultivarName = Hyola575
                  SowingDepth = 20
                  RowSpacing = 250
                  Population = 20
                  script: same as in Incomplete.OCP Agronomy.Breeza_2014_Ex1.Breeza_2014_Ex1.Breeza_2014_Ex1_Base.paddock.manager.Sowing
                Manager Fertilise
                  FertiliserType = UreaN
                  FertiliserDates = 6-Dec
                  fert_criteria = 1000
                  Amount = 0
                  FertiliserDepth = 20
                  script: same as in Incomplete.OCP Agronomy.Canowindra_2018_Ex1a.Canowindra_2018_Ex1a.Canowindra_OCP_2018.paddock.manager.Fertilise
                Manager FertiliseSplit
                  FertiliserType = UreaN
                  FertiliserDates = 6-Apr, 6_May
                  fert_criteria = 1000
                  Amount = 0
```csharp
using APSIM.Shared.Utilities;
using Models.PMF;
using Models.Core;
using Models.Soils;
using Models.Soils.Nutrients;
using System;
namespace Models
{
    [Serializable]
    public class Script : Model
    {
        [Link] Clock Clock;
        [Link] Fertiliser Fertiliser;
        [Link] INutrient nutrient;
        [Link] Summary sum;
        
        [Separator("A component to apply fertiliser on one or more dates on every year of the simulation")]

        [Description("Type of fertiliser to apply? ")] 
        [Display(Type = DisplayType.FertiliserType)]public string FertiliserType { get; set; }

        [Description("Enter the two fertilisation dates as dd-mmm with comma separation: ")] 
        public string[] FertiliserDates { get; set; } 

        [Description("Don't add fertiliser if N in top 2 layers exceeds (kg/ha) : ")]
        public double fert_criteria { get; set; }

        [Description("Total amount of fertiliser to be applied (kg /ha)")] 
        public double Amount { get; set; }

        [EventSubscribe("DoManagement")]
        private void OnDoManagement(object sender, EventArgs e)
        {
            foreach (string ddMMM in FertiliserDates)
            {
                if (DateUtilities.DatesEqual(ddMMM, Clock.Today))
                {
                    double soil_N = nutrient.NH4.kgha[0] + nutrient.NO3.kgha[0] + nutrient.NH4.kgha[1] + nutrient.NO3.kgha[1];
                    if (soil_N <= fert_criteria) 
                         Fertiliser.Apply(amount: Amount / FertiliserDates.Length, type: FertiliserType, depth: 0.0);
                    else
                        sum.WriteMessage(this, "No fertilising as top two layers have " + soil_N.ToString() + "kg/ha N", MessageType.Diagnostic);
                }
            }
        }
    }
}
```
                Manager Irrigate
                  irrigDate = 7-Apr
                  amount = 0
                  script: same as in Incomplete.OCP Agronomy.Canowindra_2016_Ex1b.Canowindra_2016_Ex1b.Canowindra_OCP_2016_Ex1b.paddock.manager.Irrigate
                Manager codes: same as Incomplete.OCP Agronomy.Condo_2017_Ex1c.Condo_2017_Ex1c.condo_OCP_2017_Ex1c.paddock.manager.codes
                Manager HarvestAfterDate
                  HarvestDate = 2-Nov
                  script: same as in Validation.Growth Experiments.Kojonup.Kojonup2013.Kojonup2013Base.paddock.HarvestAfterDate
              Plant canola: ResourceName=Canola
              Soil: SoilType=SNSW; Site=CSU; NearestTown=Wagga Wagga; Region=Southern NSW; State=NSW; Latitude=0; Longitude=0; DataSource=Kirsten Verburg
                Chemical: PHUnits=Water
                  Thickness=[100, 100, 100, 100, 100, 100, 100, 100, 100, 100, 100, 100, 100, 100, 100, 100, 100, 100, 100, 600]
                  PH=[4.7, 5.4663, 6.1, 6.2811, 6.4622, 6.5527, 6.6433, 6.7338, 6.8244, 6.8244, 7.0054, 7.1865, 7.3676, 7.5487, 7.6392, 7.7297, 7.7297, 7.8203, 7.8203, 7.8203]
                WaterBalance SoilWater: same as Incomplete.OCP Agronomy.Ganmain_2014_Ex1.Ganmain_2014_Ex1.Ganmain_OCP_2014.paddock.soil.SoilWater
                Nutrient
                Organic: same as Incomplete.OCP Agronomy.Ganmain_2014_Ex1.Ganmain_2014_Ex1.Ganmain_OCP_2014.paddock.soil.Organic
                Water: FilledFromTop=false
                  Thickness=[100, 100, 100, 100, 100, 100, 100, 100, 100, 100, 100, 100, 100, 100, 100, 100, 100, 100, 100, 100, 500]
                  InitialValues=[0.12315, 0.136, 0.16735, 0.2087, 0.2467, 0.2657, 0.2717, 0.27455, 0.2744, 0.2782, 0.28315, 0.28315, 0.2839, 0.2839, 0.2839, 0.2839, 0.2839, 0.2839, 0.2839, 0.2839, 0.2839]
                Physical
                  Thickness  BD    AirDry  LL15   DUL    SAT
                  100        1.48  0.03    0.115  0.278  0.34
                  100        1.49  0.1     0.127  0.307  0.34
                  100        1.41  0.1     0.16   0.307  0.4
                  100        1.37  0.13    0.2    0.374  0.4
                  100        1.41  0.13    0.24   0.374  0.4
                  100        1.41  0.13    0.26   0.374  0.4
                  100        1.52  0.13    0.265  0.399  0.425
                  100        1.52  0.13    0.268  0.399  0.425
                  100        1.62  0.13    0.27   0.358  0.388
                  100        1.62  0.13    0.274  0.358  0.388
                  100        1.66  0.13    0.28   0.343  0.373
                  100        1.66  0.13    0.28   0.343  0.373
                  100        1.62  0.13    0.28   0.358  0.388
                  100        1.62  0.13    0.28   0.358  0.388
                  100        1.62  0.13    0.28   0.358  0.388
                  100        1.62  0.13    0.28   0.358  0.388
                  100        1.62  0.13    0.28   0.358  0.388
                  100        1.62  0.13    0.28   0.358  0.388
                  100        1.62  0.13    0.28   0.358  0.388
                  100        1.62  0.13    0.28   0.358  0.388
                  500        1.62  0.13    0.28   0.358  0.388
                  SoilCrop WheatSoil: same as Incomplete.OCP Agronomy.Ganmain_2014_Ex1.Ganmain_2014_Ex1.Ganmain_OCP_2014.paddock.soil.Physical.WheatSoil
                  SoilCrop CanolaSoil: same as Incomplete.OCP Agronomy.Ganmain_2014_Ex1.Ganmain_2014_Ex1.Ganmain_OCP_2014.paddock.soil.Physical.CanolaSoil
                Solute NO3: InitialValuesUnits=ppm; WaterTableConcentration=0; D0=0; DepthConstant=0; MaxDepthSoluteAccessible=0; RunoffEffectivenessAtMovingSolute=0; MaxEffectiveRunoff=0
                  Thickness=[100, 100, 100, 100, 100, 100, 100, 100, 100, 100, 100, 100, 100, 100, 100, 100, 100, 100, 100, 600]
                  InitialValues=[23, 2, 2, 3, 3, 3, 3, 3, 3, 3, 3, 3, 3, 3, 3, 3, 3, 3, 1, 1]
                Solute NH4: InitialValuesUnits=ppm; WaterTableConcentration=0; D0=0; DepthConstant=0; MaxDepthSoluteAccessible=0; RunoffEffectivenessAtMovingSolute=0; MaxEffectiveRunoff=0
                  Thickness=[100, 100, 100, 100, 100, 100, 100, 100, 100, 100, 100, 100, 100, 100, 100, 100, 100, 100, 100, 600]
                  InitialValues=[3, 1, 1, 1, 1, 1, 1, 1, 1, 1, 1, 1, 1, 1, 1, 1, 1, 1, 1, 1]
                Solute Urea: same as Incomplete.OCP Agronomy.Ganmain_2014_Ex1.Ganmain_2014_Ex1.Ganmain_OCP_2014.paddock.soil.Urea
                SoilTemperature Temperature
              MicroClimate: a_interception=0; b_interception=0; c_interception=0; d_interception=0; SoilHeatFluxFraction=0.1; MinimumHeightDiffForNewLayer=0; NightInterceptionFraction=0; ReferenceHeight=1
              SurfaceOrganicMatter SurfaceOM: InitialResidueName=wheat; InitialResidueType=wheat; InitialResidueMass=6000; InitialStandingFraction=0; InitialCPR=0; InitialCNR=80
              Fertiliser
              Manager Fertilise at sowing
                Crop = [canola]
                FertiliserType = NH4N
                Amount = 0
                script: same as in Validation.Growth Experiments.Kojonup.Kojonup2013.Kojonup2013Base.paddock.Fertilise at sowing
              Irrigation
              Report DailyReport: same as Incomplete.OCP Agronomy.AlmaPark_2015_Ex2a.AlmaPark_2015_Ex2a.AlmaPark2015_Ex2a_base.paddock.DailyReport
              Report HarvestReport
              Report DailyBiomass: same as Incomplete.DP Agronomy.WaggaCR2008.WaggaWagga2008CR.Paddock.DailyBiomass
              Report SowingReport: EventNames=[Canola].Sowing
                VariableNames:
                  [Clock].Today
                  [Canola].SowingData.Cultivar
                  [IWeather].Latitude
                  [IWeather].Longitude
      Folder Ganmain_2016_Ex6
        Memo Question
          Check fertiliser date. 21-Apr??
        Experiment Ganmain_2016_Ex6
          Factors
            Permutation
              Factor TOS_index
                CompositeFactor 1: Specifications=[Sowing].Script.SowDate = 21-Apr
              Factor Cv: Specification=[Sowing].Script.CultivarName = 44Y89_CL
              Factor Popn: Specification=[Sowing].Script.Population =  45
              Factor Fert
                Specification=[Fertilise].Script.Amount = 0,1000,100,150,200,250,300,500,50,750
              Factor Irrig: Specification=[codes].Script.irrig_treat = nil
          Simulation Ganmain_OCP_2016_Ex6
            Clock: Start=2016-03-01; End=2016-12-01
            Summary summaryfile
            Weather: FileName=met/74202_CombGSE.met
            SoilArbitrator
            Zone paddock: Area=1; Slope=0; AspectAngle=0; Altitude=50
              Folder manager
                Manager Reset on date
                  ResetDate = 3-May
                  ResetWater = Yes
                  ResetN = Yes
                  ResetSOM = No
                  script: same as in Incomplete.OCP Agronomy.Breeza_2014_Ex1.Breeza_2014_Ex1.Breeza_2014_Ex1_Base.paddock.manager.Reset on date
                Manager Sowing: same as Incomplete.OCP Agronomy.AlmaPark_2015_Ex2a.AlmaPark_2015_Ex2a.AlmaPark2015_Ex2a_base.paddock.manager.Sowing
                Manager Fertilise
                  FertiliserType = UreaN
                  FertiliserDates = 21-Apr
                  fert_criteria = 1000
                  Amount = 0
                  FertiliserDepth = 50
                  script: same as in Incomplete.OCP Agronomy.Canowindra_2018_Ex1a.Canowindra_2018_Ex1a.Canowindra_OCP_2018.paddock.manager.Fertilise
                Manager codes
                  location = Ganmain
                  TOS_index = 1
                  irrig_treat = nil
                  trial_code = CFZA16GANM2
```csharp
using Models.Soils;
using System;
using Models.Core;
using Models.PMF;
namespace Models
{
    [Serializable]
    [System.Xml.Serialization.XmlInclude(typeof(Model))]
    public class Script : Model
    {
        [Link] Clock Clock;

        [Description("location")]
        public string location { get; set; }

        [Description("Time of sowing")]
        public string TOS_index { get; set; }

        [Description("irrig_treat")]
        public string irrig_treat { get; set; }

        [Description("trial_code")]
        public string trial_code { get; set; }

        [EventSubscribe("StartOfSimulation")]
        private void OnSimulationCommencing(object sender, EventArgs e)
        {

        }
    }
}
```
                Manager HarvestAfterDate
                  HarvestDate = 8-Oct
                  script: same as in Validation.Growth Experiments.Kojonup.Kojonup2013.Kojonup2013Base.paddock.HarvestAfterDate
              Fertiliser
              Manager Fertilise at sowing: same as Incomplete.OCP Agronomy.Downside_2016_Ex1b.Downside_2016_Ex1b.Downside_OCP_2016_Ex1b.paddock.Fertilise at sowing
              Irrigation
              SurfaceOrganicMatter: InitialResidueName=wheat; InitialResidueType=wheat; InitialResidueMass=6000; InitialStandingFraction=0; InitialCPR=0; InitialCNR=80
              Plant canola: ResourceName=Canola
              Soil: SoilType=SNSW; Site=CSU; NearestTown=Wagga Wagga; Region=Southern NSW; State=NSW; Latitude=0; Longitude=0; DataSource=Kirsten Verburg
                Chemical: PHUnits=Water
                  Thickness=[100, 100, 100, 100, 100, 100, 100, 100, 100, 100, 100, 100, 100, 100, 100, 100, 100, 100, 100, 100]
                  PH=[4.7, 5.4663, 6.1, 6.2811, 6.4622, 6.5527, 6.6433, 6.7338, 6.8244, 6.8244, 7.0054, 7.1865, 7.3676, 7.5487, 7.6392, 7.7297, 7.7297, 7.8203, 7.8203, 7.8203]
                Physical
                  Thickness  BD    AirDry  LL15   DUL    SAT
                  100        1.48  0.03    0.127  0.278  0.34
                  100        1.49  0.1     0.156  0.307  0.34
                  100        1.41  0.1     0.148  0.307  0.4
                  100        1.37  0.13    0.253  0.374  0.4
                  100        1.41  0.13    0.261  0.374  0.4
                  100        1.41  0.13    0.261  0.374  0.4
                  100        1.52  0.13    0.268  0.399  0.426
                  100        1.52  0.13    0.268  0.399  0.426
                  100        1.62  0.13    0.285  0.359  0.389
                  100        1.62  0.13    0.274  0.359  0.389
                  100        1.66  0.13    0.281  0.344  0.374
                  100        1.66  0.13    0.281  0.344  0.374
                  100        1.62  0.13    0.254  0.359  0.389
                  100        1.62  0.13    0.254  0.359  0.389
                  100        1.62  0.13    0.254  0.359  0.389
                  100        1.62  0.13    0.256  0.359  0.389
                  100        1.62  0.13    0.256  0.359  0.389
                  100        1.62  0.13    0.256  0.359  0.389
                  100        1.62  0.13    0.256  0.359  0.389
                  100        1.62  0.13    0.256  0.359  0.389
                  SoilCrop WheatSoil
                    LL=[0.127, 0.156, 0.148, 0.253, 0.261, 0.261, 0.268, 0.268, 0.285, 0.274, 0.281, 0.281, 0.254, 0.254, 0.254, 0.256, 0.256, 0.256, 0.256, 0.256]
                    KL=[0.08, 0.08, 0.06, 0.06, 0.05, 0.04, 0.04, 0.04, 0.04, 0.04, 0.04, 0.03, 0.03, 0.02, 0.02, 0.01, 0.01, 0.01, 0.01, 0.01]
                    XF=[1, 1, 1, 1, 1, 1, 1, 1, 1, 1, 1, 1, 1, 1, 1, 1, 0.8, 0.4, 0, 0]
                  SoilCrop CanolaSoil: same as Incomplete.OCP Agronomy.Ganmain_2016_Ex6.Ganmain_2016_Ex6.Ganmain_OCP_2016_Ex6.paddock.soil.Physical.WheatSoil
                WaterBalance SoilWater: same as Incomplete.OCP Agronomy.AlmaPark_2015_Ex2a.AlmaPark_2015_Ex2a.AlmaPark2015_Ex2a_base.paddock.soil.SoilWater
                Nutrient
                Organic: FOMCNRatio=80; CarbonUnits=Total
                  Thickness  Carbon  SoilCNRatio  FBiom  FInert  FOM
                  100        0.83    8            0.06   0.01    293.1807
                  100        0.35    8            0.05   0.01    252.3429
                  100        0.33    8            0.04   0.31    217.1936
                  100        0.22    8            0.03   0.35    186.9402
                  100        0.22    8            0.02   0.4     160.901
                  100        0.22    8            0.01   0.45    138.4887
                  100        0.19    8            0.01   0.5     119.1984
                  100        0.17    8            0.01   0.6     102.595
                  100        0.15    8            0.01   0.7     88.3043
                  100        0.12    8            0.01   0.8     76.0042
                  100        0.11    8            0.01   0.9     65.4174
                  100        0.1     8            0.01   0.99    56.3053
                  100        0.1     8            0.01   0.99    48.4624
                  100        0.1     8            0.01   0.99    41.712
                  100        0.1     8            0.01   0.99    35.9019
                  100        0.1     8            0.01   0.99    30.901
                  100        0.08    8            0.01   0.99    26.5967
                  100        0.06    8            0.01   0.99    22.892
                  100        0.05    8            0.01   0.99    19.7034
                  100        0.04    8            0.01   0.99    16.9588
                Water: Thickness=[100, 200, 300, 300, 300, 300, 300, 200]; InitialValues=[0.12, 0.128, 0.253, 0.276, 0.335, 0.345, 0.272, 0.272]; FilledFromTop=false
                Solute NO3: InitialValuesUnits=ppm; WaterTableConcentration=0; D0=0; DepthConstant=0; MaxDepthSoluteAccessible=0; RunoffEffectivenessAtMovingSolute=0; MaxEffectiveRunoff=0
                  Thickness=[100, 100, 100, 100, 100, 100, 100, 100, 100, 100, 100, 100, 100, 100, 100, 100, 100, 100, 100, 100]
                  InitialValues=[23, 2, 2, 3, 3, 3, 3, 3, 3, 3, 3, 3, 3, 3, 3, 3, 3, 3, 1, 1]
                Solute NH4: InitialValuesUnits=ppm; WaterTableConcentration=0; D0=0; DepthConstant=0; MaxDepthSoluteAccessible=0; RunoffEffectivenessAtMovingSolute=0; MaxEffectiveRunoff=0
                  Thickness=[100, 100, 100, 100, 100, 100, 100, 100, 100, 100, 100, 100, 100, 100, 100, 100, 100, 100, 100, 100]
                  InitialValues=[3, 1, 1, 1, 1, 1, 1, 1, 1, 1, 1, 1, 1, 1, 1, 1, 1, 1, 1, 1]
                Solute Urea: same as Validation.Growth Experiments.Wagga.Wagga2008.WaggaWagga2008.Paddock.Soil.Urea
                SoilTemperature Temperature
              MicroClimate: a_interception=0; b_interception=1; c_interception=0; d_interception=0; SoilHeatFluxFraction=0; MinimumHeightDiffForNewLayer=0; NightInterceptionFraction=0; ReferenceHeight=2
              Report DailyReport: same as Incomplete.OCP Agronomy.AlmaPark_2015_Ex2a.AlmaPark_2015_Ex2a.AlmaPark2015_Ex2a_base.paddock.DailyReport
              Report HarvestReport
              Report DailyBiomass: same as Incomplete.DP Agronomy.WaggaCR2008.WaggaWagga2008CR.Paddock.DailyBiomass
              Report SowingReport: EventNames=[Canola].Sowing
                VariableNames:
                  [Clock].Today
                  [Canola].SowingData.Cultivar
                  [IWeather].Latitude
                  [IWeather].Longitude
      Folder Ganmain_2017_Ex1a
        Experiment Ganmain_2017_Ex1a
          Factors
            Permutation
              Factor TOS_index
                CompositeFactor 1: Specifications=[Sowing].Script.SowDate = 8-Apr
                CompositeFactor 2: Specifications=[Sowing].Script.SowDate = 24-Apr
              Factor Cv
                Specification=[Sowing].Script.CultivarName = 44Y90_CL,45Y25_RR,Archer,ATR_Bonito,ATR_Stingray,ATR_Wahoo,Hyola600_RR,NS_Diamond
              Factor Popn: Specification=[Sowing].Script.Population =  45
              Factor Fert
                CompositeFactor D5: Specifications=[Fertilise].Script.Amount = 0
                CompositeFactor D9: Specifications=[Fertilise].Script.Amount = 100
              Factor Irrig: Specification=[codes].Script.irrig_treat = nil
          Simulation Ganmain_OCP_2017_Ex1a
            Clock: Start=2016-11-15; End=2017-12-01
            Summary summaryfile
            Weather: FileName=met/74202_CombGSE.met
            SoilArbitrator
            Zone paddock: Area=1; Slope=0; AspectAngle=0; Altitude=50
              Folder manager
                Manager Reset on date: same as Incomplete.OCP Agronomy.Canowindra_2015_Ex1b.Canowindra_2015_Ex1b.Canowindra_OCP_2015_Ex1b.paddock.manager.Reset on date
                Manager Sowing: same as Incomplete.OCP Agronomy.AlmaPark_2015_Ex2a.AlmaPark_2015_Ex2a.AlmaPark2015_Ex2a_base.paddock.manager.Sowing
                Manager Fertilise
                  FertiliserType = UreaN
                  FertiliserDates = 4-Jul
                  fert_criteria = 1000
                  Amount = 0
                  FertiliserDepth = 0
                  script: same as in Incomplete.OCP Agronomy.Canowindra_2018_Ex1a.Canowindra_2018_Ex1a.Canowindra_OCP_2018.paddock.manager.Fertilise
                Manager codes
                  location = Ganmain
                  TOS_index = 1
                  irrig_treat = nil
                  trial_code = CSTB17GANM2
                  fert_code = D5
```csharp
using Models.Soils;
using System;
using Models.Core;
using Models.PMF;
namespace Models
{
    [Serializable]
    [System.Xml.Serialization.XmlInclude(typeof(Model))]
    public class Script : Model
    {
        [Link] Clock Clock;

        [Description("location")]
        public string location { get; set; }

        [Description("Time of sowing")]
        public string TOS_index { get; set; }

        [Description("irrig_treat")]
        public string irrig_treat { get; set; }

        [Description("trial_code")]
        public string trial_code { get; set; }

        [Description("fert_code")]
        public string fert_code { get; set; }

        [EventSubscribe("StartOfSimulation")]
        private void OnSimulationCommencing(object sender, EventArgs e)
        {
            /*
                location = '[location]' !'Condobolin'
irrig_treat = '[irrig_treat]' ! 'dry'
trial_code = '[trial_code]' ! 'CSTB16COND2'
minn_tot = 0
TOS_index = [TOS_index] !'1'
dens_trt = 45
exp = '1a'
fert_treat = '[fert_code]'
            */
        }
    }
}
```
                Manager HarvestAfterDate
                  HarvestDate = 13-Nov
                  script: same as in Validation.Growth Experiments.Kojonup.Kojonup2013.Kojonup2013Base.paddock.HarvestAfterDate
              Fertiliser
              Manager Fertilise at sowing
                Crop = [canola]
                FertiliserType = UreaN
                Amount = 79
                script: same as in Validation.Growth Experiments.Kojonup.Kojonup2013.Kojonup2013Base.paddock.Fertilise at sowing
              Irrigation
              SurfaceOrganicMatter: InitialResidueName=wheat; InitialResidueType=wheat; InitialResidueMass=6000; InitialStandingFraction=0; InitialCPR=0; InitialCNR=80
              Plant canola: ResourceName=Canola
              Soil: SoilType=SNSW; Site=CSU; NearestTown=Wagga Wagga; Region=Southern NSW; State=NSW; Latitude=0; Longitude=0; DataSource=Kirsten Verburg
                Chemical: PHUnits=Water
                  Thickness=[100, 100, 100, 100, 100, 100, 100, 100, 100, 100, 100, 100, 100, 100, 100, 100, 100, 100, 100, 600]
                  PH=[5.4, 5.8, 6.1, 6.2811, 6.4622, 6.5527, 6.6433, 6.7338, 6.8244, 6.8244, 7.0054, 7.1865, 7.3676, 7.5487, 7.6392, 7.7297, 7.7297, 7.8203, 7.8203, 7.8203]
                WaterBalance SoilWater: same as Incomplete.OCP Agronomy.Ganmain_2014_Ex1.Ganmain_2014_Ex1.Ganmain_OCP_2014.paddock.soil.SoilWater
                Nutrient
                Organic: FOMCNRatio=80; CarbonUnits=Total
                  Thickness  Carbon  SoilCNRatio  FBiom  FInert  FOM
                  100        1.2     8            0.06   0.01    250.1585
                  100        0.41    8            0.05   0.01    221.8706
                  100        0.33    8            0.04   0.31    196.7816
                  100        0.22    8            0.03   0.35    174.5296
                  100        0.22    8            0.02   0.4     154.7939
                  100        0.22    8            0.01   0.45    137.2899
                  100        0.19    8            0.01   0.5     121.7652
                  100        0.17    8            0.01   0.6     107.996
                  100        0.15    8            0.01   0.7     95.7839
                  100        0.12    8            0.01   0.8     84.9527
                  100        0.11    8            0.01   0.9     75.3463
                  100        0.1     8            0.01   0.99    66.8262
                  100        0.1     8            0.01   0.99    59.2695
                  100        0.1     8            0.01   0.99    52.5673
                  100        0.1     8            0.01   0.99    46.623
                  100        0.1     8            0.01   0.99    41.3509
                  100        0.08    8            0.01   0.99    36.675
                  100        0.06    8            0.01   0.99    32.5278
                  100        0.05    8            0.01   0.99    28.8496
                  600        0.04    8            0.01   0.99    14.0426
                Water: FilledFromTop=false
                  Thickness=[100, 100, 100, 100, 100, 100, 100, 100, 100, 100, 100, 100, 100, 100, 100, 100, 100, 100, 100, 100, 500]
                  InitialValues=[0.12315, 0.136, 0.16735, 0.2087, 0.2467, 0.2657, 0.2717, 0.27455, 0.2744, 0.27825, 0.2832, 0.2832, 0.28395, 0.28395, 0.28395, 0.28395, 0.28395, 0.28395, 0.28395, 0.28395, 0.28395]
                Physical
                  Thickness  BD    AirDry  LL15   DUL    SAT
                  100        1.48  0.03    0.115  0.278  0.34
                  100        1.49  0.1     0.127  0.307  0.34
                  100        1.41  0.1     0.16   0.307  0.4
                  100        1.37  0.13    0.2    0.374  0.4
                  100        1.41  0.13    0.24   0.374  0.4
                  100        1.41  0.13    0.26   0.374  0.4
                  100        1.52  0.13    0.265  0.399  0.426
                  100        1.52  0.13    0.268  0.399  0.426
                  100        1.62  0.13    0.27   0.358  0.389
                  100        1.62  0.13    0.274  0.359  0.389
                  100        1.66  0.13    0.28   0.344  0.374
                  100        1.66  0.13    0.28   0.344  0.374
                  100        1.62  0.13    0.28   0.359  0.389
                  100        1.62  0.13    0.28   0.359  0.389
                  100        1.62  0.13    0.28   0.359  0.389
                  100        1.62  0.13    0.28   0.359  0.389
                  100        1.62  0.13    0.28   0.359  0.389
                  100        1.62  0.13    0.28   0.359  0.389
                  100        1.62  0.13    0.28   0.359  0.389
                  100        1.62  0.13    0.28   0.359  0.389
                  500        1.62  0.13    0.28   0.359  0.389
                  SoilCrop WheatSoil: same as Incomplete.OCP Agronomy.Ganmain_2014_Ex1.Ganmain_2014_Ex1.Ganmain_OCP_2014.paddock.soil.Physical.WheatSoil
                  SoilCrop CanolaSoil: same as Incomplete.OCP Agronomy.Ganmain_2014_Ex1.Ganmain_2014_Ex1.Ganmain_OCP_2014.paddock.soil.Physical.CanolaSoil
                Solute NO3: InitialValuesUnits=ppm; WaterTableConcentration=0; D0=0; DepthConstant=0; MaxDepthSoluteAccessible=0; RunoffEffectivenessAtMovingSolute=0; MaxEffectiveRunoff=0
                  Thickness=[100, 100, 100, 100, 100, 100, 100, 100, 100, 100, 100, 100, 100, 100, 100, 100, 100, 100, 100, 600]
                  InitialValues=[26, 4, 4, 3, 3, 3, 2, 2, 2, 2, 2, 2, 2, 2, 2, 2, 2, 2, 2, 2]
                Solute NH4: InitialValuesUnits=ppm; WaterTableConcentration=0; D0=0; DepthConstant=0; MaxDepthSoluteAccessible=0; RunoffEffectivenessAtMovingSolute=0; MaxEffectiveRunoff=0
                  Thickness=[100, 100, 100, 100, 100, 100, 100, 100, 100, 100, 100, 100, 100, 100, 100, 100, 100, 100, 100, 600]
                  InitialValues=[2, 5, 5, 2, 2, 2, 1, 1, 1, 1, 1, 1, 1, 1, 1, 1, 1, 1, 1, 1]
                Solute Urea: same as Incomplete.OCP Agronomy.Ganmain_2014_Ex1.Ganmain_2014_Ex1.Ganmain_OCP_2014.paddock.soil.Urea
                SoilTemperature Temperature
              MicroClimate: a_interception=0; b_interception=1; c_interception=0; d_interception=0; SoilHeatFluxFraction=0; MinimumHeightDiffForNewLayer=0; NightInterceptionFraction=0; ReferenceHeight=2
              Report DailyReport: same as Incomplete.OCP Agronomy.AlmaPark_2015_Ex2a.AlmaPark_2015_Ex2a.AlmaPark2015_Ex2a_base.paddock.DailyReport
              Report HarvestReport
              Report DailyBiomass: same as Incomplete.DP Agronomy.WaggaCR2008.WaggaWagga2008CR.Paddock.DailyBiomass
              Report SowingReport: EventNames=[Canola].Sowing
                VariableNames:
                  [Clock].Today
                  [Canola].SowingData.Cultivar
                  [IWeather].Latitude
                  [IWeather].Longitude
      Folder Ganmain_2018_Ex1a
        Experiment Ganmain_2018_Ex1a
          Factors
            Permutation
              Factor TOS_index
                CompositeFactor 1
                  Specifications:
                    [Sowing].Script.SowDate = 5-Apr
                    [Irrigate].Script.irrigDates = 5-Apr,17-Apr
                    [Irrigate].Script.amount = 12
                CompositeFactor 2
                  Specifications:
                    [Sowing].Script.SowDate = 26-Apr
                    [Irrigate].Script.irrigDates = 19-Apr
                    [Irrigate].Script.amount = 14
              Factor Cv
                Specification=[Sowing].Script.CultivarName =44Y90_CL,45Y25_RR,45Y91_CL,Archer,ATR_Bonito,ATR_Stingray,ATR_Wahoo,NS_Diamond
              Factor Popn: Specification=[Sowing].Script.Population =  45
              Factor Fert
                CompositeFactor D3: Specifications=[Fertilise1].Script.Amount = 0
                CompositeFactor D9: Specifications=[Fertilise1].Script.Amount = 330
              Factor Irrig: Specification=[codes].Script.irrig_treat = nil
          Simulation Ganmain_OCP_2018
            Clock: Start=2017-11-15; End=2018-12-01
            Summary summaryfile
            Weather: FileName=met/74202.met
            SoilArbitrator
            Zone paddock: Area=1; Slope=0; AspectAngle=0; Altitude=50
              Folder manager
                Manager Reset on date: same as Incomplete.OCP Agronomy.Canowindra_2016_Ex1b.Canowindra_2016_Ex1b.Canowindra_OCP_2016_Ex1b.paddock.manager.Reset on date
                Manager Sowing: same as Incomplete.OCP Agronomy.AlmaPark_2015_Ex2a.AlmaPark_2015_Ex2a.AlmaPark2015_Ex2a_base.paddock.manager.Sowing
                Manager Fertilise
                  FertiliserType = UreaN
                  FertiliserDates = 3_Apr
                  fert_criteria = 1000
                  Amount = 40
                  FertiliserDepth = 0
                  script: same as in Incomplete.OCP Agronomy.Canowindra_2018_Ex1a.Canowindra_2018_Ex1a.Canowindra_OCP_2018.paddock.manager.Fertilise
                Manager Fertilise1
                  FertiliserType = UreaN
                  FertiliserDates = 7-Jun
                  fert_criteria = 1000
                  Amount = 0
                  FertiliserDepth = 0
                  script: same as in Incomplete.OCP Agronomy.Canowindra_2018_Ex1a.Canowindra_2018_Ex1a.Canowindra_OCP_2018.paddock.manager.Fertilise
                Manager codes
                  location = Ganmain
                  TOS_index = 1
                  irrig_treat = nil
                  trial_code = CSTB18GANM2
                  fert_code = D3
                  script: same as in Incomplete.OCP Agronomy.Condo_2017_Ex1c.Condo_2017_Ex1c.condo_OCP_2017_Ex1c.paddock.manager.codes
                Manager Irrigate
                  irrigDates =
                  amount = 0
```csharp
using Models.Soils;
using System;
using Models.Core;
using APSIM.Shared.Utilities;
namespace Models
{
    [Serializable]
    [System.Xml.Serialization.XmlInclude(typeof(Model))]
    public class Script : Model
    {
        [Link] Clock clock;    
           [Link] Irrigation irrigation;

           [Description("Dates for irrigation")] 
        public string[] irrigDates { get; set; }

        [Description("Amount of irrigation (mm)")]
        public double amount {get; set; }

        [EventSubscribe("DoManagement")]
        private void OnDoManagement(object sender, EventArgs e)
        {
            foreach (string ddMMM in irrigDates)
            {
                if (DateUtilities.DatesEqual(ddMMM, clock.Today))
                    irrigation.Apply(amount: amount);
            }
        }
    }
}
```
                Manager HarvestAfterDate
                  HarvestDate = 8-Nov
                  script: same as in Validation.Growth Experiments.Kojonup.Kojonup2013.Kojonup2013Base.paddock.HarvestAfterDate
              Fertiliser
              Manager Fertilise at sowing: same as Incomplete.OCP Agronomy.Ganmain_2017_Ex1a.Ganmain_2017_Ex1a.Ganmain_OCP_2017_Ex1a.paddock.Fertilise at sowing
              Irrigation
              SurfaceOrganicMatter: InitialResidueName=barley; InitialResidueType=barley; InitialResidueMass=6000; InitialStandingFraction=0; InitialCPR=0; InitialCNR=80
              Plant canola: ResourceName=Canola
              Soil: SoilType=SNSW; Site=CSU; NearestTown=Wagga Wagga; Region=Southern NSW; State=NSW; Latitude=0; Longitude=0; DataSource=Kirsten Verburg
                Chemical: PHUnits=Water
                  Thickness=[100, 100, 100, 100, 100, 100, 100, 100, 100, 100, 100, 100, 100, 100, 100, 100, 100, 100, 100, 600]
                  PH=[5.9, 6, 6, 6.2811, 6.4622, 6.5527, 6.6433, 6.7338, 6.8244, 6.8244, 7.0054, 7.1865, 7.3676, 7.5487, 7.6392, 7.7297, 7.7297, 7.8203, 7.8203, 7.8203]
                WaterBalance SoilWater: same as Incomplete.OCP Agronomy.Ganmain_2014_Ex1.Ganmain_2014_Ex1.Ganmain_OCP_2014.paddock.soil.SoilWater
                Nutrient
                Organic: FOMCNRatio=80; CarbonUnits=Total
                  Thickness  Carbon  SoilCNRatio  FBiom  FInert  FOM
                  100        1.09    8            0.06   0.01    250.1585
                  100        0.28    8            0.05   0.01    221.8706
                  100        0.28    8            0.04   0.31    196.7816
                  100        0.22    8            0.03   0.35    174.5296
                  100        0.22    8            0.02   0.4     154.7939
                  100        0.22    8            0.01   0.45    137.2899
                  100        0.19    8            0.01   0.5     121.7652
                  100        0.17    8            0.01   0.6     107.996
                  100        0.15    8            0.01   0.7     95.7839
                  100        0.12    8            0.01   0.8     84.9527
                  100        0.11    8            0.01   0.9     75.3463
                  100        0.1     8            0.01   0.99    66.8262
                  100        0.1     8            0.01   0.99    59.2695
                  100        0.1     8            0.01   0.99    52.5673
                  100        0.1     8            0.01   0.99    46.623
                  100        0.1     8            0.01   0.99    41.3509
                  100        0.08    8            0.01   0.99    36.675
                  100        0.06    8            0.01   0.99    32.5278
                  100        0.05    8            0.01   0.99    28.8496
                  600        0.04    8            0.01   0.99    14.0426
                Physical: same as Incomplete.OCP Agronomy.Ganmain_2014_Ex1.Ganmain_2014_Ex1.Ganmain_OCP_2014.paddock.soil.Physical
                Water: same as Incomplete.OCP Agronomy.Ganmain_2014_Ex1.Ganmain_2014_Ex1.Ganmain_OCP_2014.paddock.soil.Water
                Solute NO3: InitialValuesUnits=ppm; WaterTableConcentration=0; D0=0; DepthConstant=0; MaxDepthSoluteAccessible=0; RunoffEffectivenessAtMovingSolute=0; MaxEffectiveRunoff=0
                  Thickness=[100, 100, 100, 100, 100, 100, 100, 100, 100, 100, 100, 100, 100, 100, 100, 100, 100, 100, 100, 600]
                  InitialValues=[51, 2, 2, 3, 3, 3, 1, 1, 1, 2, 2, 2, 3, 3, 3, 1, 1, 1, 1, 1]
                Solute NH4: InitialValuesUnits=ppm; WaterTableConcentration=0; D0=0; DepthConstant=0; MaxDepthSoluteAccessible=0; RunoffEffectivenessAtMovingSolute=0; MaxEffectiveRunoff=0
                  Thickness=[100, 100, 100, 100, 100, 100, 100, 100, 100, 100, 100, 100, 100, 100, 100, 100, 100, 100, 100, 600]
                  InitialValues=[5, 2, 2, 4, 4, 4, 3, 3, 3, 3, 3, 3, 4, 4, 4, 1, 1, 1, 1, 1]
                Solute Urea: same as Incomplete.OCP Agronomy.Ganmain_2014_Ex1.Ganmain_2014_Ex1.Ganmain_OCP_2014.paddock.soil.Urea
                SoilTemperature Temperature
              MicroClimate: a_interception=0; b_interception=1; c_interception=0; d_interception=0; SoilHeatFluxFraction=0; MinimumHeightDiffForNewLayer=0; NightInterceptionFraction=0; ReferenceHeight=2
              Report DailyReport: same as Incomplete.OCP Agronomy.AlmaPark_2015_Ex2a.AlmaPark_2015_Ex2a.AlmaPark2015_Ex2a_base.paddock.DailyReport
              Report HarvestReport
              Report DailyBiomass: same as Incomplete.DP Agronomy.WaggaCR2008.WaggaWagga2008CR.Paddock.DailyBiomass
              Report SowingReport: EventNames=[Canola].Sowing
                VariableNames:
                  [Clock].Today
                  [Canola].SowingData.Cultivar
                  [IWeather].Latitude
                  [IWeather].Longitude
      Folder Hart_2014_Ex1
        Experiment Hart_2014_Ex1
          Factors
            Permutation
              Factor TOS_index
                CompositeFactor 1: Specifications=[Sowing].Script.SowDate = 14-Apr
                CompositeFactor 2: Specifications=[Sowing].Script.SowDate = 1-May
                CompositeFactor 3: Specifications=[Sowing].Script.SowDate = 16-May
                CompositeFactor 4: Specifications=[Sowing].Script.SowDate = 2-Jun
              Factor Cv
                Specification=[Sowing].Script.CultivarName = 44Y87_CL,45Y88_CL,ATR_Gem,Hyola559_TT,Hyola575_CL,Hyola971_CL
              Factor Popn: Specification=[Sowing].Script.Population =  15,45
              Factor Fert: Specification=[codes].Script.fert_treat = nil
              Factor Irrig: Specification=[codes].Script.irrig_treat = nil
          Simulation Hart_OCP_2014
            Clock: Start=2014-03-01; End=2014-12-31
            Summary summaryfile
            Weather: FileName=met/Hart.met
            SoilArbitrator
            Zone paddock: Area=1; Slope=0; AspectAngle=0; Altitude=50
              Folder manager
                Manager Reset on date
                  ResetDate = 12-Apr
                  ResetWater = Yes
                  ResetN = No
                  ResetSOM = No
```csharp
using Models.Soils.Nutrients;
using APSIM.Shared.Utilities;
using Models.Surface;
using Models.Utilities;
using Models.Soils;
using Models.PMF;
using Models.Core;
using System;
using Models.Interfaces;

namespace Models
{
    [Serializable]
    public class Script : Model
    {
        [Link] private Clock Clock;
        [Link] private Plant Wheat;
        [Link] private ISoilWater SoilWater;
        [Link] private INutrient nutrient;
        [Link] private SurfaceOrganicMatter SOM;
        [Link] private Summary Summary;

        [Description("Date to reset on:")]
        public string ResetDate {get;set;}

        [Description("Reset Water?")]
        public string ResetWater {get;set;}

        [Description("Reset Nitrogen?")]
        public string ResetN {get;set;}

        [Description("Reset Surface Organic Matter?")]
        public string ResetSOM {get;set;}

        [EventSubscribe("DoManagement")]
        private void OnDoManagement(object sender, EventArgs e)
        {
            if (DateUtilities.WithinDates(ResetDate, Clock.Today, ResetDate))
            {
                if (ResetWater == "Yes")
                {
                    Summary.WriteMessage(this, "Reset Water", MessageType.Diagnostic);
                    SoilWater.Reset();
                }
                if (ResetN == "Yes")
                {
                    Summary.WriteMessage(this, "Reset Nitrogen", MessageType.Diagnostic);
                    nutrient.Reset();
                }
                if (ResetSOM == "Yes")
                {
                    Summary.WriteMessage(this, "Reset Surface OM", MessageType.Diagnostic);
                    SOM.Reset();
                }
            }
        }
    }
}
```
                Manager Sowing: same as Incomplete.OCP Agronomy.AlmaPark_2015_Ex2a.AlmaPark_2015_Ex2a.AlmaPark2015_Ex2a_base.paddock.manager.Sowing
                Manager Fertilise
                  FertiliserType = UreaNO3
                  FertiliserDates = 13-Jun
                  fert_criteria = 1000
                  Amount = 45
                  FertiliserDepth = 0
```csharp
using Models.Soils.Nutrients;
using System;
using Models.Soils;
using Models.Core;
using Models.PMF;
using APSIM.Shared.Utilities;
namespace Models
{
    [Serializable]
    public class Script : Model
    {
        [Link] Clock Clock;
        [Link] Fertiliser Fertiliser;
        [Link] INutrient nutrient;
        [Link] Summary sum;
        
        [Separator("A component to apply fertiliser on one or more dates on every year of the simulation")]

        [Description("Type of fertiliser to apply? ")] 
        [Display(Type = DisplayType.FertiliserType)]public string FertiliserType { get; set; }

        [Description("Enter the fertilisation dates as dd-mmm with comma separation (any year information entered will be ignored): ")] 
        public string[] FertiliserDates { get; set; } 

        [Description("Don't add fertiliser if N in top 2 layers exceeds (kg/ha) : ")]
        public double fert_criteria { get; set; }

        [Description("Amount of fertiliser to be applied each time (kg /ha)")] 
        public double Amount { get; set; }

        [Description("Depth (mm)")] public double FertiliserDepth { get; set; }
        
        [EventSubscribe("DoManagement")]
        private void OnDoManagement(object sender, EventArgs e)
        {
            foreach (string ddMMM in FertiliserDates)
            {
                if (DateUtilities.DatesEqual(ddMMM, Clock.Today))
                {
                    double soil_N = nutrient.NH4.kgha[0] + nutrient.NO3.kgha[0] + nutrient.NH4.kgha[1] + nutrient.NO3.kgha[1];
                    if (soil_N <= fert_criteria) 
                         Fertiliser.Apply(amount: Amount, type: FertiliserType, depth: FertiliserDepth);
                    else
                        sum.WriteMessage(this, "No fertilising as top two layers have " + soil_N.ToString() + "kg/ha N", MessageType.Diagnostic);
                }
            }
        }
    }
}
```
                Manager Fertilise1
                  FertiliserType = UreaNO3
                  FertiliserDates = 7-Jul
                  fert_criteria = 1000
                  Amount = 40
                  FertiliserDepth = 0
                  script: same as in Incomplete.OCP Agronomy.Hart_2014_Ex1.Hart_2014_Ex1.Hart_OCP_2014.paddock.manager.Fertilise
                Manager Fertilise2
                  FertiliserType = UreaNO3
                  FertiliserDates = 15-Aug
                  fert_criteria = 1000
                  Amount = 30
                  FertiliserDepth = 0
                  script: same as in Incomplete.OCP Agronomy.Hart_2014_Ex1.Hart_2014_Ex1.Hart_OCP_2014.paddock.manager.Fertilise
                Manager codes
                  location = Hart
                  TOS_index = 1
                  fert_treat =
                  irrig_treat = nil
                  trial_code = Hart_2014
                  script: same as in Incomplete.OCP Agronomy.Condo_2015_Ex1a.Condo_2015_Ex1a.condo_OCP_2015_Ex1a.paddock.manager.codes
                Manager HarvestAfterDate
                  HarvestDate = 27-Nov
                  script: same as in Validation.Growth Experiments.Kojonup.Kojonup2013.Kojonup2013Base.paddock.HarvestAfterDate
              Fertiliser
              Manager Fertilise at sowing
                Crop = [canola]
                FertiliserType = NH4N
                Amount = 18
                script: same as in Validation.Growth Experiments.Kojonup.Kojonup2013.Kojonup2013Base.paddock.Fertilise at sowing
              Irrigation
              SurfaceOrganicMatter: InitialResidueName=wheat; InitialResidueType=wheat; InitialResidueMass=6000; InitialStandingFraction=0; InitialCPR=0; InitialCNR=80
              Plant canola: ResourceName=Canola
              Soil soil1: ASCOrder=Calcarosol; ASCSubOrder=Hypercalcic; SoilType=SNSW; Site=Hart; NearestTown=Brinkworth; Region=Mid North; State=South Australia; Country=Australia; ApsoilNumber=284; Latitude=-33.671; Longitude=138.413; LocationAccuracy=+/- 20m
                DataSource=Hart Field Day Site-Characterisation during 2005 season by University of Adelaide, CSIRO Sustainable Ecosystems, Alan Mayfield Consulting and Agrilink. Measurement site located adjacent to site described by Soil and Land Information Group, Department of Water, Land and Biodiversity
                Comments=High CEC moderate-high clay gradational soil. Root growth may be impeded below about 60cm due to high ESP and Boron
                Physical
                  Thickness  ParticleSizeSand  ParticleSizeSilt  ParticleSizeClay  BD    AirDry  LL15  DUL   SAT
                  150        47                10                43                1.36  0.095   0.19  0.35  0.46
                  150        43.1              6.4               50.4              1.25  0.16    0.2   0.38  0.5
                  300        42.2              6.7               51.1              1.31  0.22    0.22  0.41  0.48
                  300        48.2              3.8               47.9              1.42  0.22    0.25  0.36  0.44
                  300        42.7              5.5               51.7              1.46  0.22    0.28  0.36  0.42
                  300        41.7              4.3               54                1.45  0.22    0.32  0.38  0.42
                  SoilCrop WheatSoil: LL=[0.19, 0.2, 0.22, 0.25, 0.28, 0.32]; KL=[0.06, 0.06, 0.04, 0.04, 0.03, 0.02]; XF=[1, 1, 1, 1, 0.41, 0.22]
                    LL source: Field measured and checked for sensibility
                  SoilCrop BarleySoil: LL=[0.19, 0.2, 0.22, 0.25, 0.28, 0.32]; KL=[0.07, 0.07, 0.07, 0.05, 0.05, 0.05]; XF=[1, 1, 1, 1, 0.41, 0.22]
                    LL source: Estimated based on local knowledge
                  SoilCrop OatsSoil: LL=[0.19, 0.2, 0.22, 0.25, 0.28, 0.32]; KL=[0.06, 0.06, 0.04, 0.04, 0.03, 0.02]; XF=[1, 1, 1, 1, 0.41, 0.22]
                    LL source: Estimated based on local knowledge
                  SoilCrop CanolaSoil: LL=[0.19, 0.2, 0.22, 0.25, 0.28, 0.32]; KL=[0.06, 0.06, 0.04, 0.04, 0.03, 0.02]; XF=[1, 1, 1, 1, 0.4, 0.2]
                WaterBalance SoilWater: SummerDate=1-Nov; SummerU=6; SummerCona=3.5; WinterDate=1-Apr; WinterU=2; WinterCona=2; DiffusConst=88; DiffusSlope=35; Salb=0.13; CN2Bare=73; CNRed=20; CNCov=0.8; PSIDul=-100; Thickness=[150, 150, 300, 300, 300, 300]; SWCON=[0.5, 0.3, 0.3, 0.3, 0.1, 0.1]
                Organic: FOMCNRatio=45; CarbonUnits=Total
                  Thickness  Carbon  SoilCNRatio  FBiom  FInert  FOM
                  150        1.56    12.5         0.04   0.4     585.8963
                  150        1.248   12.5         0.02   0.5     434.0427
                  300        0.78    12.5         0.02   0.7     238.2077
                  300        0.39    12.5         0.02   1       130.7311
                  300        0.234   12.5         0.01   1       71.7468
                  300        0.156   12.5         0.01   1       39.3755
                Chemical: PHUnits=Water
                  Thickness  PH    EC   ESP
                  150        8.1   0.2  2.8481
                  150        8.7   0.2  9.915
                  300        8.99  0.4  18.8889
                  300        8.9   0.5  25.1479
                  300        8.9   0.9  30.8824
                  300        8.9   1.3  31.9277
                  EC, CL, PH source: Measured
                  ESP source: C
                Water: Thickness=[150, 150, 300, 300, 300, 300]; InitialValues=[0.238, 0.254, 0.277, 0.283, 0.304, 0.338]; FilledFromTop=false
                Nutrient
                Solute NO3: Thickness=[150, 150, 300, 300, 300, 300]; InitialValues=[12.2549, 8, 2.5445, 0, 0, 0]; InitialValuesUnits=ppm; WaterTableConcentration=0; D0=0; DepthConstant=0; MaxDepthSoluteAccessible=0; RunoffEffectivenessAtMovingSolute=0; MaxEffectiveRunoff=0
                Solute NH4: Thickness=[150, 150, 300, 300, 300, 300]; InitialValues=[0, 0, 0, 0, 0, 0]; InitialValuesUnits=ppm; WaterTableConcentration=0; D0=0; DepthConstant=0; MaxDepthSoluteAccessible=0; RunoffEffectivenessAtMovingSolute=0; MaxEffectiveRunoff=0
                Solute Urea: Thickness=[150, 150, 300, 300, 300, 300]; InitialValues=[0, 0, 0, 0, 0, 0]; InitialValuesUnits=kg/ha; WaterTableConcentration=0; D0=0; DepthConstant=0; MaxDepthSoluteAccessible=0; RunoffEffectivenessAtMovingSolute=0; MaxEffectiveRunoff=0
                SoilTemperature Temperature
              MicroClimate: a_interception=0; b_interception=1; c_interception=0; d_interception=0; SoilHeatFluxFraction=0; MinimumHeightDiffForNewLayer=0; NightInterceptionFraction=0; ReferenceHeight=2
              Report DailyReport: same as Incomplete.OCP Agronomy.AlmaPark_2015_Ex2a.AlmaPark_2015_Ex2a.AlmaPark2015_Ex2a_base.paddock.DailyReport
              Report HarvestReport
              Report DailyBiomass: same as Incomplete.DP Agronomy.WaggaCR2008.WaggaWagga2008CR.Paddock.DailyBiomass
              Report SowingReport: EventNames=[Canola].Sowing
                VariableNames:
                  [Clock].Today
                  [Canola].SowingData.Cultivar
                  [IWeather].Latitude
                  [IWeather].Longitude
      Folder Hart_2015_Ex1b
        Experiment Hart_2015_Ex1b
          Factors
            Permutation
              Factor TOS_index
                CompositeFactor 1
                  Specifications:
                    [Sowing].Script.SowDate = 14-Apr
                    [Fertilise].Script.Amount = 100
                    [Fertilise].Script.FertiliserDates = 14-Jun
                    [Fertilise1].Script.Amount = 50
                    [Fertilise1].Script.FertiliserDates = 8-Jul
                CompositeFactor 2
                  Specifications:
                    [Sowing].Script.SowDate = 30-Apr
                    [Fertilise].Script.Amount = 100
                    [Fertilise].Script.FertiliserDates = 19-Jun
                    [Fertilise1].Script.Amount = 50
                    [Fertilise1].Script.FertiliserDates = 11-Aug
                CompositeFactor 3
                  Specifications:
                    [Sowing].Script.SowDate = 15-May
                    [Fertilise].Script.Amount = 100
                    [Fertilise].Script.FertiliserDates = 8-Jul
                    [Fertilise1].Script.Amount = 50
                    [Fertilise1].Script.FertiliserDates = 1-Sep
              Factor Cv
                Specification=[Sowing].Script.CultivarName = 44Y89_CL,45Y88_CL,Archer,ATR_Gem,ATR_Stingray,AV_Garnet,Hyola559_TT,Hyola575_CL,Hyola750_TT
              Factor Popn: Specification=[Sowing].Script.Population =  45
              Factor Fert: Specification=[codes].Script.fert_treat = nil
              Factor Irrig: Specification=[codes].Script.irrig_treat = nil
          Simulation Hart_OCP_2015
            Clock: Start=2015-03-01; End=2015-12-01
            Summary summaryfile
            Weather: FileName=met/Hart.met
            SoilArbitrator
            Zone paddock: Area=1; Slope=0; AspectAngle=0; Altitude=50
              Folder manager
                Manager Reset on date: same as Incomplete.OCP Agronomy.Hart_2014_Ex1.Hart_2014_Ex1.Hart_OCP_2014.paddock.manager.Reset on date
                Manager Sowing: same as Incomplete.OCP Agronomy.AlmaPark_2015_Ex2a.AlmaPark_2015_Ex2a.AlmaPark2015_Ex2a_base.paddock.manager.Sowing
                Manager Fertilise
                  FertiliserType = UreaN
                  FertiliserDates = 14-Jun
                  fert_criteria = 1000
                  Amount = 100
                  FertiliserDepth = 0
                  script: same as in Incomplete.OCP Agronomy.Hart_2014_Ex1.Hart_2014_Ex1.Hart_OCP_2014.paddock.manager.Fertilise
                Manager Fertilise1
                  FertiliserType = UreaN
                  FertiliserDates = 8-Jul
                  fert_criteria = 1000
                  Amount = 50
                  FertiliserDepth = 0
                  script: same as in Incomplete.OCP Agronomy.Hart_2014_Ex1.Hart_2014_Ex1.Hart_OCP_2014.paddock.manager.Fertilise
                Manager codes
                  location = Hart
                  TOS_index = 1
                  fert_treat =
                  irrig_treat = nil
                  trial_code = CTA15HAR1
                  script: same as in Incomplete.OCP Agronomy.Condo_2015_Ex1a.Condo_2015_Ex1a.condo_OCP_2015_Ex1a.paddock.manager.codes
                Manager HarvestAfterDate
                  HarvestDate = 5-Nov
                  script: same as in Validation.Growth Experiments.Kojonup.Kojonup2013.Kojonup2013Base.paddock.HarvestAfterDate
              Fertiliser
              Manager Fertilise at sowing: same as Incomplete.OCP Agronomy.Hart_2014_Ex1.Hart_2014_Ex1.Hart_OCP_2014.paddock.Fertilise at sowing
              Irrigation
              SurfaceOrganicMatter: InitialResidueName=wheat; InitialResidueType=wheat; InitialResidueMass=6000; InitialStandingFraction=0; InitialCPR=0; InitialCNR=80
              Plant canola: ResourceName=Canola
              Soil soil1: ASCOrder=Calcarosol; ASCSubOrder=Hypercalcic; SoilType=SNSW; Site=Hart; NearestTown=Brinkworth; Region=Mid North; State=South Australia; Country=Australia; ApsoilNumber=284; Latitude=-33.671; Longitude=138.413; LocationAccuracy=+/- 20m
                DataSource=Hart Field Day Site-Characterisation during 2005 season by University of Adelaide, CSIRO Sustainable Ecosystems, Alan Mayfield Consulting and Agrilink. Measurement site located adjacent to site described by Soil and Land Information Group, Department of Water, Land and Biodiversity
                Comments=High CEC moderate-high clay gradational soil. Root growth may be impeded below about 60cm due to high ESP and Boron
                Physical
                  Thickness  ParticleSizeSand  ParticleSizeSilt  ParticleSizeClay  BD    AirDry  LL15   DUL   SAT
                  150        47                10                43                1.36  0.095   0.157  0.35  0.46
                  150        43.1              6.4               50.4              1.25  0.1     0.169  0.38  0.5
                  300        42.2              6.7               51.1              1.31  0.1     0.179  0.41  0.48
                  300        48.2              3.8               47.9              1.42  0.1     0.213  0.36  0.44
                  300        42.7              5.5               51.7              1.46  0.1     0.225  0.36  0.42
                  300        41.7              4.3               54                1.45  0.1     0.238  0.38  0.42
                  SoilCrop WheatSoil: same as Incomplete.OCP Agronomy.Hart_2014_Ex1.Hart_2014_Ex1.Hart_OCP_2014.paddock.soil1.Physical.WheatSoil
                  SoilCrop BarleySoil: LL=[0.157, 0.169, 0.179, 0.213, 0.225, 0.238]; KL=[0.07, 0.07, 0.07, 0.05, 0.05, 0.05]; XF=[1, 1, 1, 1, 0.41, 0.22]
                    LL source: Estimated based on local knowledge
                  SoilCrop OatsSoil: same as Incomplete.OCP Agronomy.Hart_2014_Ex1.Hart_2014_Ex1.Hart_OCP_2014.paddock.soil1.Physical.OatsSoil
                  SoilCrop CanolaSoil: LL=[0.157, 0.169, 0.179, 0.213, 0.225, 0.238]; KL=[0.06, 0.06, 0.04, 0.04, 0.03, 0.02]; XF=[1, 1, 1, 1, 0.4, 0.2]
                WaterBalance SoilWater: same as Incomplete.OCP Agronomy.Hart_2014_Ex1.Hart_2014_Ex1.Hart_OCP_2014.paddock.soil1.SoilWater
                Organic: same as Incomplete.OCP Agronomy.Hart_2014_Ex1.Hart_2014_Ex1.Hart_OCP_2014.paddock.soil1.Organic
                Chemical: PHUnits=Water
                  Thickness  PH   EC   ESP
                  150        8.1  0.2  2.8481
                  150        8.7  0.2  9.915
                  300        8.9  0.4  18.8889
                  300        8.9  0.5  25.1479
                  300        8.9  0.9  30.8824
                  300        8.9  1.3  31.9277
                  EC, CL, PH source: Measured
                  ESP source: C
                Water: Thickness=[150, 150, 300, 300, 300, 300]; InitialValues=[0.157, 0.169, 0.179, 0.213, 0.225, 0.237]; FilledFromTop=false
                Nutrient
                Solute NO3: Thickness=[150, 150, 300, 300, 300, 300]; InitialValues=[11.7157, 6.3467, 2.5954, 3.2864, 2.3516, 0]; InitialValuesUnits=ppm; WaterTableConcentration=0; D0=0; DepthConstant=0; MaxDepthSoluteAccessible=0; RunoffEffectivenessAtMovingSolute=0; MaxEffectiveRunoff=0
                Solute NH4: Thickness=[150, 150, 300, 300, 300, 300]; InitialValues=[2.1, 1.4, 1.6, 0, 0, 0]; InitialValuesUnits=ppm; WaterTableConcentration=0; D0=0; DepthConstant=0; MaxDepthSoluteAccessible=0; RunoffEffectivenessAtMovingSolute=0; MaxEffectiveRunoff=0
                Solute Urea: same as Incomplete.OCP Agronomy.Hart_2014_Ex1.Hart_2014_Ex1.Hart_OCP_2014.paddock.soil1.Urea
                SoilTemperature Temperature
              MicroClimate: a_interception=0; b_interception=1; c_interception=0; d_interception=0; SoilHeatFluxFraction=0; MinimumHeightDiffForNewLayer=0; NightInterceptionFraction=0; ReferenceHeight=2
              Report DailyReport: same as Incomplete.OCP Agronomy.AlmaPark_2015_Ex2a.AlmaPark_2015_Ex2a.AlmaPark2015_Ex2a_base.paddock.DailyReport
              Report HarvestReport
              Report DailyBiomass: same as Incomplete.DP Agronomy.WaggaCR2008.WaggaWagga2008CR.Paddock.DailyBiomass
              Report SowingReport: EventNames=[Canola].Sowing
                VariableNames:
                  [Clock].Today
                  [Canola].SowingData.Cultivar
                  [IWeather].Latitude
                  [IWeather].Longitude
      Folder Hart_2016_Ex1b
        Experiment Hart_2016_Ex1b
          Factors
            Permutation
              Factor TOS_index
                CompositeFactor 1
                  Specifications:
                    [Sowing].Script.SowDate = 15-Apr
                    [Irrigate].Script.amount = 20
                    [Irrigate].Script.irrigDates = 14-Apr
                CompositeFactor 2
                  Specifications:
                    [Sowing].Script.SowDate = 2-May
                    [Irrigate].Script.amount = 15
                    [Irrigate].Script.irrigDates = 29-Apr,2-May
                CompositeFactor 3
                  Specifications:
                    [Sowing].Script.SowDate = 16-May
                    [Irrigate].Script.amount = 20
                    [Irrigate].Script.irrigDates = 17-May
              Factor Cv
                Specification=[Sowing].Script.CultivarName = 44Y89_CL,45Y88_CL,Archer,ATR_Gem,ATR_Stingray,Hyola559_TT,Hyola575_CL,Hyola750_TT,NS_Diamond
              Factor Popn: Specification=[Sowing].Script.Population =  45
              Factor Fert: Specification=[codes].Script.fert_treat = nil
              Factor Irrig: Specification=[codes].Script.irrig_treat = nil
          Simulation Hart_2016_Ex1_Base
            Clock: Start=2016-03-01; End=2016-12-01
            Summary summaryfile
            Weather: FileName=met/Hart.met
            SoilArbitrator
            Zone paddock: Area=1; Slope=0; AspectAngle=0; Altitude=50
              Folder manager
                Manager Reset on date
                  ResetDate = 12-Apr
                  ResetWater = Yes
                  ResetN = Yes
                  ResetSOM = No
                  script: same as in Incomplete.OCP Agronomy.Hart_2014_Ex1.Hart_2014_Ex1.Hart_OCP_2014.paddock.manager.Reset on date
                Manager Sowing
                  SowDate = 25-Apr
                  CultivarName = Hyola575
                  SowingDepth = 20
                  RowSpacing = 250
                  Population = 45
                  script: same as in Incomplete.OCP Agronomy.Breeza_2014_Ex1.Breeza_2014_Ex1.Breeza_2014_Ex1_Base.paddock.manager.Sowing
                Manager Fertilise
                  FertiliserType = UreaN
                  FertiliserDates = 14-Jun
                  fert_criteria = 1000
                  Amount = 100
                  FertiliserDepth = 20
                  script: same as in Incomplete.OCP Agronomy.Hart_2014_Ex1.Hart_2014_Ex1.Hart_OCP_2014.paddock.manager.Fertilise
                Manager Fertilise1
                  FertiliserType = UreaN
                  FertiliserDates = 8-Jul
                  fert_criteria = 1000
                  Amount = 50
                  FertiliserDepth = 20
                  script: same as in Incomplete.OCP Agronomy.Hart_2014_Ex1.Hart_2014_Ex1.Hart_OCP_2014.paddock.manager.Fertilise
                Manager Irrigate
                  irrigDates = 12-Apr
                  amount = 0
                  script: same as in Incomplete.OCP Agronomy.Ganmain_2018_Ex1a.Ganmain_2018_Ex1a.Ganmain_OCP_2018.paddock.manager.Irrigate
                Manager codes: same as Incomplete.OCP Agronomy.Hart_2015_Ex1b.Hart_2015_Ex1b.Hart_OCP_2015.paddock.manager.codes
                Manager HarvestAfterDate: same as Incomplete.OCP Agronomy.Galong_2015_Ex2a.Galong_2015_Ex2a.Galong_OCP_2015.paddock.manager.HarvestAfterDate
              Plant canola: ResourceName=Canola
              MicroClimate: a_interception=0; b_interception=0; c_interception=0; d_interception=0; SoilHeatFluxFraction=0.1; MinimumHeightDiffForNewLayer=0; NightInterceptionFraction=0; ReferenceHeight=1
              SurfaceOrganicMatter SurfaceOM: InitialResidueName=wheat; InitialResidueType=wheat; InitialResidueMass=6000; InitialStandingFraction=0; InitialCPR=0; InitialCNR=80
              Fertiliser
              Manager Fertilise at sowing
                Crop = [canola]
                FertiliserType = NH4N
                Amount = 18
                FertiliserDepth = 50
```csharp
using Models.Soils;
using System;
using Models.Core;
using Models.PMF;
namespace Models
{
    [Serializable]
    public class Script : Model
    {
        [Link] Clock Clock;
        [Link] Fertiliser Fertiliser;
        [Link] Summary summary;

        [Description("Crop to be fertilised")]
        public IPlant Crop { get; set; }

        [Description("Type of fertiliser to apply? ")] 
        [Display(Type = DisplayType.FertiliserType)]public string FertiliserType { get; set; }

        [Description("Amount of fertiliser to be applied (kg/ha)")]
        public double Amount { get; set; }

        [Description("Depth (mm)")]
        public double FertiliserDepth { get; set; }

        [EventSubscribe("Sowing")]
        public void OnSowing(object sender, EventArgs e)
        {
            Model crop = sender as Model;
            if (Crop != null && crop.Name.ToLower() == (Crop as IModel).Name.ToLower())
                Fertiliser.Apply(amount: Amount, type: FertiliserType, depth: FertiliserDepth);  //"NO3N"
        }

    }
}
```
              Irrigation
              Soil soil1: ASCOrder=Calcarosol; ASCSubOrder=Hypercalcic; SoilType=SNSW; Site=Hart; NearestTown=Brinkworth; Region=Mid North; State=South Australia; Country=Australia; ApsoilNumber=284; Latitude=-33.671; Longitude=138.413; LocationAccuracy=+/- 20m
                DataSource=Hart Field Day Site-Characterisation during 2005 season by University of Adelaide, CSIRO Sustainable Ecosystems, Alan Mayfield Consulting and Agrilink. Measurement site located adjacent to site described by Soil and Land Information Group, Department of Water, Land and Biodiversity
                Comments=High CEC moderate-high clay gradational soil. Root growth may be impeded below about 60cm due to high ESP and Boron
                Physical
                  Thickness  ParticleSizeClay  BD    AirDry  LL15  DUL   SAT
                  150        43                1.36  0.095   0.19  0.35  0.46
                  150        50.4              1.25  0.16    0.2   0.38  0.5
                  300        51.1              1.31  0.22    0.22  0.41  0.48
                  300        47.9              1.42  0.22    0.25  0.36  0.44
                  300        51.7              1.46  0.22    0.28  0.36  0.42
                  300        54                1.45  0.22    0.32  0.38  0.42
                  SoilCrop WheatSoil: same as Incomplete.OCP Agronomy.Hart_2014_Ex1.Hart_2014_Ex1.Hart_OCP_2014.paddock.soil1.Physical.WheatSoil
                  SoilCrop BarleySoil: same as Incomplete.OCP Agronomy.Hart_2014_Ex1.Hart_2014_Ex1.Hart_OCP_2014.paddock.soil1.Physical.BarleySoil
                  SoilCrop OatsSoil: same as Incomplete.OCP Agronomy.Hart_2014_Ex1.Hart_2014_Ex1.Hart_OCP_2014.paddock.soil1.Physical.OatsSoil
                  SoilCrop CanolaSoil: LL=[0.19, 0.2, 0.22, 0.25, 0.28, 0.32]; KL=[0.06, 0.06, 0.04, 0.04, 0.03, 0.02]; XF=[1, 1, 1, 1, 0.4, 0.2]
                WaterBalance SoilWater: same as Incomplete.OCP Agronomy.Hart_2014_Ex1.Hart_2014_Ex1.Hart_OCP_2014.paddock.soil1.SoilWater
                Organic: same as Incomplete.OCP Agronomy.Hart_2014_Ex1.Hart_2014_Ex1.Hart_OCP_2014.paddock.soil1.Organic
                Chemical: PHUnits=Water
                  Thickness  PH   EC   ESP
                  150        8.1  0.2  2.8481
                  150        8.7  0.2  9.915
                  300        8.9  0.4  18.8889
                  300        8.9  0.5  25.1479
                  300        8.9  0.9  30.8824
                  300        8.9  1.3  31.9277
                Water: Thickness=[150, 150, 300, 300, 300, 300]; InitialValues=[0.238, 0.254, 0.277, 0.283, 0.304, 0.338]; FilledFromTop=false
                Nutrient
                Solute NO3: Thickness=[150, 150, 300, 300, 300, 300]; InitialValues=[11.9333, 4.8, 1.8, 2.3, 1.7, 2]; InitialValuesUnits=ppm; WaterTableConcentration=0; D0=0; DepthConstant=0; MaxDepthSoluteAccessible=0; RunoffEffectivenessAtMovingSolute=0; MaxEffectiveRunoff=0
                Solute NH4: Thickness=[150, 150, 300, 300, 300, 300]; InitialValues=[2, 1.6, 1.4, 0, 0, 0]; InitialValuesUnits=ppm; WaterTableConcentration=0; D0=0; DepthConstant=0; MaxDepthSoluteAccessible=0; RunoffEffectivenessAtMovingSolute=0; MaxEffectiveRunoff=0
                Solute Urea: same as Incomplete.OCP Agronomy.Hart_2014_Ex1.Hart_2014_Ex1.Hart_OCP_2014.paddock.soil1.Urea
                SoilTemperature Temperature
              Report DailyReport: same as Incomplete.OCP Agronomy.AlmaPark_2015_Ex2a.AlmaPark_2015_Ex2a.AlmaPark2015_Ex2a_base.paddock.DailyReport
              Report HarvestReport
              Report DailyBiomass: same as Incomplete.DP Agronomy.WaggaCR2008.WaggaWagga2008CR.Paddock.DailyBiomass
              Report SowingReport: EventNames=[Canola].Sowing
                VariableNames:
                  [Clock].Today
                  [Canola].SowingData.Cultivar
                  [IWeather].Latitude
                  [IWeather].Longitude
      Folder Hart_2017_Ex1b
        Experiment Hart_2017_Ex1b
          Factors
            Permutation
              Factor TOS_index
                CompositeFactor 1: Specifications=[Sowing].Script.SowDate = 27-Apr
                CompositeFactor 2: Specifications=[Sowing].Script.SowDate = 15-May
              Factor Cv
                Specification=[Sowing].Script.CultivarName = 44Y90_CL,Archer,ATR_Bonito,ATR_Stingray,ATR_Wahoo,NS_Diamond
              Factor Popn: Specification=[Sowing].Script.Population =  45
              Factor Fert
                CompositeFactor D5
                  Specifications:
                    [Fertilise].Script.FertiliserDates = 22-Jun
                    [Fertilise].Script.Amount = 40
                CompositeFactor D9
                  Specifications:
                    [FertiliseMany].Script.FertiliserDates = 22-Jun,2-Jul,12-Jul
                    [FertiliseMany].Script.Amount = 40,40,50
              Factor Irrig: Specification=[codes].Script.irrig_treat = nil
              Memo Question
                How do I do TOS1 & D5 = two dates?
          Simulation Hart_OCP_2017_Ex1b
            Clock: Start=2017-03-01; End=2017-12-31
            Summary summaryfile
            Weather: FileName=met/Hart.met
            SoilArbitrator
            Zone paddock: Area=1; Slope=0; AspectAngle=0; Altitude=50
              Folder manager
                Manager Reset on date: same as Incomplete.OCP Agronomy.Hart_2016_Ex1b.Hart_2016_Ex1b.Hart_2016_Ex1_Base.paddock.manager.Reset on date
                Manager Sowing: same as Incomplete.OCP Agronomy.Hart_2016_Ex1b.Hart_2016_Ex1b.Hart_2016_Ex1_Base.paddock.manager.Sowing
                Manager Fertilise
                  FertiliserType = UreaN
                  FertiliserDates = 14-Jun
                  fert_criteria = 1000
                  Amount = 0
                  FertiliserDepth = 0
                  script: same as in Incomplete.OCP Agronomy.Hart_2014_Ex1.Hart_2014_Ex1.Hart_OCP_2014.paddock.manager.Fertilise
                Manager FertiliseSplit
                  FertiliserType = UreaN
                  FertiliserDates = 22-Jun, 2-Jul
                  fert_criteria = 1000
                  Amount = 0
```csharp
using Models.Soils.Nutrients;
using System;
using Models.Soils;
using Models.Core;
using Models.PMF;
using APSIM.Shared.Utilities;
namespace Models
{
    [Serializable]
    public class Script : Model
    {
        [Link] Clock Clock;
        [Link] Fertiliser Fertiliser;
        [Link] INutrient nutrient;
        [Link] Summary sum;
        
        [Separator("A component to apply fertiliser on one or more dates on every year of the simulation")]

        [Description("Type of fertiliser to apply? ")] 
        [Display(Type = DisplayType.FertiliserType)]public string FertiliserType { get; set; }

        [Description("Enter the two fertilisation dates as dd-mmm with comma separation: ")] 
        public string[] FertiliserDates { get; set; } 

        [Description("Don't add fertiliser if N in top 2 layers exceeds (kg/ha) : ")]
        public double fert_criteria { get; set; }

        [Description("Total amount of fertiliser to be applied (kg /ha)")] 
        public double Amount { get; set; }

        [EventSubscribe("DoManagement")]
        private void OnDoManagement(object sender, EventArgs e)
        {
            foreach (string ddMMM in FertiliserDates)
            {
                if (DateUtilities.DatesEqual(ddMMM, Clock.Today))
                {
                    double soil_N = nutrient.NH4.kgha[0] + nutrient.NO3.kgha[0] + nutrient.NH4.kgha[1] + nutrient.NO3.kgha[1];
                    if (soil_N <= fert_criteria) 
                         Fertiliser.Apply(amount: Amount / FertiliserDates.Length, type: FertiliserType, depth: 0.0);
                    else
                        sum.WriteMessage(this, "No fertilising as top two layers have " + soil_N.ToString() + "kg/ha N", MessageType.Diagnostic);
                }
            }
        }
    }
}
```
                Manager FertiliseMany
                  FertiliserType = UreaN
                  FertiliserDates = 27-Jun, 1-Jul, 1-Aug
                  fert_criteria = 1000
                  Amount = 0, 0, 0
```csharp
using Models.Soils.Nutrients;
using System;
using Models.Soils;
using Models.Core;
using Models.PMF;
using APSIM.Shared.Utilities;
namespace Models
{
    [Serializable]
    public class Script : Model
    {
        [Link] Clock Clock;
        [Link] Fertiliser Fertiliser;
        [Link] INutrient nutrient;
        [Link] Summary sum;
        
        [Separator("A component to apply fertiliser on one or more dates on every year of the simulation")]

        [Description("Type of fertiliser to apply? ")] 
        [Display(Type = DisplayType.FertiliserType)]public string FertiliserType { get; set; }

        [Description("Enter the two fertilisation dates as dd-mmm with comma separation: ")] 
        public string[] FertiliserDates { get; set; } 

        [Description("Don't add fertiliser if N in top 2 layers exceeds (kg/ha) : ")]
        public double fert_criteria { get; set; }

        [Description("Amounts of fertiliser to be applied (comma separated) (kg /ha)")] 
        public double[] Amount { get; set; }

        [EventSubscribe("DoManagement")]
        private void OnDoManagement(object sender, EventArgs e)
        {
            for (int i = 0; i < FertiliserDates.Length; i++)
            {
                string ddMMM = FertiliserDates[i];
                if (DateUtilities.DatesEqual(ddMMM, Clock.Today))
                {
                    double soil_N = nutrient.NH4.kgha[0] + nutrient.NO3.kgha[0] + nutrient.NH4.kgha[1] + nutrient.NO3.kgha[1];
                    if (soil_N <= fert_criteria) 
                         Fertiliser.Apply(amount: Amount[i], type: FertiliserType, depth: 0.0);
                    else
                        sum.WriteMessage(this, "No fertilising as top two layers have " + soil_N.ToString() + "kg/ha N", MessageType.Diagnostic);
                }
            }
        }
    }
}
```
                Manager codes
                  location = Hart
                  TOS_index = 1
                  irrig_treat = nil
                  trial_code = 2017HART
                  fert_code = D5
```csharp
using Models.Soils;
using System;
using Models.Core;
using Models.PMF;
namespace Models
{
    [Serializable]
    [System.Xml.Serialization.XmlInclude(typeof(Model))]
    public class Script : Model
    {
        [Link] Clock Clock;

        [Description("location")]
        public string location { get; set; }

        [Description("Time of sowing")]
        public string TOS_index { get; set; }

        [Description("irrig_treat")]
        public string irrig_treat { get; set; }

        [Description("trial_code")]
        public string trial_code { get; set; }

        [Description("fert_code")]
        public string fert_code { get; set; }

        [EventSubscribe("StartOfSimulation")]
        private void OnSimulationCommencing(object sender, EventArgs e)
        {
            /*
                location = '[location]' !'Condobolin'
irrig_treat = '[irrig_treat]' ! 'dry'
trial_code = '[trial_code]' ! 'CSTB16COND2'
minn_tot = 0
TOS_index = [TOS_index] !'1'
dens_trt = 45
exp = '1b'
fert_treat = '[fert_code]'
            */
        }
    }
}
```
                Manager HarvestAfterDate: same as Incomplete.OCP Agronomy.Canowindra_2016_Ex1b.Canowindra_2016_Ex1b.Canowindra_OCP_2016_Ex1b.paddock.manager.HarvestAfterDate
              Fertiliser
              Manager Fertilise at sowing: same as Incomplete.OCP Agronomy.Hart_2016_Ex1b.Hart_2016_Ex1b.Hart_2016_Ex1_Base.paddock.Fertilise at sowing
              Irrigation
              SurfaceOrganicMatter: InitialResidueName=wheat; InitialResidueType=wheat; InitialResidueMass=6000; InitialStandingFraction=0; InitialCPR=0; InitialCNR=80
              Plant canola: ResourceName=Canola
              Soil soil1: ASCOrder=Calcarosol; ASCSubOrder=Hypercalcic; SoilType=SNSW; Site=Hart; NearestTown=Brinkworth; Region=Mid North; State=South Australia; Country=Australia; ApsoilNumber=284; Latitude=-33.671; Longitude=138.413; LocationAccuracy=+/- 20m
                DataSource=Hart Field Day Site-Characterisation during 2005 season by University of Adelaide, CSIRO Sustainable Ecosystems, Alan Mayfield Consulting and Agrilink. Measurement site located adjacent to site described by Soil and Land Information Group, Department of Water, Land and Biodiversity
                Comments=High CEC moderate-high clay gradational soil. Root growth may be impeded below about 60cm due to high ESP and Boron
                Physical: same as Incomplete.OCP Agronomy.Hart_2014_Ex1.Hart_2014_Ex1.Hart_OCP_2014.paddock.soil1.Physical
                WaterBalance SoilWater: same as Incomplete.OCP Agronomy.Hart_2014_Ex1.Hart_2014_Ex1.Hart_OCP_2014.paddock.soil1.SoilWater
                Organic: same as Incomplete.OCP Agronomy.Hart_2014_Ex1.Hart_2014_Ex1.Hart_OCP_2014.paddock.soil1.Organic
                Chemical: same as Incomplete.OCP Agronomy.Hart_2015_Ex1b.Hart_2015_Ex1b.Hart_OCP_2015.paddock.soil1.Chemical
                Water: Thickness=[100, 200, 300, 300, 300, 300]; InitialValues=[0.192, 0.243, 0.252, 0.27, 0.271, 0.337]; FilledFromTop=false
                Nutrient
                Solute NO3: Thickness=[150, 150, 300, 300, 300, 300]; InitialValues=[7.4333, 3.3, 0, 0.8, 3.4, 3.4]; InitialValuesUnits=ppm; WaterTableConcentration=0; D0=0; DepthConstant=0; MaxDepthSoluteAccessible=0; RunoffEffectivenessAtMovingSolute=0; MaxEffectiveRunoff=0
                Solute NH4: Thickness=[150, 150, 300, 300, 300, 300]; InitialValues=[0.7333, 0, 0, 0, 0, 0]; InitialValuesUnits=ppm; WaterTableConcentration=0; D0=0; DepthConstant=0; MaxDepthSoluteAccessible=0; RunoffEffectivenessAtMovingSolute=0; MaxEffectiveRunoff=0
                Solute Urea: same as Incomplete.OCP Agronomy.Hart_2014_Ex1.Hart_2014_Ex1.Hart_OCP_2014.paddock.soil1.Urea
                SoilTemperature Temperature
              MicroClimate: a_interception=0; b_interception=1; c_interception=0; d_interception=0; SoilHeatFluxFraction=0; MinimumHeightDiffForNewLayer=0; NightInterceptionFraction=0; ReferenceHeight=2
              Report DailyReport: same as Incomplete.OCP Agronomy.AlmaPark_2015_Ex2a.AlmaPark_2015_Ex2a.AlmaPark2015_Ex2a_base.paddock.DailyReport
              Report HarvestReport
              Report DailyBiomass: same as Incomplete.DP Agronomy.WaggaCR2008.WaggaWagga2008CR.Paddock.DailyBiomass
              Report SowingReport: EventNames=[Canola].Sowing
                VariableNames:
                  [Clock].Today
                  [Canola].SowingData.Cultivar
                  [IWeather].Latitude
                  [IWeather].Longitude
      Folder Junee_2014_Ex1
        Experiment Junee_2014_Ex1
          Factors
            Permutation
              Factor TOS_index
                CompositeFactor 1
                  Specifications:
                    [Sowing].Script.SowDate = 15-Apr
                    [Fertilise].Script.FertiliserDates = 9-Jul
                    [Fertilise].Script.Amount = 200
                CompositeFactor 2
                  Specifications:
                    [Sowing].Script.SowDate = 28-Apr
                    [Fertilise].Script.FertiliserDates = 9-Jul
                    [Fertilise].Script.Amount = 200
                CompositeFactor 3
                  Specifications:
                    [Sowing].Script.SowDate = 21-May
                    [Fertilise].Script.FertiliserDates = 6-Dec
                    [Fertilise].Script.Amount = 0
              Factor Cv
                Specification=[Sowing].Script.CultivarName = 44Y87_CL,45Y88_CL,ATR_Gem,Hyola559_TT,Hyola575_CL,Hyola971_CL
              Factor Popn: Specification=[Sowing].Script.Population =  45
              Factor Fert: Specification=[codes].Script.fert_treat = nil
              Factor Irrig: Specification=[codes].Script.irrig_treat = nil
          Simulation Old_Junee_OCP_2014
            Clock: Start=2014-03-01; End=2015-01-31
            Summary summaryfile
            Weather: FileName=met/73025_CombGSE.met
            SoilArbitrator
            Zone paddock: Area=1; Slope=0; AspectAngle=0; Altitude=50
              Folder manager
                Manager Reset on date
                  ResetDate = 28-Mar
                  ResetWater = Yes
                  ResetN = No
                  ResetSOM = No
                  script: same as in Incomplete.OCP Agronomy.Hart_2014_Ex1.Hart_2014_Ex1.Hart_OCP_2014.paddock.manager.Reset on date
                Manager Sowing: same as Incomplete.OCP Agronomy.Hart_2016_Ex1b.Hart_2016_Ex1b.Hart_2016_Ex1_Base.paddock.manager.Sowing
                Manager Fertilise
                  FertiliserType = UreaN
                  FertiliserDates = 6-Dec
                  fert_criteria = 1000
                  Amount = 0
                  FertiliserDepth = 0
                  script: same as in Incomplete.OCP Agronomy.Hart_2014_Ex1.Hart_2014_Ex1.Hart_OCP_2014.paddock.manager.Fertilise
                Manager codes
                  location = Junee
                  TOS_index = 1
                  fert_treat =
                  irrig_treat = nil
                  trial_code = CSTA14OLDJ2
                  script: same as in Incomplete.OCP Agronomy.Condo_2015_Ex1a.Condo_2015_Ex1a.condo_OCP_2015_Ex1a.paddock.manager.codes
                Manager HarvestAfterDate
                  HarvestDate = 25-Nov
                  script: same as in Validation.Growth Experiments.Kojonup.Kojonup2013.Kojonup2013Base.paddock.HarvestAfterDate
              Fertiliser
              Manager Fertilise at sowing
                Crop = [canola]
                FertiliserType = NH4N
                Amount = 21
                FertiliserDepth = 50
                script: same as in Incomplete.OCP Agronomy.Hart_2016_Ex1b.Hart_2016_Ex1b.Hart_2016_Ex1_Base.paddock.Fertilise at sowing
              Irrigation
              SurfaceOrganicMatter: InitialResidueName=lucerne; InitialResidueType=lucerne; InitialResidueMass=4000; InitialStandingFraction=0; InitialCPR=0; InitialCNR=40
              Plant canola: ResourceName=Canola
              Soil: SoilType=SNSW; Site=CSU; NearestTown=Wagga Wagga; Region=Southern NSW; State=NSW; Latitude=0; Longitude=0; DataSource=Kirsten Verburg
                Chemical: same as Incomplete.Southern NSW.Ginnindera_96.paddock.soil.Chemical
                Physical: same as Incomplete.OCP Agronomy.AlmaPark_2015_Ex2a.AlmaPark_2015_Ex2a.AlmaPark2015_Ex2a_base.paddock.soil.Physical
                WaterBalance SoilWater: same as Incomplete.OCP Agronomy.AlmaPark_2015_Ex2a.AlmaPark_2015_Ex2a.AlmaPark2015_Ex2a_base.paddock.soil.SoilWater
                Organic: same as Incomplete.OCP Agronomy.Ganmain_2016_Ex6.Ganmain_2016_Ex6.Ganmain_OCP_2016_Ex6.paddock.soil.Organic
                Water: Thickness=[100, 100, 200, 200, 200, 200, 200, 200, 200, 400]; FilledFromTop=false
                  InitialValues=[0.177, 0.17, 0.182, 0.192, 0.151, 0.145, 0.161, 0.18, 0.221, 0.221]
                Nutrient
                Solute NO3: InitialValuesUnits=ppm; WaterTableConcentration=0; D0=0; DepthConstant=0; MaxDepthSoluteAccessible=0; RunoffEffectivenessAtMovingSolute=0; MaxEffectiveRunoff=0
                  Thickness=[100, 100, 100, 100, 100, 100, 100, 100, 100, 100, 100, 100, 100, 100, 100, 100, 100, 100, 100, 100]
                  InitialValues=[31.06, 24.74, 11.82, 11.82, 7.28, 7.28, 2.14, 2.14, 1.22, 1.22, 1.16, 1.16, 1.23, 1.23, 1.44, 1.44, 1, 1, 1, 1]
                Solute NH4: InitialValuesUnits=ppm; WaterTableConcentration=0; D0=0; DepthConstant=0; MaxDepthSoluteAccessible=0; RunoffEffectivenessAtMovingSolute=0; MaxEffectiveRunoff=0
                  Thickness=[100, 100, 100, 100, 100, 100, 100, 100, 100, 100, 100, 100, 100, 100, 100, 100, 100, 100, 100, 100]
                  InitialValues=[0.86, 0.13, 0.1, 0.1, 0.06, 0.06, 0, 0, 0.14, 0.14, 0.07, 0.07, 0, 0, 0, 0, 1, 1, 1, 1]
                Solute Urea: same as Validation.Growth Experiments.Wagga.Wagga2008.WaggaWagga2008.Paddock.Soil.Urea
                SoilTemperature Temperature
              MicroClimate: a_interception=0; b_interception=1; c_interception=0; d_interception=0; SoilHeatFluxFraction=0; MinimumHeightDiffForNewLayer=0; NightInterceptionFraction=0; ReferenceHeight=2
              Report DailyReport: same as Incomplete.OCP Agronomy.AlmaPark_2015_Ex2a.AlmaPark_2015_Ex2a.AlmaPark2015_Ex2a_base.paddock.DailyReport
              Report HarvestReport
              Report DailyBiomass: same as Incomplete.DP Agronomy.WaggaCR2008.WaggaWagga2008CR.Paddock.DailyBiomass
              Report SowingReport: EventNames=[Canola].Sowing
                VariableNames:
                  [Clock].Today
                  [Canola].SowingData.Cultivar
                  [IWeather].Latitude
                  [IWeather].Longitude
      Folder Lameroo_2014_Ex1
        Experiment Lameroo_2014_Ex1
          Factors
            Permutation
              Factor TOS_index
                CompositeFactor 1: Specifications=[Sowing].Script.SowDate = 14-Apr
                CompositeFactor 2: Specifications=[Sowing].Script.SowDate = 9-May
                CompositeFactor 3: Specifications=[Sowing].Script.SowDate = 5-Jun
                CompositeFactor 4: Specifications=[Sowing].Script.SowDate = 20-Jun
              Factor Cv
                Specification=[Sowing].Script.CultivarName = 44Y87_CL,45Y88_CL,ATR_Gem,Hyola559_TT,Hyola575_CL,Hyola971_CL
              Factor Popn: Specification=[Sowing].Script.Population =  15,45
              Factor Fert: Specification=[codes].Script.fert_treat = nil
              Factor Irrig: Specification=[codes].Script.irrig_treat = nil
          Simulation Lameroo_OCP_2014
            Clock: Start=2014-01-01; End=2014-12-31
            Summary summaryfile
            Weather: FileName=met/25509_CombGSE.met
            SoilArbitrator
            Zone paddock: Area=1; Slope=0; AspectAngle=0; Altitude=50
              Folder manager
                Manager Reset on date: same as Incomplete.OCP Agronomy.Hart_2014_Ex1.Hart_2014_Ex1.Hart_OCP_2014.paddock.manager.Reset on date
                Manager Sowing: same as Incomplete.OCP Agronomy.Hart_2016_Ex1b.Hart_2016_Ex1b.Hart_2016_Ex1_Base.paddock.manager.Sowing
                Manager Fertilise
                  FertiliserType = UreaN
                  FertiliserDates = 1-Jun
                  fert_criteria = 1000
                  Amount = 50
                  FertiliserDepth = 0
                  script: same as in Incomplete.OCP Agronomy.Hart_2014_Ex1.Hart_2014_Ex1.Hart_OCP_2014.paddock.manager.Fertilise
                Manager codes
                  location = Lameroo
                  TOS_index = 1
                  fert_treat =
                  irrig_treat = nil
                  trial_code = 2014LAMEROO
                  script: same as in Incomplete.OCP Agronomy.Condo_2015_Ex1a.Condo_2015_Ex1a.condo_OCP_2015_Ex1a.paddock.manager.codes
                Manager HarvestAfterDate
                  HarvestDate = 5-Dec
                  script: same as in Validation.Growth Experiments.Kojonup.Kojonup2013.Kojonup2013Base.paddock.HarvestAfterDate
              Fertiliser
              Manager Fertilise at sowing
                Crop = [canola]
                FertiliserType = NH4N
                Amount = 25
                FertiliserDepth = 50
                script: same as in Incomplete.OCP Agronomy.Hart_2016_Ex1b.Hart_2016_Ex1b.Hart_2016_Ex1_Base.paddock.Fertilise at sowing
              Irrigation
              SurfaceOrganicMatter: InitialResidueName=wheat; InitialResidueType=wheat; InitialResidueMass=6000; InitialStandingFraction=0; InitialCPR=0; InitialCNR=80
              Plant canola: ResourceName=Canola
              Soil Loamy sand over sand over sandy loam (Lameroo No253): SoilType=Loamy sand; Site=Lameroo; NearestTown=Lameroo; Region=Murraylands; State=South Australia; Country=Australia; ApsoilNumber=253; Latitude=-35.304; Longitude=140.646; LocationAccuracy=+/- 20m
                DataSource=Characterisation 2007 by University of Adelaide, CSIRO Sustainable Ecosystems and AgriLink Agricultural Consultants as part of GRDC project 'Training growers to manage soil water'
                Comments=Sites 252-255 were part of a clay spreading experiment and are located across an individual paddock with a total spread of around 60-80m; CLL barley measured, other crops estimated;  Low clay soil with high-very high bulk density, low-very low CEC. Chemistry not limiting to root growth but CEC limits nutrient holding capacity and very sandy texture limits water holding capacity.
                Physical
                  Thickness  ParticleSizeSand  ParticleSizeSilt  ParticleSizeClay  BD    AirDry  LL15   DUL    SAT
                  150        95                1                 5                 1.66  0.005   0.01   0.073  0.344
                  250        96                1                 3                 1.64  0.0216  0.027  0.085  0.351
                  300        84                2                 14                1.68  0.048   0.048  0.132  0.336
                  200        82                1                 17                1.69  0.102   0.102  0.182  0.332
                  300        84.6667           1                 14.3333           1.72  0.102   0.102  0.148  0.321
                  SoilCrop WheatSoil: LL=[0.01, 0.027, 0.048, 0.125, 0.102]; KL=[0.06, 0.06, 0.06, 0.04, 0.04]; XF=[1, 1, 1, 1, 1]
                    LL source: Estimated based on local knowledge
                  SoilCrop BarleySoil: LL=[0.01, 0.027, 0.048, 0.125, 0.102]; KL=[0.07, 0.07, 0.07, 0.05, 0.05]; XF=[1, 1, 1, 1, 1]
                    LL source: Field measured and checked for sensibility
                  SoilCrop OatsSoil: LL=[0.05, 0.05, 0.048, 0.125, 0.102]; KL=[0.06, 0.06, 0.06, 0.04, 0.04]; XF=[1, 1, 1, 1, 1]
                    LL source: Field measured and checked for sensibility
                  SoilCrop CanolaSoil: LL=[0.01, 0.027, 0.048, 0.125, 0.102]; KL=[0.06, 0.06, 0.05, 0.03, 0.02]; XF=[1, 1, 1, 1, 0]
                WaterBalance SoilWater: SummerDate=1-Nov; SummerU=6; SummerCona=3.5; WinterDate=1-Apr; WinterU=2; WinterCona=2; DiffusConst=100; DiffusSlope=30; Salb=0.16; CN2Bare=73; CNRed=20; CNCov=0.8; PSIDul=-100; Thickness=[150, 250, 300, 400, 100]; SWCON=[0.6, 0.6, 0.6, 0.6, 0.6]
                Organic: FOMCNRatio=40; CarbonUnits=Total
                  Thickness  Carbon  SoilCNRatio  FBiom  FInert  FOM
                  150        0.52    12           0.04   0.4     511.8872
                  250        0.13    12           0.02   0.5     273.9935
                  300        0.13    12           0.02   0.7     129.4254
                  400        0.13    12           0.01   1       47.6129
                  100        0.13    12           0.01   1       37.081
                Chemical: PHUnits=Water
                  Thickness  PH   EC     ESP
                  150        7.5  0.093  0
                  250        8.1  0.061  0
                  300        8.1  0.104  0
                  400        8.9  0.123  0
                  400        8.9  0.094  0
                  EC, CL, PH source: Measured
                  ESP source: C
                Water: Thickness=[150, 250, 300, 200, 300]; InitialValues=[0.0289, 0.0444, 0.0732, 0.126, 0.1158]; FilledFromTop=false
                Nutrient
                Solute NO3: Thickness=[150, 250, 300, 400, 400]; InitialValues=[12.0482, 2.439, 1.5873, 0.1466, 0.8953]; InitialValuesUnits=ppm; WaterTableConcentration=0; D0=0; DepthConstant=0; MaxDepthSoluteAccessible=0; RunoffEffectivenessAtMovingSolute=0; MaxEffectiveRunoff=0
                Solute NH4: Thickness=[150, 250, 300, 400, 400]; InitialValues=[0.8032, 0, 0, 0, 0.15]; InitialValuesUnits=ppm; WaterTableConcentration=0; D0=0; DepthConstant=0; MaxDepthSoluteAccessible=0; RunoffEffectivenessAtMovingSolute=0; MaxEffectiveRunoff=0
                Solute Urea: Thickness=[150, 250, 300, 400, 400]; InitialValues=[0, 0, 0, 0, 0]; InitialValuesUnits=kg/ha; WaterTableConcentration=0; D0=0; DepthConstant=0; MaxDepthSoluteAccessible=0; RunoffEffectivenessAtMovingSolute=0; MaxEffectiveRunoff=0
                SoilTemperature Temperature
              Soil A_swale(modified): ASCOrder=AJAR2007; ASCSubOrder=Loam over constrained clay; SoilType=sNSW; Site=Karoonda; NearestTown=Karoonda; Region=Murraylands; State=South Australia; Country=Australia; NaturalVegetation=Mallee; ApsoilNumber=385; Latitude=-35.045; Longitude=140.0519; LocationAccuracy=+/- 20m; Comments=Mallee Sustainable Farming core site, Lowaldie - flats
                DataSource=Based on soil characterisation undertaken by CSIRO Sustainable Ecosystems (Whitbread/Davoren) as part of MSF-GRDC WUE Projects
                WaterBalance SoilWater: SummerDate=1-Nov; SummerU=6; SummerCona=3.5; WinterDate=1-Apr; WinterU=2; WinterCona=2; DiffusConst=40; DiffusSlope=16; Salb=0.13; CN2Bare=85; CNRed=20; CNCov=0.8; PSIDul=-100; Thickness=[100, 100, 200, 200, 200, 300]; SWCON=[0.4, 0.4, 0.3, 0.3, 0.2, 0.2]
                Organic: FOMCNRatio=40; CarbonUnits=Total
                  Thickness  Carbon  SoilCNRatio  FBiom  FInert  FOM
                  100        1.54    12.5         0.04   0.2     362.6108
                  100        0.75    12.5         0.02   0.3     276.0558
                  200        0.39    12.5         0.02   0.5     159.9959
                  200        0.08    12.5         0.02   1       92.7302
                  200        0.08    12.5         0.01   1       53.7444
                  200        0.08    12.5         0.01   1       31.1491
                  100        0.08    12.5         0.01   1       23.7138
                Chemical: PHUnits=Water
                  Thickness  PH    EC    ESP
                  100        7.44  0.15  1.57
                  100        8.78  0.22  8.41
                  200        9.33  0.4   15.37
                  200        9.58  0.63  23.84
                  200        8.45  1.02  27.97
                  300        8.45  1.02  31.21
                  EC, CL, PH source: Measured
                  ESP source: C
                Physical
                  Thickness  ParticleSizeClay  BD    AirDry  LL15   DUL    SAT
                  100        12                1.66  0.02    0.14   0.25   0.374
                  100        25                1.64  0.024   0.222  0.306  0.381
                  200        37                1.64  0.024   0.257  0.323  0.381
                  200        40                1.68  0.024   0.27   0.33   0.366
                  200        39                1.68  0.033   0.29   0.33   0.366
                  300        41                1.69  0.032   0.34   0.35   0.362
                  SoilCrop WheatSoil: LL=[0.14, 0.222, 0.257, 0.27, 0.29, 0.34]; KL=[0.06, 0.06, 0.06, 0.06, 0.04, 0.04]; XF=[1, 1, 1, 1, 1, 1]
                  SoilCrop CanolaSoil: LL=[0.14, 0.222, 0.257, 0.27, 0.29, 0.34]; KL=[0.06, 0.06, 0.06, 0.06, 0.04, 0.03]; XF=[1, 1, 1, 1, 0.5, 0.5]
                Water: Thickness=[100, 100, 200, 200, 200, 300]; InitialValues=[0.151, 0.2304, 0.2636, 0.276, 0.294, 0.341]; FilledFromTop=false
                Nutrient
                Solute NO3: Thickness=[100, 100, 200, 200, 200, 300]; InitialValues=[12.048, 2.439, 2.013, 1.587, 0.147, 0.147]; InitialValuesUnits=ppm; WaterTableConcentration=0; D0=0; DepthConstant=0; MaxDepthSoluteAccessible=0; RunoffEffectivenessAtMovingSolute=0; MaxEffectiveRunoff=0
                Solute NH4: Thickness=[100, 100, 200, 200, 200, 300]; InitialValues=[0.803, 0, 0, 0, 0, 0]; InitialValuesUnits=ppm; WaterTableConcentration=0; D0=0; DepthConstant=0; MaxDepthSoluteAccessible=0; RunoffEffectivenessAtMovingSolute=0; MaxEffectiveRunoff=0
                Solute Urea: Thickness=[100, 100, 200, 200, 200, 300]; InitialValues=[0, 0, 0, 0, 0, 0]; InitialValuesUnits=kg/ha; WaterTableConcentration=0; D0=0; DepthConstant=0; MaxDepthSoluteAccessible=0; RunoffEffectivenessAtMovingSolute=0; MaxEffectiveRunoff=0
                SoilTemperature Temperature
              MicroClimate: a_interception=0; b_interception=1; c_interception=0; d_interception=0; SoilHeatFluxFraction=0; MinimumHeightDiffForNewLayer=0; NightInterceptionFraction=0; ReferenceHeight=2
              Report DailyReport: same as Incomplete.OCP Agronomy.AlmaPark_2015_Ex2a.AlmaPark_2015_Ex2a.AlmaPark2015_Ex2a_base.paddock.DailyReport
              Report HarvestReport
              Report DailyBiomass: same as Incomplete.DP Agronomy.WaggaCR2008.WaggaWagga2008CR.Paddock.DailyBiomass
              Report SowingReport: EventNames=[Canola].Sowing
                VariableNames:
                  [Clock].Today
                  [Canola].SowingData.Cultivar
                  [IWeather].Latitude
                  [IWeather].Longitude
      Folder Lameroo_2015_Ex1b
        Experiment Lameroo_2015_Ex1b
          Factors
            Permutation
              Factor TOS_index
                CompositeFactor 1: Specifications=[Sowing].Script.SowDate = 16-Apr
                CompositeFactor 2: Specifications=[Sowing].Script.SowDate = 1-May
                CompositeFactor 3: Specifications=[Sowing].Script.SowDate = 15-May
              Factor Cv
                Specification=[Sowing].Script.CultivarName = 44Y89_CL,45Y88_CL,Archer,ATR_Gem,ATR_Stingray,AV_Garnet,Hyola559_TT,Hyola575_CL,Hyola750_TT
              Factor Popn: Specification=[Sowing].Script.Population =  45
              Factor Fert: Specification=[codes].Script.fert_treat = nil
              Factor Irrig: Specification=[codes].Script.irrig_treat = nil
          Simulation Lameroo_OCP_2015_Ex1b
            Clock: Start=2015-01-01; End=2015-12-01
            Summary summaryfile
            Weather: FileName=met/25509_CombGSE.met
            SoilArbitrator
            Zone paddock: Area=1; Slope=0; AspectAngle=0; Altitude=50
              Folder manager
                Manager Reset on date
                  ResetDate = 25-May
                  ResetWater = Yes
                  ResetN = Yes
                  ResetSOM = No
                  script: same as in Incomplete.OCP Agronomy.Hart_2014_Ex1.Hart_2014_Ex1.Hart_OCP_2014.paddock.manager.Reset on date
                Manager Sowing: same as Incomplete.OCP Agronomy.Hart_2016_Ex1b.Hart_2016_Ex1b.Hart_2016_Ex1_Base.paddock.manager.Sowing
                Manager Fertilise
                  FertiliserType = UreaN
                  FertiliserDates = 24-Jul
                  fert_criteria = 1000
                  Amount = 74
                  FertiliserDepth = 0
                  script: same as in Incomplete.OCP Agronomy.Hart_2014_Ex1.Hart_2014_Ex1.Hart_OCP_2014.paddock.manager.Fertilise
                Manager codes
                  location = Lameroo
                  TOS_index = 1
                  fert_treat =
                  irrig_treat = nil
                  trial_code = CTA15LAM1
                  script: same as in Incomplete.OCP Agronomy.Condo_2015_Ex1a.Condo_2015_Ex1a.condo_OCP_2015_Ex1a.paddock.manager.codes
                Manager HarvestAfterDate: same as Incomplete.OCP Agronomy.Condo_2016_Ex2.Condo_2016_Ex2.condo_OCP_2016_Ex2.paddock.manager.HarvestAfterDate
              Fertiliser
              Manager Fertilise at sowing: same as Incomplete.OCP Agronomy.Lameroo_2014_Ex1.Lameroo_2014_Ex1.Lameroo_OCP_2014.paddock.Fertilise at sowing
              Irrigation
              SurfaceOrganicMatter: InitialResidueName=wheat; InitialResidueType=wheat; InitialResidueMass=6000; InitialStandingFraction=0; InitialCPR=0; InitialCNR=80
              Plant canola: ResourceName=Canola
              Soil Loamy sand over sand over sandy loam (Lameroo No253): SoilType=Loamy sand; Site=Lameroo; NearestTown=Lameroo; Region=Murraylands; State=South Australia; Country=Australia; ApsoilNumber=253; Latitude=-35.304; Longitude=140.646; LocationAccuracy=+/- 20m
                DataSource=Characterisation 2007 by University of Adelaide, CSIRO Sustainable Ecosystems and AgriLink Agricultural Consultants as part of GRDC project 'Training growers to manage soil water'
                Comments=Sites 252-255 were part of a clay spreading experiment and are located across an individual paddock with a total spread of around 60-80m; CLL barley measured, other crops estimated;  Low clay soil with high-very high bulk density, low-very low CEC. Chemistry not limiting to root growth but CEC limits nutrient holding capacity and very sandy texture limits water holding capacity.
                Physical: same as Incomplete.OCP Agronomy.Lameroo_2014_Ex1.Lameroo_2014_Ex1.Lameroo_OCP_2014.paddock.Loamy sand over sand over sandy loam (Lameroo No253).Physical
                WaterBalance SoilWater: same as Incomplete.OCP Agronomy.Lameroo_2014_Ex1.Lameroo_2014_Ex1.Lameroo_OCP_2014.paddock.Loamy sand over sand over sandy loam (Lameroo No253).SoilWater
                Organic: same as Incomplete.OCP Agronomy.Lameroo_2014_Ex1.Lameroo_2014_Ex1.Lameroo_OCP_2014.paddock.Loamy sand over sand over sandy loam (Lameroo No253).Organic
                Chemical: PHUnits=Water
                  Thickness  PH   EC     ESP
                  150        7.5  0.093  0
                  250        8.1  0.061  0
                  300        8.1  0.104  0
                  400        8.9  0.123  0
                  100        9.4  0.094  0
                  EC, CL, PH source: Measured
                  ESP source: C
                Water: Thickness=[100, 200, 300, 300, 300]; InitialValues=[0.3, 0.306, 0.297, 0.32, 0.344]; FilledFromTop=false
                Nutrient
                Solute NO3: Thickness=[150, 250, 300, 400, 100]; InitialValues=[14, 12.4, 4.6667, 7.5, 9]; InitialValuesUnits=ppm; WaterTableConcentration=0; D0=0; DepthConstant=0; MaxDepthSoluteAccessible=0; RunoffEffectivenessAtMovingSolute=0; MaxEffectiveRunoff=0
                Solute NH4: Thickness=[150, 250, 300, 400, 100]; InitialValues=[0.6667, 0, 0, 0, 0]; InitialValuesUnits=ppm; WaterTableConcentration=0; D0=0; DepthConstant=0; MaxDepthSoluteAccessible=0; RunoffEffectivenessAtMovingSolute=0; MaxEffectiveRunoff=0
                Solute Urea: Thickness=[150, 250, 300, 400, 100]; InitialValues=[0, 0, 0, 0, 0]; InitialValuesUnits=kg/ha; WaterTableConcentration=0; D0=0; DepthConstant=0; MaxDepthSoluteAccessible=0; RunoffEffectivenessAtMovingSolute=0; MaxEffectiveRunoff=0
                SoilTemperature Temperature
              Soil A_swale(modified): ASCOrder=AJAR2007; ASCSubOrder=Loam over constrained clay; SoilType=sNSW; Site=Karoonda; NearestTown=Karoonda; Region=Murraylands; State=South Australia; Country=Australia; NaturalVegetation=Mallee; ApsoilNumber=385; Latitude=-35.045; Longitude=140.0519; LocationAccuracy=+/- 20m; Comments=Mallee Sustainable Farming core site, Lowaldie - flats
                DataSource=Based on soil characterisation undertaken by CSIRO Sustainable Ecosystems (Whitbread/Davoren) as part of MSF-GRDC WUE Projects
                WaterBalance SoilWater: same as Incomplete.OCP Agronomy.Lameroo_2014_Ex1.Lameroo_2014_Ex1.Lameroo_OCP_2014.paddock.A_swale(modified).SoilWater
                Organic: same as Incomplete.OCP Agronomy.Lameroo_2014_Ex1.Lameroo_2014_Ex1.Lameroo_OCP_2014.paddock.A_swale(modified).Organic
                Chemical: same as Incomplete.OCP Agronomy.Lameroo_2014_Ex1.Lameroo_2014_Ex1.Lameroo_OCP_2014.paddock.A_swale(modified).Chemical
                Physical: same as Incomplete.OCP Agronomy.Lameroo_2014_Ex1.Lameroo_2014_Ex1.Lameroo_OCP_2014.paddock.A_swale(modified).Physical
                Water: Thickness=[100, 100, 200, 200, 200, 300]; InitialValues=[0.173, 0.2472, 0.2768, 0.288, 0.302, 0.343]; FilledFromTop=false
                Nutrient
                Solute NO3: Thickness=[100, 100, 200, 200, 200, 300]; InitialValues=[12, 18, 11, 4, 6, 8]; InitialValuesUnits=ppm; WaterTableConcentration=0; D0=0; DepthConstant=0; MaxDepthSoluteAccessible=0; RunoffEffectivenessAtMovingSolute=0; MaxEffectiveRunoff=0
                Solute NH4: Thickness=[100, 100, 200, 200, 200, 300]; InitialValues=[1, 0, 0, 0, 0, 0]; InitialValuesUnits=ppm; WaterTableConcentration=0; D0=0; DepthConstant=0; MaxDepthSoluteAccessible=0; RunoffEffectivenessAtMovingSolute=0; MaxEffectiveRunoff=0
                Solute Urea: same as Incomplete.OCP Agronomy.Lameroo_2014_Ex1.Lameroo_2014_Ex1.Lameroo_OCP_2014.paddock.A_swale(modified).Urea
                SoilTemperature Temperature
              MicroClimate: a_interception=0; b_interception=1; c_interception=0; d_interception=0; SoilHeatFluxFraction=0; MinimumHeightDiffForNewLayer=0; NightInterceptionFraction=0; ReferenceHeight=2
              Report DailyReport: same as Incomplete.OCP Agronomy.AlmaPark_2015_Ex2a.AlmaPark_2015_Ex2a.AlmaPark2015_Ex2a_base.paddock.DailyReport
              Report HarvestReport
              Report DailyBiomass: same as Incomplete.DP Agronomy.WaggaCR2008.WaggaWagga2008CR.Paddock.DailyBiomass
              Report SowingReport: EventNames=[Canola].Sowing
                VariableNames:
                  [Clock].Today
                  [Canola].SowingData.Cultivar
                  [IWeather].Latitude
                  [IWeather].Longitude
      Folder Lameroo_2016_Ex1b
        Experiment Lameroo_2016_Ex1b
          Factors
            Permutation
              Factor TOS_index
                CompositeFactor 1
                  Specifications:
                    [Sowing].Script.SowDate = 13-Apr
                    [Irrigate].Script.irrigDates = 15-Apr,29-Apr
                    [Irrigate].Script.amount = 14
                CompositeFactor 2
                  Specifications:
                    [Sowing].Script.SowDate = 28-Apr
                    [Irrigate].Script.irrigDates = 29-Apr,12-May
                    [Irrigate].Script.amount = 14
                CompositeFactor 3
                  Specifications:
                    [Sowing].Script.SowDate = 12-May
                    [Irrigate].Script.irrigDates = 12-May
                    [Irrigate].Script.amount = 14
              Factor Cv
                Specification=[Sowing].Script.CultivarName = 44Y89_CL,45Y88_CL,Archer,ATR_Gem,ATR_Stingray,Hyola559_TT,Hyola575_CL,Hyola750_TT,NS_Diamond
              Factor Popn: Specification=[Sowing].Script.Population =  60
              Factor Fert: Specification=[codes].Script.fert_treat = nil
              Factor Irrig: Specification=[codes].Script.irrig_treat = nil
          Simulation Lameroo_OCP_2016_Ex1b
            Clock: Start=2016-03-01; End=2016-12-15
            Summary summaryfile
            Weather: FileName=met/25509_CombGSE.met
            SoilArbitrator
            Zone paddock: Area=1; Slope=0; AspectAngle=0; Altitude=50
              Folder manager
                Manager Reset on date
                  ResetDate = 10-Apr
                  ResetWater = Yes
                  ResetN = No
                  ResetSOM = No
                  script: same as in Incomplete.OCP Agronomy.Hart_2014_Ex1.Hart_2014_Ex1.Hart_OCP_2014.paddock.manager.Reset on date
                Manager Sowing: same as Incomplete.OCP Agronomy.Hart_2016_Ex1b.Hart_2016_Ex1b.Hart_2016_Ex1_Base.paddock.manager.Sowing
                Manager Fertilise
                  FertiliserType = UreaN
                  FertiliserDates = 16-Jun
                  fert_criteria = 1000
                  Amount = 150
                  FertiliserDepth = 0
                  script: same as in Incomplete.OCP Agronomy.Hart_2014_Ex1.Hart_2014_Ex1.Hart_OCP_2014.paddock.manager.Fertilise
                Manager codes
                  location = Lameroo
                  TOS_index = 1
                  fert_treat =
                  irrig_treat = nil
                  trial_code = CTA16LAM1
                  script: same as in Incomplete.OCP Agronomy.Condo_2015_Ex1a.Condo_2015_Ex1a.condo_OCP_2015_Ex1a.paddock.manager.codes
                Manager Irrigate
                  irrigDates = 12-Apr
                  amount = 0
                  script: same as in Validation.Growth Experiments.Wagga.Wagga2008.WaggaWagga2008.Paddock.Irrigate
                Manager HarvestAfterDate
                  HarvestDate = 14-Nov
                  script: same as in Validation.Growth Experiments.Kojonup.Kojonup2013.Kojonup2013Base.paddock.HarvestAfterDate
              Fertiliser
              Manager Fertilise at sowing
                Crop = [canola]
                FertiliserType = NH4N
                Amount = 25.2
                FertiliserDepth = 50
                script: same as in Incomplete.OCP Agronomy.Hart_2016_Ex1b.Hart_2016_Ex1b.Hart_2016_Ex1_Base.paddock.Fertilise at sowing
              Irrigation
              SurfaceOrganicMatter: InitialResidueName=wheat; InitialResidueType=wheat; InitialResidueMass=6000; InitialStandingFraction=0; InitialCPR=0; InitialCNR=80
              Plant canola: ResourceName=Canola
              Soil Loamy sand over sand over sandy loam (Lameroo No253): SoilType=Loamy sand; Site=Lameroo; NearestTown=Lameroo; Region=Murraylands; State=South Australia; Country=Australia; ApsoilNumber=253; Latitude=-35.304; Longitude=140.646; LocationAccuracy=+/- 20m
                DataSource=Characterisation 2007 by University of Adelaide, CSIRO Sustainable Ecosystems and AgriLink Agricultural Consultants as part of GRDC project 'Training growers to manage soil water'
                Comments=Sites 252-255 were part of a clay spreading experiment and are located across an individual paddock with a total spread of around 60-80m; CLL barley measured, other crops estimated;  Low clay soil with high-very high bulk density, low-very low CEC. Chemistry not limiting to root growth but CEC limits nutrient holding capacity and very sandy texture limits water holding capacity.
                Physical: same as Incomplete.OCP Agronomy.Lameroo_2014_Ex1.Lameroo_2014_Ex1.Lameroo_OCP_2014.paddock.Loamy sand over sand over sandy loam (Lameroo No253).Physical
                WaterBalance SoilWater: same as Incomplete.OCP Agronomy.Lameroo_2014_Ex1.Lameroo_2014_Ex1.Lameroo_OCP_2014.paddock.Loamy sand over sand over sandy loam (Lameroo No253).SoilWater
                Organic: same as Incomplete.OCP Agronomy.Lameroo_2014_Ex1.Lameroo_2014_Ex1.Lameroo_OCP_2014.paddock.Loamy sand over sand over sandy loam (Lameroo No253).Organic
                Chemical: same as Incomplete.OCP Agronomy.Lameroo_2015_Ex1b.Lameroo_2015_Ex1b.Lameroo_OCP_2015_Ex1b.paddock.Loamy sand over sand over sandy loam (Lameroo No253).Chemical
                Water: Thickness=[150, 250, 300, 400, 100]; InitialValues=[0.0467, 0.068, 0.1, 0.0775, 0.0775]; FilledFromTop=false
                Nutrient
                Solute NO3: Thickness=[150, 250, 300, 400, 100]; InitialValues=[12.0482, 2.439, 1.5873, 0.1479, 0.1453]; InitialValuesUnits=ppm; WaterTableConcentration=0; D0=0; DepthConstant=0; MaxDepthSoluteAccessible=0; RunoffEffectivenessAtMovingSolute=0; MaxEffectiveRunoff=0
                Solute NH4: Thickness=[150, 250, 300, 400, 100]; InitialValues=[0.8032, 0, 0, 0, 0]; InitialValuesUnits=ppm; WaterTableConcentration=0; D0=0; DepthConstant=0; MaxDepthSoluteAccessible=0; RunoffEffectivenessAtMovingSolute=0; MaxEffectiveRunoff=0
                Solute Urea: same as Incomplete.OCP Agronomy.Lameroo_2015_Ex1b.Lameroo_2015_Ex1b.Lameroo_OCP_2015_Ex1b.paddock.Loamy sand over sand over sandy loam (Lameroo No253).Urea
                SoilTemperature Temperature
              Soil A_swale(modified): ASCOrder=AJAR2007; ASCSubOrder=Loam over constrained clay; SoilType=sNSW; Site=Karoonda; NearestTown=Karoonda; Region=Murraylands; State=South Australia; Country=Australia; NaturalVegetation=Mallee; ApsoilNumber=385; Latitude=-35.045; Longitude=140.0519; LocationAccuracy=+/- 20m; Comments=Mallee Sustainable Farming core site, Lowaldie - flats
                DataSource=Based on soil characterisation undertaken by CSIRO Sustainable Ecosystems (Whitbread/Davoren) as part of MSF-GRDC WUE Projects
                WaterBalance SoilWater: same as Incomplete.OCP Agronomy.Lameroo_2014_Ex1.Lameroo_2014_Ex1.Lameroo_OCP_2014.paddock.A_swale(modified).SoilWater
                Organic: same as Incomplete.OCP Agronomy.Lameroo_2014_Ex1.Lameroo_2014_Ex1.Lameroo_OCP_2014.paddock.A_swale(modified).Organic
                Chemical: same as Incomplete.OCP Agronomy.Lameroo_2014_Ex1.Lameroo_2014_Ex1.Lameroo_OCP_2014.paddock.A_swale(modified).Chemical
                Physical: same as Incomplete.OCP Agronomy.Lameroo_2014_Ex1.Lameroo_2014_Ex1.Lameroo_OCP_2014.paddock.A_swale(modified).Physical
                Water: Thickness=[100, 200, 300, 300, 200]; InitialValues=[0.047, 0.068, 0.1, 0.078, 0.078]; FilledFromTop=false
                Nutrient
                Solute NO3: Thickness=[100, 100, 200, 200, 200, 300]; InitialValues=[12.048, 2.439, 2.013, 1.587, 0.148, 0.148]; InitialValuesUnits=ppm; WaterTableConcentration=0; D0=0; DepthConstant=0; MaxDepthSoluteAccessible=0; RunoffEffectivenessAtMovingSolute=0; MaxEffectiveRunoff=0
                Solute NH4: same as Incomplete.OCP Agronomy.Lameroo_2014_Ex1.Lameroo_2014_Ex1.Lameroo_OCP_2014.paddock.A_swale(modified).NH4
                Solute Urea: same as Incomplete.OCP Agronomy.Lameroo_2014_Ex1.Lameroo_2014_Ex1.Lameroo_OCP_2014.paddock.A_swale(modified).Urea
                SoilTemperature Temperature
              MicroClimate: a_interception=0; b_interception=1; c_interception=0; d_interception=0; SoilHeatFluxFraction=0; MinimumHeightDiffForNewLayer=0; NightInterceptionFraction=0; ReferenceHeight=2
              Report DailyReport: same as Incomplete.OCP Agronomy.AlmaPark_2015_Ex2a.AlmaPark_2015_Ex2a.AlmaPark2015_Ex2a_base.paddock.DailyReport
              Report HarvestReport
              Report DailyBiomass: same as Incomplete.DP Agronomy.WaggaCR2008.WaggaWagga2008CR.Paddock.DailyBiomass
              Report SowingReport: EventNames=[Canola].Sowing
                VariableNames:
                  [Clock].Today
                  [Canola].SowingData.Cultivar
                  [IWeather].Latitude
                  [IWeather].Longitude
      Folder Lameroo_2017_Ex1b
        Experiment Lameroo_2017_Ex1b
          Factors
            Permutation
              Factor TOS_index
                CompositeFactor 1: Specifications=[Sowing].Script.SowDate = 21-Apr
                CompositeFactor 2: Specifications=[Sowing].Script.SowDate = 8-May
              Factor Cv
                Specification=[Sowing].Script.CultivarName = 44Y90_CL,Archer,ATR_Bonito,ATR_Stingray,ATR_Wahoo,NS_Diamond
              Factor Popn: Specification=[Sowing].Script.Population =  45
              Factor Fert
                CompositeFactor D5: Specifications=[FertiliseSplit].Script.Amount = 0
                CompositeFactor D9
                  Specifications:
                    [FertiliseSplit].Script.FertiliserDates = 31-May,27-Jun
                    [FertiliseSplit].Script.Amount = 100
              Factor Irrig: Specification=[codes].Script.irrig_treat = nil
          Simulation Lameroo_OCP_2017_Ex1b
            Clock: Start=2017-03-01; End=2017-12-15
            Summary summaryfile
            Weather: FileName=met/25509_CombGSE.met
            SoilArbitrator
            Zone paddock: Area=1; Slope=0; AspectAngle=0; Altitude=50
              Folder manager
                Manager Reset on date
                  ResetDate = 7-Feb
                  ResetWater = Yes
                  ResetN = Yes
                  ResetSOM = No
                  script: same as in Incomplete.OCP Agronomy.Hart_2014_Ex1.Hart_2014_Ex1.Hart_OCP_2014.paddock.manager.Reset on date
                Manager Sowing: same as Incomplete.OCP Agronomy.Hart_2016_Ex1b.Hart_2016_Ex1b.Hart_2016_Ex1_Base.paddock.manager.Sowing
                Manager Fertilise
                  FertiliserType = UreaGranular
                  FertiliserDates = 16-Jun
                  fert_criteria = 1000
                  Amount = 0
                  FertiliserDepth = 0
                  script: same as in Incomplete.OCP Agronomy.Hart_2014_Ex1.Hart_2014_Ex1.Hart_OCP_2014.paddock.manager.Fertilise
                Manager FertiliseSplit: same as Incomplete.OCP Agronomy.Hart_2017_Ex1b.Hart_2017_Ex1b.Hart_OCP_2017_Ex1b.paddock.manager.FertiliseSplit
                Manager codes
                  location = Lameroo
                  TOS_index = 1
                  irrig_treat = nil
                  trial_code = 2017Lameroo
                  fert_code = D5
                  script: same as in Incomplete.OCP Agronomy.Hart_2017_Ex1b.Hart_2017_Ex1b.Hart_OCP_2017_Ex1b.paddock.manager.codes
                Manager HarvestAfterDate: same as Incomplete.OCP Agronomy.Canowindra_2015_Ex1b.Canowindra_2015_Ex1b.Canowindra_OCP_2015_Ex1b.paddock.manager.HarvestAfterDate
              Fertiliser
              Manager Fertilise at sowing: same as Incomplete.OCP Agronomy.Lameroo_2016_Ex1b.Lameroo_2016_Ex1b.Lameroo_OCP_2016_Ex1b.paddock.Fertilise at sowing
              Irrigation
              SurfaceOrganicMatter: InitialResidueName=wheat; InitialResidueType=wheat; InitialResidueMass=6000; InitialStandingFraction=0; InitialCPR=0; InitialCNR=80
              Plant canola: ResourceName=Canola
              Soil Loamy sand over sand over sandy loam (Lameroo No253): SoilType=Loamy sand; Site=Lameroo; NearestTown=Lameroo; Region=Murraylands; State=South Australia; Country=Australia; ApsoilNumber=253; Latitude=-35.304; Longitude=140.646; LocationAccuracy=+/- 20m
                DataSource=Characterisation 2007 by University of Adelaide, CSIRO Sustainable Ecosystems and AgriLink Agricultural Consultants as part of GRDC project 'Training growers to manage soil water'
                Comments=Sites 252-255 were part of a clay spreading experiment and are located across an individual paddock with a total spread of around 60-80m; CLL barley measured, other crops estimated;  Low clay soil with high-very high bulk density, low-very low CEC. Chemistry not limiting to root growth but CEC limits nutrient holding capacity and very sandy texture limits water holding capacity.
                Physical: same as Incomplete.OCP Agronomy.Lameroo_2014_Ex1.Lameroo_2014_Ex1.Lameroo_OCP_2014.paddock.Loamy sand over sand over sandy loam (Lameroo No253).Physical
                WaterBalance SoilWater: same as Incomplete.OCP Agronomy.Lameroo_2014_Ex1.Lameroo_2014_Ex1.Lameroo_OCP_2014.paddock.Loamy sand over sand over sandy loam (Lameroo No253).SoilWater
                Organic: same as Incomplete.OCP Agronomy.Lameroo_2014_Ex1.Lameroo_2014_Ex1.Lameroo_OCP_2014.paddock.Loamy sand over sand over sandy loam (Lameroo No253).Organic
                Chemical: same as Incomplete.OCP Agronomy.Lameroo_2015_Ex1b.Lameroo_2015_Ex1b.Lameroo_OCP_2015_Ex1b.paddock.Loamy sand over sand over sandy loam (Lameroo No253).Chemical
                Water: Thickness=[100, 200, 300, 300, 300]; InitialValues=[0.182, 0.231, 0.295, 0.324, 0.33]; FilledFromTop=false
                Nutrient
                Solute NO3: Thickness=[150, 250, 300, 400, 100]; InitialValues=[6.3333, 2.6, 2.3333, 3.5, 4]; InitialValuesUnits=ppm; WaterTableConcentration=0; D0=0; DepthConstant=0; MaxDepthSoluteAccessible=0; RunoffEffectivenessAtMovingSolute=0; MaxEffectiveRunoff=0
                Solute NH4: Thickness=[150, 250, 300, 400, 100]; InitialValues=[5, 4.6, 4, 3.5, 3]; InitialValuesUnits=ppm; WaterTableConcentration=0; D0=0; DepthConstant=0; MaxDepthSoluteAccessible=0; RunoffEffectivenessAtMovingSolute=0; MaxEffectiveRunoff=0
                Solute Urea: same as Incomplete.OCP Agronomy.Lameroo_2015_Ex1b.Lameroo_2015_Ex1b.Lameroo_OCP_2015_Ex1b.paddock.Loamy sand over sand over sandy loam (Lameroo No253).Urea
                SoilTemperature Temperature
              Soil A_swale(modified): ASCOrder=AJAR2007; ASCSubOrder=Loam over constrained clay; SoilType=sNSW; Site=Karoonda; NearestTown=Karoonda; Region=Murraylands; State=South Australia; Country=Australia; NaturalVegetation=Mallee; ApsoilNumber=385; Latitude=-35.045; Longitude=140.0519; LocationAccuracy=+/- 20m; Comments=Mallee Sustainable Farming core site, Lowaldie - flats
                DataSource=Based on soil characterisation undertaken by CSIRO Sustainable Ecosystems (Whitbread/Davoren) as part of MSF-GRDC WUE Projects
                WaterBalance SoilWater: same as Incomplete.OCP Agronomy.Lameroo_2014_Ex1.Lameroo_2014_Ex1.Lameroo_OCP_2014.paddock.A_swale(modified).SoilWater
                Organic: same as Incomplete.OCP Agronomy.Lameroo_2014_Ex1.Lameroo_2014_Ex1.Lameroo_OCP_2014.paddock.A_swale(modified).Organic
                Chemical: same as Incomplete.OCP Agronomy.Lameroo_2014_Ex1.Lameroo_2014_Ex1.Lameroo_OCP_2014.paddock.A_swale(modified).Chemical
                Physical
                  Thickness  ParticleSizeClay  BD    AirDry  LL15   DUL    SAT
                  100        12                1.66  0.02    0.14   0.2    0.374
                  100        25                1.64  0.024   0.222  0.306  0.381
                  200        37                1.64  0.024   0.257  0.323  0.381
                  200        40                1.68  0.024   0.27   0.33   0.366
                  200        39                1.68  0.033   0.29   0.33   0.366
                  300        41                1.69  0.032   0.34   0.35   0.362
                  SoilCrop WheatSoil: LL=[0.14, 0.222, 0.257, 0.27, 0.29, 0.34]; KL=[0.06, 0.06, 0.06, 0.06, 0.04, 0.04]; XF=[1, 1, 1, 1, 1, 1]
                  SoilCrop CanolaSoil: LL=[0.14, 0.222, 0.257, 0.27, 0.29, 0.34]; KL=[0.06, 0.06, 0.06, 0.06, 0.04, 0.03]; XF=[1, 1, 1, 1, 0.5, 0.5]
                Water: Thickness=[100, 200, 300, 300, 200]; InitialValues=[0.182, 0.231, 0.295, 0.324, 0.33]; FilledFromTop=false
                Nutrient
                Solute NO3: Thickness=[100, 100, 200, 200, 200, 300]; InitialValues=[8, 3, 2.5, 2, 3, 3.6667]; InitialValuesUnits=ppm; WaterTableConcentration=0; D0=0; DepthConstant=0; MaxDepthSoluteAccessible=0; RunoffEffectivenessAtMovingSolute=0; MaxEffectiveRunoff=0
                Solute NH4: Thickness=[100, 100, 200, 200, 200, 300]; InitialValues=[5, 5, 4.5, 4, 4, 3.3333]; InitialValuesUnits=ppm; WaterTableConcentration=0; D0=0; DepthConstant=0; MaxDepthSoluteAccessible=0; RunoffEffectivenessAtMovingSolute=0; MaxEffectiveRunoff=0
                Solute Urea: same as Incomplete.OCP Agronomy.Lameroo_2014_Ex1.Lameroo_2014_Ex1.Lameroo_OCP_2014.paddock.A_swale(modified).Urea
                SoilTemperature Temperature
              MicroClimate: a_interception=0; b_interception=1; c_interception=0; d_interception=0; SoilHeatFluxFraction=0; MinimumHeightDiffForNewLayer=0; NightInterceptionFraction=0; ReferenceHeight=2
              Report DailyReport: same as Incomplete.OCP Agronomy.AlmaPark_2015_Ex2a.AlmaPark_2015_Ex2a.AlmaPark2015_Ex2a_base.paddock.DailyReport
              Report HarvestReport
              Report DailyBiomass: same as Incomplete.DP Agronomy.WaggaCR2008.WaggaWagga2008CR.Paddock.DailyBiomass
              Report SowingReport: EventNames=[Canola].Sowing
                VariableNames:
                  [Clock].Today
                  [Canola].SowingData.Cultivar
                  [IWeather].Latitude
                  [IWeather].Longitude
      Folder Longerenong_2016_Ex1b
        Experiment Longerenong_2016_Ex1b
          Factors
            Permutation
              Factor TOS_index
                CompositeFactor 1
                  Specifications:
                    [Sowing].Script.SowDate = 1-Apr
                    [Irrigate].Script.irrigDates = 4-Apr,18-Apr
                    [Irrigate].Script.amount = 9
                CompositeFactor 2
                  Specifications:
                    [Sowing].Script.SowDate = 18-Apr
                    [Irrigate].Script.irrigDates = 18-Apr
                    [Irrigate].Script.amount = 9
                CompositeFactor 3
                  Specifications:
                    [Sowing].Script.SowDate = 2-May
                    [Irrigate].Script.irrigDates = 4-May
                    [Irrigate].Script.amount = 9
              Factor Cv
                Specification=[Sowing].Script.CultivarName = 44Y89_CL,45Y88_CL,Archer,ATR_Gem,ATR_Stingray,GT50_RR,Hyola559_TT,Hyola575_CL,Hyola600_RR,Hyola725_RT,IH30_RR,NS_Diamond
              Factor Popn: Specification=[Sowing].Script.Population =  45
              Factor Fert: Specification=[codes].Script.fert_treat = nil
              Factor Irrig: Specification=[codes].Script.irrig_treat = nil
          Simulation Longerenong_2016_Ex1_Base
            Clock: Start=2015-12-01; End=2016-12-01
            Summary summaryfile
            Weather: FileName=met/79028_CombGSE.met
            SoilArbitrator
            Zone paddock: Area=1; Slope=0; AspectAngle=0; Altitude=50
              Folder manager
                Manager Reset on date
                  ResetDate = 1-Jan
                  ResetWater = Yes
                  ResetN = Yes
                  ResetSOM = No
                  script: same as in Incomplete.OCP Agronomy.Hart_2014_Ex1.Hart_2014_Ex1.Hart_OCP_2014.paddock.manager.Reset on date
                Manager Sowing
                  SowDate = 1-Apr
                  CultivarName = Hyola575
                  SowingDepth = 20
                  RowSpacing = 250
                  Population = 45
                  script: same as in Incomplete.OCP Agronomy.Breeza_2014_Ex1.Breeza_2014_Ex1.Breeza_2014_Ex1_Base.paddock.manager.Sowing
                Manager Fertilise
                  FertiliserType = UreaN
                  FertiliserDates = 23-Apr
                  fert_criteria = 1000
                  Amount = 39.1
                  FertiliserDepth = 20
                  script: same as in Incomplete.OCP Agronomy.Hart_2014_Ex1.Hart_2014_Ex1.Hart_OCP_2014.paddock.manager.Fertilise
                Manager Fertilise1
                  FertiliserType = NH4N
                  FertiliserDates = 23-Apr
                  fert_criteria = 1000
                  Amount = 23.1
                  FertiliserDepth = 0
                  script: same as in Incomplete.OCP Agronomy.Hart_2014_Ex1.Hart_2014_Ex1.Hart_OCP_2014.paddock.manager.Fertilise
                Manager Fertilise2
                  FertiliserType = UreaN
                  FertiliserDates = 15-Jun
                  fert_criteria = 1000
                  Amount = 46
                  FertiliserDepth = 0
                  script: same as in Incomplete.OCP Agronomy.Hart_2014_Ex1.Hart_2014_Ex1.Hart_OCP_2014.paddock.manager.Fertilise
                Manager Irrigate
                  irrigDates = 1-Jan
                  amount = 0
                  script: same as in Validation.Growth Experiments.Wagga.Wagga2008.WaggaWagga2008.Paddock.Irrigate
                Manager codes: same as Incomplete.OCP Agronomy.Lameroo_2016_Ex1b.Lameroo_2016_Ex1b.Lameroo_OCP_2016_Ex1b.paddock.manager.codes
                Manager HarvestAfterDate
                  HarvestDate = 28-Nov
                  script: same as in Validation.Growth Experiments.Kojonup.Kojonup2013.Kojonup2013Base.paddock.HarvestAfterDate
              Plant canola: ResourceName=Canola
              MicroClimate: a_interception=0; b_interception=0; c_interception=0; d_interception=0; SoilHeatFluxFraction=0.1; MinimumHeightDiffForNewLayer=0; NightInterceptionFraction=0; ReferenceHeight=1
              SurfaceOrganicMatter SurfaceOM: InitialResidueName=lucerne; InitialResidueType=lucerne; InitialResidueMass=10000; InitialStandingFraction=0; InitialCPR=0; InitialCNR=40
              Fertiliser
              Manager Fertilise at sowing: same as Incomplete.OCP Agronomy.Hart_2016_Ex1b.Hart_2016_Ex1b.Hart_2016_Ex1_Base.paddock.Fertilise at sowing
              Irrigation
              Soil Grey Cracking Clay (Horsham No1008): ASCSubOrder=Grey; SoilType=SNSW; Site=Horsham Aerodrome; NearestTown=Horsham; Region=Wimmera; State=Victoria; Country=Australia; ApsoilNumber=1008; Latitude=-36.6809; Longitude=142.1683
                DataSource=Characterised by BCG as part of the the GRDC Southern Agribusiness Trial Network project.
                Physical
                  Thickness  BD      AirDry  LL15    DUL     SAT
                  100        1.2587  0.0824  0.1648  0.445   0.495
                  150        1.2065  0.0946  0.1182  0.4647  0.5147
                  150        1.3852  0.177   0.177   0.3973  0.4473
                  150        1.3655  0.177   0.177   0.4047  0.4547
                  150        1.3655  0.177   0.177   0.4047  0.4547
                  300        1.2629  0.177   0.177   0.4434  0.4934
                  300        1.2624  0.177   0.177   0.4436  0.4936
                  200        1.262   0.177   0.177   0.444   0.494
                  SoilCrop WheatSoil
                    LL=[0.1648, 0.1182, 0.177, 0.2116, 0.241, 0.2703, 0.3435, 0.344]
                    KL=[0.06, 0.06, 0.06, 0.06, 0.0467, 0.04, 0.0333, 0.03]
                    XF=[1, 1, 1, 1, 1, 1, 1, 1]
                    LL source: Field measured and checked for sensibility (layer 1, 2, 3, 4, 5, 6, 7)
                  SoilCrop BarleySoil
                    LL=[0.1648, 0.1182, 0.177, 0.2116, 0.241, 0.2703, 0.3435, 0.344]
                    KL=[0.07, 0.07, 0.07, 0.07, 0.0567, 0.05, 0.0433, 0.04]
                    XF=[1, 1, 1, 1, 1, 1, 1, 1]
                    LL source: Estimated based on local knowledge (layer 1, 2, 3, 4, 5, 6, 7)
                  SoilCrop CanolaSoil
                    LL=[0.1648, 0.1182, 0.177, 0.2116, 0.241, 0.2703, 0.3435, 0.344]
                    KL=[0.06, 0.06, 0.06, 0.06, 0.0467, 0.04, 0.0333, 0.03]
                    XF=[1, 1, 1, 1, 1, 1, 1, 1]
                    LL source: Estimated based on local knowledge (layer 1, 2, 3, 4, 5, 6, 7)
                WaterBalance SoilWater: SummerDate=1-Nov; SummerU=6; SummerCona=3.5; WinterDate=1-Apr; WinterU=2; WinterCona=2; DiffusConst=40; DiffusSlope=16; Salb=0.12; CN2Bare=84; CNRed=20; CNCov=0.8; PSIDul=-100; Thickness=[100, 150, 150, 150, 150, 300, 300, 200]; SWCON=[0.3, 0.3, 0.3, 0.3, 0.3, 0.3, 0.3, 0.3]
                Organic: FOMCNRatio=40; CarbonUnits=Total
                  Thickness  Carbon  SoilCNRatio  FBiom  FInert  FOM
                  100        1.34    7            0.1    0.2     3439.2023
                  150        0.62    7            0.1    0.4     2547.8238
                  150        0.65    7            0.08   0.5     1887.4743
                  300        0.325   7            0.07   0.6     1035.8678
                  300        0.195   7            0.06   0.7     568.4963
                  300        0.13    7            0.05   0.9     311.9974
                  200        0.13    7            0.04   0.9     209.1381
                Chemical: PHUnits=Water
                  Thickness  PH   EC    ESP
                  100        7    0.22  2
                  150        6.9  0.21  6.4
                  150        8    0.28  11.8
                  300        8    0.43  16.8
                  300        8    0.82  24.7
                  300        8    1.14  28
                  200        8    1.14  28
                  EC, CL, PH source: Measured (layer 1, 2, 3, 4, 5, 6)
                  ESP source: C (layer 1, 2, 3, 4, 5, 6)
                Water: Thickness=[100, 150, 150, 150, 150, 300, 300, 200]; FilledFromTop=true
                  InitialValues=[0.445, 0.4647, 0.3973, 0.4047, 0.4047, 0.4434, 0.4436, 0.444]
                Nutrient
                Solute NO3: Thickness=[100, 150, 150, 300, 300, 300, 200]; InitialValues=[24, 11, 11, 4, 3, 3, 3]; InitialValuesUnits=ppm; WaterTableConcentration=0; D0=0; DepthConstant=0; MaxDepthSoluteAccessible=0; RunoffEffectivenessAtMovingSolute=0; MaxEffectiveRunoff=0
                Solute NH4: Thickness=[100, 150, 150, 300, 300, 300, 200]; InitialValues=[3, 1, 1, 1, 1, 1, 1]; InitialValuesUnits=ppm; WaterTableConcentration=0; D0=0; DepthConstant=0; MaxDepthSoluteAccessible=0; RunoffEffectivenessAtMovingSolute=0; MaxEffectiveRunoff=0
                Solute Urea: Thickness=[100, 150, 150, 300, 300, 300, 200]; InitialValues=[0, 0, 0, 0, 0, 0, 0]; InitialValuesUnits=kg/ha; WaterTableConcentration=0; D0=0; DepthConstant=0; MaxDepthSoluteAccessible=0; RunoffEffectivenessAtMovingSolute=0; MaxEffectiveRunoff=0
                SoilTemperature Temperature
              Report DailyReport: same as Incomplete.OCP Agronomy.AlmaPark_2015_Ex2a.AlmaPark_2015_Ex2a.AlmaPark2015_Ex2a_base.paddock.DailyReport
              Report HarvestReport
              Report DailyBiomass: same as Incomplete.DP Agronomy.WaggaCR2008.WaggaWagga2008CR.Paddock.DailyBiomass
              Report SowingReport: EventNames=[Canola].Sowing
                VariableNames:
                  [Clock].Today
                  [Canola].SowingData.Cultivar
                  [IWeather].Latitude
                  [IWeather].Longitude
      Folder Longerenong_2017_Ex1a
        Experiment Longerenong_2017_Ex1a
          Factors
            Permutation
              Factor TOS_index
                CompositeFactor 1: Specifications=[Sowing].Script.SowDate = 8-Apr
                CompositeFactor 2: Specifications=[Sowing].Script.SowDate = 28-Apr
              Factor Cv
                Specification=[Sowing].Script.CultivarName =44Y90_CL,45Y25_RR,Archer,ATR_Bonito,ATR_Stingray,ATR_Wahoo,Hyola600_RR,NS_Diamond
              Factor Popn: Specification=[Sowing].Script.Population =  45
              Factor Fert
                CompositeFactor D5
                  Specifications:
                    [Fertilise2].Script.FertiliserDates = 27-Apr
                    [Fertilise2].Script.Amount = 34.5
                CompositeFactor D9
                  Specifications:
                    [Fertilise2].Script.FertiliserDates = 27-Apr
                    [Fertilise2].Script.Amount = 69
              Factor Irrig: Specification=[codes].Script.irrig_treat = nil
          Simulation Longerenong_OCP_2016_Ex1b
            Clock: Start=2017-01-01; End=2017-12-31
            Summary summaryfile
            Weather: FileName=met/79028_CombGSE.met
            SoilArbitrator
            Zone paddock: Area=1; Slope=0; AspectAngle=0; Altitude=50
              Folder manager
                Manager Reset on date: same as Incomplete.OCP Agronomy.Longerenong_2016_Ex1b.Longerenong_2016_Ex1b.Longerenong_2016_Ex1_Base.paddock.manager.Reset on date
                Manager Sowing: same as Incomplete.OCP Agronomy.Hart_2016_Ex1b.Hart_2016_Ex1b.Hart_2016_Ex1_Base.paddock.manager.Sowing
                Manager Fertilise: same as Incomplete.OCP Agronomy.Longerenong_2016_Ex1b.Longerenong_2016_Ex1b.Longerenong_2016_Ex1_Base.paddock.manager.Fertilise
                Manager Fertilise1
                  FertiliserType = NH4N
                  FertiliserDates = 23-Apr
                  fert_criteria = 1000
                  Amount = 23.1
                  FertiliserDepth = 20
                  script: same as in Incomplete.OCP Agronomy.Hart_2014_Ex1.Hart_2014_Ex1.Hart_OCP_2014.paddock.manager.Fertilise
                Manager Fertilise2: same as Incomplete.OCP Agronomy.Longerenong_2016_Ex1b.Longerenong_2016_Ex1b.Longerenong_2016_Ex1_Base.paddock.manager.Fertilise2
                Manager codes
                  location = Longerenong
                  TOS_index = 1
                  irrig_treat = nil
                  trial_code = CSTA16LONG3
                  fert_code = nil
                  script: same as in Incomplete.OCP Agronomy.Hart_2017_Ex1b.Hart_2017_Ex1b.Hart_OCP_2017_Ex1b.paddock.manager.codes
                Manager HarvestAfterDate
                  HarvestDate = 11-Nov
                  script: same as in Validation.Growth Experiments.Kojonup.Kojonup2013.Kojonup2013Base.paddock.HarvestAfterDate
              Fertiliser
              Manager Fertilise at sowing
                Crop = [canola]
                FertiliserType = NH4N
                Amount = 6.6
                FertiliserDepth = 50
                script: same as in Incomplete.OCP Agronomy.Hart_2016_Ex1b.Hart_2016_Ex1b.Hart_2016_Ex1_Base.paddock.Fertilise at sowing
              Irrigation
              SurfaceOrganicMatter: InitialResidueName=lucerne; InitialResidueType=lucerne; InitialResidueMass=10000; InitialStandingFraction=0; InitialCPR=0; InitialCNR=40
              Plant canola: ResourceName=Canola
              Soil Grey Cracking Clay (Horsham No1008): ASCSubOrder=Grey; SoilType=SNSW; Site=Horsham Aerodrome; NearestTown=Horsham; Region=Wimmera; State=Victoria; Country=Australia; ApsoilNumber=1008; Latitude=-36.6809; Longitude=142.1683
                DataSource=Characterised by BCG as part of the the GRDC Southern Agribusiness Trial Network project.
                Physical: same as Incomplete.OCP Agronomy.Longerenong_2016_Ex1b.Longerenong_2016_Ex1b.Longerenong_2016_Ex1_Base.paddock.Grey Cracking Clay (Horsham No1008).Physical
                WaterBalance SoilWater: same as Incomplete.OCP Agronomy.Longerenong_2016_Ex1b.Longerenong_2016_Ex1b.Longerenong_2016_Ex1_Base.paddock.Grey Cracking Clay (Horsham No1008).SoilWater
                Organic: same as Incomplete.OCP Agronomy.Longerenong_2016_Ex1b.Longerenong_2016_Ex1b.Longerenong_2016_Ex1_Base.paddock.Grey Cracking Clay (Horsham No1008).Organic
                Chemical: same as Incomplete.OCP Agronomy.Longerenong_2016_Ex1b.Longerenong_2016_Ex1b.Longerenong_2016_Ex1_Base.paddock.Grey Cracking Clay (Horsham No1008).Chemical
                Water: Thickness=[100, 300, 300, 300, 300, 200]; InitialValues=[0.264, 0.351, 0.341, 0.341, 0.341, 0.341]; FilledFromTop=false
                Nutrient
                Solute NO3: same as Incomplete.OCP Agronomy.Longerenong_2016_Ex1b.Longerenong_2016_Ex1b.Longerenong_2016_Ex1_Base.paddock.Grey Cracking Clay (Horsham No1008).NO3
                Solute NH4: same as Incomplete.OCP Agronomy.Longerenong_2016_Ex1b.Longerenong_2016_Ex1b.Longerenong_2016_Ex1_Base.paddock.Grey Cracking Clay (Horsham No1008).NH4
                Solute Urea: same as Incomplete.OCP Agronomy.Longerenong_2016_Ex1b.Longerenong_2016_Ex1b.Longerenong_2016_Ex1_Base.paddock.Grey Cracking Clay (Horsham No1008).Urea
                SoilTemperature Temperature
              MicroClimate: a_interception=0; b_interception=1; c_interception=0; d_interception=0; SoilHeatFluxFraction=0; MinimumHeightDiffForNewLayer=0; NightInterceptionFraction=0; ReferenceHeight=2
              Report DailyReport: same as Incomplete.OCP Agronomy.AlmaPark_2015_Ex2a.AlmaPark_2015_Ex2a.AlmaPark2015_Ex2a_base.paddock.DailyReport
              Report HarvestReport
              Report DailyBiomass: same as Incomplete.DP Agronomy.WaggaCR2008.WaggaWagga2008CR.Paddock.DailyBiomass
              Report SowingReport: EventNames=[Canola].Sowing
                VariableNames:
                  [Clock].Today
                  [Canola].SowingData.Cultivar
                  [IWeather].Latitude
                  [IWeather].Longitude
      Folder Minnipa_2014_Ex1
        Experiment Minnipa_2014_Ex1
          Factors
            Permutation
              Factor TOS_index
                CompositeFactor 1: Specifications=[Sowing].Script.SowDate = 15-Apr
                CompositeFactor 2: Specifications=[Sowing].Script.SowDate = 30-Apr
                CompositeFactor 3: Specifications=[Sowing].Script.SowDate = 13-May
                CompositeFactor 4: Specifications=[Sowing].Script.SowDate = 29-May
              Factor Cv: Specification=[Sowing].Script.CultivarName = ATR_Stingray,Hyola559_TT
              Factor Popn: Specification=[Sowing].Script.Population =  40,60
              Factor Fert: Specification=[codes].Script.fert_treat = nil
              Factor Irrig: Specification=[codes].Script.irrig_treat = nil
          Simulation Minnipa_OCP_2014
            Clock: Start=2014-03-01; End=2015-01-31
            Summary summaryfile
            Weather: FileName=met/18052_CombGSE.met
            SoilArbitrator
            Zone paddock: Area=1; Slope=0; AspectAngle=0; Altitude=50
              Folder manager
                Manager Reset on date: same as Incomplete.OCP Agronomy.Hart_2014_Ex1.Hart_2014_Ex1.Hart_OCP_2014.paddock.manager.Reset on date
                Manager Sowing: same as Incomplete.OCP Agronomy.Hart_2016_Ex1b.Hart_2016_Ex1b.Hart_2016_Ex1_Base.paddock.manager.Sowing
                Manager codes
                  location = Longerenong
                  TOS_index = 1
                  fert_treat =
                  irrig_treat = nil
                  trial_code = CSTA16LONG3
                  fert_code = nil
                  script: same as in Incomplete.OCP Agronomy.Downside_2016_Ex1b.Downside_2016_Ex1b.Downside_OCP_2016_Ex1b.paddock.manager.codes
                Manager HarvestAfterDate: same as Incomplete.OCP Agronomy.Ganmain_2017_Ex1a.Ganmain_2017_Ex1a.Ganmain_OCP_2017_Ex1a.paddock.manager.HarvestAfterDate
              Fertiliser
              Manager Fertilise at sowing: same as Incomplete.OCP Agronomy.Lameroo_2014_Ex1.Lameroo_2014_Ex1.Lameroo_OCP_2014.paddock.Fertilise at sowing
              Irrigation
              SurfaceOrganicMatter: InitialResidueName=wheat; InitialResidueType=wheat; InitialResidueMass=6000; InitialStandingFraction=0; InitialCPR=0; InitialCNR=80
              Plant canola: ResourceName=Canola
              Soil: SoilType=SNSW; Site=Minnipa; NearestTown=Minnipa; Region=West Coast; State=South Australia; Country=Australia; ApsoilNumber=909; Latitude=-32.831; Longitude=135.146; LocationAccuracy=Regional soil type; DataSource=Collected by Brett Cocks (CES) for NVT.
                Physical
                  Thickness  BD     AirDry  LL15   DUL    SAT
                  150        1.367  0.026   0.051  0.165  0.215
                  150        1.214  0.067   0.083  0.185  0.235
                  300        1.235  0.109   0.109  0.2    0.25
                  300        1.209  0.109   0.12   0.275  0.325
                  300        1.238  0.109   0.136  0.244  0.294
                  SoilCrop WheatSoil: LL=[0.051, 0.083, 0.109, 0.12, 0.136]; KL=[0.06, 0.06, 0.06, 0.04, 0.04]; XF=[1, 1, 1, 1, 1]
                    LL source: Field measured and checked for sensibility
                  SoilCrop CanolaSoil: LL=[0.051, 0.083, 0.109, 0.12, 0.136]; KL=[0.06, 0.06, 0.06, 0.04, 0.04]; XF=[1, 1, 1, 1, 1]
                WaterBalance SoilWater: SummerDate=1-Nov; SummerU=6; SummerCona=3.5; WinterDate=1-Apr; WinterU=2; WinterCona=2; DiffusConst=88; DiffusSlope=35; Salb=0.13; CN2Bare=73; CNRed=20; CNCov=0.8; DischargeWidth=5; CatchmentArea=10; PSIDul=-100; Thickness=[150, 150, 300, 300, 300]; SWCON=[0.5, 0.5, 0.5, 0.5, 0.5]
                Organic: FOMCNRatio=40; CarbonUnits=Total
                  Thickness  Carbon  SoilCNRatio  FBiom  FInert  FOM
                  150        0.82    12           0.04   0.4     446.8801
                  150        0.56    12           0.02   0.5     307.1359
                  300        0.52    12           0.02   0.7     145.0807
                  300        0.43    12           0.02   1       68.5313
                  300        0.26    12           0.01   1       32.3719
                Chemical: PHUnits=Water
                  Thickness  PH   EC
                  150        8.3  0.2
                  150        8.6  0.1
                  300        8.9  0.1
                  300        8.9  0.3
                  300        8.9  0.6
                Water: Thickness=[150, 150, 300, 300, 300]; InitialValues=[0.0852, 0.1136, 0.1363, 0.1665, 0.1684]; FilledFromTop=false
                Nutrient
                Solute NO3: Thickness=[150, 150, 300, 300, 300]; InitialValues=[9.7537, 10.983, 2.6991, 0, 0]; InitialValuesUnits=ppm; WaterTableConcentration=0; D0=0; DepthConstant=0; MaxDepthSoluteAccessible=0; RunoffEffectivenessAtMovingSolute=0; MaxEffectiveRunoff=0
                Solute NH4: Thickness=[150, 150, 300, 300, 300]; InitialValues=[0, 0, 0, 0, 0]; InitialValuesUnits=ppm; WaterTableConcentration=0; D0=0; DepthConstant=0; MaxDepthSoluteAccessible=0; RunoffEffectivenessAtMovingSolute=0; MaxEffectiveRunoff=0
                Solute Urea: Thickness=[150, 150, 300, 300, 300]; InitialValues=[0, 0, 0, 0, 0]; InitialValuesUnits=kg/ha; WaterTableConcentration=0; D0=0; DepthConstant=0; MaxDepthSoluteAccessible=0; RunoffEffectivenessAtMovingSolute=0; MaxEffectiveRunoff=0
                SoilTemperature Temperature
              MicroClimate: a_interception=0; b_interception=1; c_interception=0; d_interception=0; SoilHeatFluxFraction=0; MinimumHeightDiffForNewLayer=0; NightInterceptionFraction=0; ReferenceHeight=2
              Report DailyReport: same as Incomplete.OCP Agronomy.AlmaPark_2015_Ex2a.AlmaPark_2015_Ex2a.AlmaPark2015_Ex2a_base.paddock.DailyReport
              Report HarvestReport
              Report DailyBiomass: same as Incomplete.DP Agronomy.WaggaCR2008.WaggaWagga2008CR.Paddock.DailyBiomass
              Report SowingReport: EventNames=[Canola].Sowing
                VariableNames:
                  [Clock].Today
                  [Canola].SowingData.Cultivar
                  [IWeather].Latitude
                  [IWeather].Longitude
      Folder Minnipa_2015_Ex3
        Experiment Minnipa_2015_Ex3
          Factors
            Permutation
              Factor TOS_index
                CompositeFactor 1
                  Specifications:
                    [Sowing].Script.SowDate = 21-Apr
                    [Fertilise].Script.date1 = 21-apr
                    [Fertilise].Script.date2 = 12-jun
                    [Fertilise].Script.date3 = 7-jul
                    [Fertilise].Script.date4 = 21-jul
                CompositeFactor 2
                  Specifications:
                    [Sowing].Script.SowDate = 6-May
                    [Fertilise].Script.date1 = 6-May
                    [Fertilise].Script.date2 = 8-Jul
                    [Fertilise].Script.date3 = 31-Jul
                    [Fertilise].Script.date4 = 10-Aug
              Factor Cv: Specification=[Sowing].Script.CultivarName = ATR_Stingray,Hyola450_TT
              Factor Popn: Specification=[Sowing].Script.Population =  45
              Factor Fert
                CompositeFactor Bolting
                  Specifications=[Fertilise].Script.FertiliserDate = [Fertilise].Script.date1
                CompositeFactor Flowering
                  Specifications=[Fertilise].Script.FertiliserDate = [Fertilise].Script.date2
                CompositeFactor PostEm
                  Specifications=[Fertilise].Script.FertiliserDate = [Fertilise].Script.date3
                CompositeFactor Seeding
                  Specifications=[Fertilise].Script.FertiliserDate = [Fertilise].Script.date4
              Factor Irrig: Specification=[codes].Script.irrig_treat = nil
          Simulation Minnipa_OCP_2015_Ex3
            Clock: Start=2015-01-01; End=2015-12-01
            Summary summaryfile
            Weather: FileName=met/18052_CombGSE.met
            SoilArbitrator
            Zone paddock: Area=1; Slope=0; AspectAngle=0; Altitude=50
              Folder manager
                Manager Reset on date
                  ResetDate = 19-Apr
                  ResetWater = Yes
                  ResetN = Yes
                  ResetSOM = No
                  script: same as in Incomplete.OCP Agronomy.Hart_2014_Ex1.Hart_2014_Ex1.Hart_OCP_2014.paddock.manager.Reset on date
                Manager Sowing: same as Incomplete.OCP Agronomy.Hart_2016_Ex1b.Hart_2016_Ex1b.Hart_2016_Ex1_Base.paddock.manager.Sowing
                Manager Fertilise
                  FertiliserType = UreaN
                  FertiliserDate =
                  fert_criteria = 1000
                  Amount = 100
                  FertiliserDepth = 0
```csharp
using Models.Soils.Nutrients;
using System;
using Models.Soils;
using Models.Core;
using Models.PMF;
using APSIM.Shared.Utilities;
namespace Models
{
    [Serializable]
    public class Script : Model
    {
        [Link] Clock Clock;
        [Link] Fertiliser Fertiliser;
        [Link] INutrient nutrient;
        [Link] Summary sum;
        
        [Separator("A component to apply fertiliser on one or more dates on every year of the simulation")]

        [Description("Type of fertiliser to apply? ")] 
        [Display(Type = DisplayType.FertiliserType)]public string FertiliserType { get; set; }

        [Description("Enter the fertilisation date as dd-mmm: ")] 
        public string FertiliserDate { get; set; } 

        [Description("Don't add fertiliser if N in top 2 layers exceeds (kg/ha) : ")]
        public double fert_criteria { get; set; }

        [Description("Amount of fertiliser to be applied each time (kg /ha)")] 
        public double Amount { get; set; }

        [Description("Depth (mm)")] public double FertiliserDepth { get; set; }

        // some vars to assist in setting dates for the experiment
        public string date1 { get; set; }
        public string date2 { get; set; }
        public string date3 { get; set; }
        public string date4 { get; set; }


        [EventSubscribe("DoManagement")]
        private void OnDoManagement(object sender, EventArgs e)
        {
            
                if (DateUtilities.DatesEqual(FertiliserDate, Clock.Today))
                {
                    double soil_N = nutrient.NH4.kgha[0] + nutrient.NO3.kgha[0] + nutrient.NH4.kgha[1] + nutrient.NO3.kgha[1];
                    if (soil_N <= fert_criteria) 
                         Fertiliser.Apply(amount: Amount, type: FertiliserType, depth: FertiliserDepth);
                    else
                        sum.WriteMessage(this, "No fertilising as top two layers have " + soil_N.ToString() + "kg/ha N", MessageType.Diagnostic);
                }
            
        }
    }
}
```
                Manager codes
                  location = Minnipa
                  TOS_index = 1
                  irrig_treat = nil
                  trial_code = MAC2015
                  N_trt =
```csharp
using Models.Soils;
using System;
using Models.Core;
using Models.PMF;
namespace Models
{
    [Serializable]
    [System.Xml.Serialization.XmlInclude(typeof(Model))]
    public class Script : Model
    {
        [Link] Clock Clock;

        [Description("location")]
        public string location { get; set; }

        [Description("Time of sowing")]
        public string TOS_index { get; set; }

        [Description("irrig_treat")]
        public string irrig_treat { get; set; }

        [Description("trial_code")]
        public string trial_code { get; set; }

        [Description("N_trt")]
        public string N_trt { get; set; }

        [EventSubscribe("StartOfSimulation")]
        private void OnSimulationCommencing(object sender, EventArgs e)
        {
            /*
                location = '[location]' !'Condobolin'
irrig_treat = '[irrig_treat]' ! 'dry'
trial_code = '[trial_code]' ! 'CSTB16COND2'
minn_tot = 0
TOS_index = [TOS_index] !'1'
 dens_trt = 45
exp = '3'
            */
        }
    }
}
```
                Manager HarvestAfterDate
                  HarvestDate = 20-Oct
                  script: same as in Validation.Growth Experiments.Kojonup.Kojonup2013.Kojonup2013Base.paddock.HarvestAfterDate
              Fertiliser
              Manager Fertilise at sowing
                Crop = [canola]
                FertiliserType = NH4N
                Amount = 7
                FertiliserDepth = 50
                script: same as in Incomplete.OCP Agronomy.Hart_2016_Ex1b.Hart_2016_Ex1b.Hart_2016_Ex1_Base.paddock.Fertilise at sowing
              Irrigation
              SurfaceOrganicMatter: InitialResidueName=wheat; InitialResidueType=wheat; InitialResidueMass=6000; InitialStandingFraction=0; InitialCPR=0; InitialCNR=80
              Plant canola: ResourceName=Canola
              Soil: SoilType=SNSW; Site=Minnipa; NearestTown=Minnipa; Region=West Coast; State=South Australia; Country=Australia; ApsoilNumber=909; Latitude=-32.831; Longitude=135.146; LocationAccuracy=Regional soil type; DataSource=Collected by Brett Cocks (CES) for NVT.
                Physical: same as Incomplete.OCP Agronomy.Minnipa_2014_Ex1.Minnipa_2014_Ex1.Minnipa_OCP_2014.paddock.soil.Physical
                WaterBalance SoilWater: SummerDate=1-Nov; SummerU=6; SummerCona=3.5; WinterDate=1-Apr; WinterU=2; WinterCona=2; DiffusConst=88; DiffusSlope=35; Salb=0.13; CN2Bare=73; CNRed=20; CNCov=0.8; PSIDul=-100; Thickness=[150, 150, 300, 300, 300]; SWCON=[0.5, 0.5, 0.5, 0.5, 0.5]
                Organic: same as Incomplete.OCP Agronomy.Minnipa_2014_Ex1.Minnipa_2014_Ex1.Minnipa_OCP_2014.paddock.soil.Organic
                Chemical: PHUnits=Water
                  Thickness  PH   EC
                  150        8.3  0.2
                  150        8.6  0.1
                  300        8.9  0.1
                  300        8.9  0.3
                  300        8.9  0.6
                Water: Thickness=[100, 200, 200, 200, 200, 300]; InitialValues=[0.136, 0.119, 0.126, 0.16, 0.153, 0.161]; FilledFromTop=false
                Nutrient
                Solute NO3: Thickness=[150, 150, 300, 300, 300]; InitialValues=[5.0667, 3.6, 1.1333, 1, 2]; InitialValuesUnits=ppm; WaterTableConcentration=0; D0=0; DepthConstant=0; MaxDepthSoluteAccessible=0; RunoffEffectivenessAtMovingSolute=0; MaxEffectiveRunoff=0
                Solute NH4: Thickness=[150, 150, 300, 300, 300]; InitialValues=[1.2, 1.4, 0.6667, 0, 0]; InitialValuesUnits=ppm; WaterTableConcentration=0; D0=0; DepthConstant=0; MaxDepthSoluteAccessible=0; RunoffEffectivenessAtMovingSolute=0; MaxEffectiveRunoff=0
                Solute Urea: same as Incomplete.OCP Agronomy.Minnipa_2014_Ex1.Minnipa_2014_Ex1.Minnipa_OCP_2014.paddock.soil.Urea
                SoilTemperature Temperature
              MicroClimate: a_interception=0; b_interception=1; c_interception=0; d_interception=0; SoilHeatFluxFraction=0; MinimumHeightDiffForNewLayer=0; NightInterceptionFraction=0; ReferenceHeight=2
              Report DailyReport: same as Incomplete.OCP Agronomy.AlmaPark_2015_Ex2a.AlmaPark_2015_Ex2a.AlmaPark2015_Ex2a_base.paddock.DailyReport
              Report HarvestReport
              Report DailyBiomass: same as Incomplete.DP Agronomy.WaggaCR2008.WaggaWagga2008CR.Paddock.DailyBiomass
              Report SowingReport: EventNames=[Canola].Sowing
                VariableNames:
                  [Clock].Today
                  [Canola].SowingData.Cultivar
                  [IWeather].Latitude
                  [IWeather].Longitude
      Folder Minnipa_2016_Ex3
        Experiment Minnipa_2016_Ex3
          Factors
            Permutation
              Factor TOS_index
                CompositeFactor 1: Specifications=[Sowing].Script.SowDate = 22-Apr
                CompositeFactor 2: Specifications=[Sowing].Script.SowDate = 11-May
              Factor Cv: Specification=[Sowing].Script.CultivarName = ATR_Stingray
              Factor Popn: Specification=[Sowing].Script.Population =  45
              Factor Fert
                CompositeFactor nil_n: Specifications=[Fertilise at sowing].Script.Amount = 0
                CompositeFactor AllN_at_Sow: Specifications=[Fertilise at sowing].Script.Amount = 185
                CompositeFactor AllN_PE
                  Specifications:
                    [Fertilise].Script.FertiliserDate = 1-Jun
                    [Fertilise].Script.Amount = 185
                CompositeFactor AllN_Bolt
                  Specifications:
                    [Fertilise].Script.FertiliserDate = 15-Jun
                    [Fertilise].Script.Amount = 185
                CompositeFactor Seed_and_PE
                  Specifications:
                    [Fertilise at sowing].Script.Amount = 92.5
                    [Fertilise].Script.FertiliserDate = 1-Jun
                    [Fertilise].Script.Amount = 92.5
                CompositeFactor Seed_and_Bolt
                  Specifications:
                    [Fertilise at sowing].Script.Amount = 92.5
                    [Fertilise].Script.FertiliserDate = 15-Jun
                    [Fertilise].Script.Amount = 92.5
                CompositeFactor PE_and_Bolt
                  Specifications:
                    [FertiliseMany].Script.Amount = 92.5,92.5
                    [FertiliseMany].Script.FertiliserDates = 1-Jun,15-Jun
              Factor Irrig: Specification=[codes].Script.irrig_treat = Fx,Br
          Simulation Minnipa_OCP_2016_Ex3_TOS1_NilN
            Clock: Start=2016-03-01; End=2016-12-01
            Summary summaryfile
            Weather: FileName=met/18052_CombGSE.met
            SoilArbitrator
            Zone paddock: Area=1; Slope=0; AspectAngle=0; Altitude=50
              Folder manager
                Manager Reset on date
                  ResetDate = 23-Mar
                  ResetWater = Yes
                  ResetN = No
                  ResetSOM = No
                  script: same as in Incomplete.OCP Agronomy.Hart_2014_Ex1.Hart_2014_Ex1.Hart_OCP_2014.paddock.manager.Reset on date
                Manager Sowing: same as Incomplete.OCP Agronomy.Hart_2016_Ex1b.Hart_2016_Ex1b.Hart_2016_Ex1_Base.paddock.manager.Sowing
                Manager Fertilise
                  FertiliserType = UreaN
                  FertiliserDate = 6-Dec
                  fert_criteria = 1000
                  Amount = 0
                  FertiliserDepth = 0
                  script: same as in Incomplete.OCP Agronomy.Minnipa_2015_Ex3.Minnipa_2015_Ex3.Minnipa_OCP_2015_Ex3.paddock.manager.Fertilise
                Manager FertiliseMany
                  FertiliserType = UreaGranular
                  FertiliserDates = 27-Jun, 1-Jul, 1-Aug
                  fert_criteria = 1000
                  Amount = 0, 0, 0
                  script: same as in Incomplete.OCP Agronomy.Hart_2017_Ex1b.Hart_2017_Ex1b.Hart_OCP_2017_Ex1b.paddock.manager.FertiliseMany
                Manager codes
                  location = Minnipa
                  TOS_index = 1
                  fert_treat =
                  irrig_treat = Fx
                  trial_code = MACRM16
                  fert_code = Nil_N
                  script: same as in Incomplete.OCP Agronomy.Downside_2016_Ex1b.Downside_2016_Ex1b.Downside_OCP_2016_Ex1b.paddock.manager.codes
                Manager HarvestAfterDate
                  HarvestDate = 4-Nov
                  script: same as in Validation.Growth Experiments.Kojonup.Kojonup2013.Kojonup2013Base.paddock.HarvestAfterDate
              Fertiliser
              Manager Fertilise at sowing
                Crop = [canola]
                FertiliserType = UreaN
                Amount = 0
                FertiliserDepth = 0
                script: same as in Incomplete.OCP Agronomy.Hart_2016_Ex1b.Hart_2016_Ex1b.Hart_2016_Ex1_Base.paddock.Fertilise at sowing
              Irrigation
              SurfaceOrganicMatter: InitialResidueName=wheat; InitialResidueType=wheat; InitialResidueMass=6000; InitialStandingFraction=0; InitialCPR=0; InitialCNR=80
              Plant canola: ResourceName=Canola
              Soil: SoilType=SNSW; Site=Minnipa; NearestTown=Minnipa; Region=West Coast; State=South Australia; Country=Australia; ApsoilNumber=909; Latitude=-32.831; Longitude=135.146; LocationAccuracy=Regional soil type; DataSource=Collected by Brett Cocks (CES) for NVT.
                Physical: same as Incomplete.OCP Agronomy.Minnipa_2014_Ex1.Minnipa_2014_Ex1.Minnipa_OCP_2014.paddock.soil.Physical
                WaterBalance SoilWater: same as Incomplete.OCP Agronomy.Minnipa_2014_Ex1.Minnipa_2014_Ex1.Minnipa_OCP_2014.paddock.soil.SoilWater
                Organic: same as Incomplete.OCP Agronomy.Minnipa_2014_Ex1.Minnipa_2014_Ex1.Minnipa_OCP_2014.paddock.soil.Organic
                Chemical: PHUnits=Water
                  Thickness  PH   EC
                  150        8.3  0.2
                  150        8.6  0.1
                  300        8.9  0.1
                  300        8.9  0.3
                  300        8.9  0.6
                Water: Thickness=[150, 150, 300, 300, 300]; InitialValues=[0.08, 0.1, 0.12, 0.12, 0.12]; FilledFromTop=false
                Nutrient
                Solute NO3: same as Incomplete.OCP Agronomy.Minnipa_2014_Ex1.Minnipa_2014_Ex1.Minnipa_OCP_2014.paddock.soil.NO3
                Solute NH4: Thickness=[150, 150, 300, 300, 300]; InitialValues=[2.4384, 1.0983, 0, 0, 0]; InitialValuesUnits=ppm; WaterTableConcentration=0; D0=0; DepthConstant=0; MaxDepthSoluteAccessible=0; RunoffEffectivenessAtMovingSolute=0; MaxEffectiveRunoff=0
                Solute Urea: same as Incomplete.OCP Agronomy.Minnipa_2014_Ex1.Minnipa_2014_Ex1.Minnipa_OCP_2014.paddock.soil.Urea
                SoilTemperature Temperature
              MicroClimate: a_interception=0; b_interception=1; c_interception=0; d_interception=0; SoilHeatFluxFraction=0; MinimumHeightDiffForNewLayer=0; NightInterceptionFraction=0; ReferenceHeight=2
              Report DailyReport: same as Incomplete.OCP Agronomy.AlmaPark_2015_Ex2a.AlmaPark_2015_Ex2a.AlmaPark2015_Ex2a_base.paddock.DailyReport
              Report HarvestReport
              Report DailyBiomass: same as Incomplete.DP Agronomy.WaggaCR2008.WaggaWagga2008CR.Paddock.DailyBiomass
              Report SowingReport: EventNames=[Canola].Sowing
                VariableNames:
                  [Clock].Today
                  [Canola].SowingData.Cultivar
                  [IWeather].Latitude
                  [IWeather].Longitude
      Folder Minnipa_2017_ExA
        Experiment Minnipa_2017_ExA
          Factors
            Permutation
              Factor TOS_index
                CompositeFactor 1: Specifications=[Sowing].Script.SowDate = 30-May
              Factor Cv: Specification=[Sowing].Script.CultivarName = ATR_Stingray
              Factor Popn: Specification=[Sowing].Script.Population =  45
              Factor Fert: Specification=[codes].Script.fert_treat = Field_Pea,Medic,Wheat
              Factor Irrig: Specification=[codes].Script.irrig_treat = nil
              Memo Question
                No idea how this fert was implemented
          Simulation Minnipa_OCP_2017_wheat
            Clock: Start=2017-03-01; End=2017-12-31
            Summary summaryfile
            Weather: FileName=met/18052_CombGSE.met
            SoilArbitrator
            Zone paddock: Area=1; Slope=0; AspectAngle=0; Altitude=50
              Folder manager
                Manager Reset on date
                  ResetDate = 27-Apr
                  ResetWater = Yes
                  ResetN = No
                  ResetSOM = No
                  script: same as in Incomplete.OCP Agronomy.Hart_2014_Ex1.Hart_2014_Ex1.Hart_OCP_2014.paddock.manager.Reset on date
                Manager Sowing: same as Incomplete.OCP Agronomy.Hart_2016_Ex1b.Hart_2016_Ex1b.Hart_2016_Ex1_Base.paddock.manager.Sowing
                Manager codes
                  location = Minnipa
                  TOS_index = 1
                  fert_treat =
                  irrig_treat = nil
                  trial_code = Minnipa_2017
                  fert_code = Wheat
                  script: same as in Incomplete.OCP Agronomy.Downside_2016_Ex1b.Downside_2016_Ex1b.Downside_OCP_2016_Ex1b.paddock.manager.codes
                Manager HarvestAfterDate
                  HarvestDate = 23-Oct
                  script: same as in Validation.Growth Experiments.Kojonup.Kojonup2013.Kojonup2013Base.paddock.HarvestAfterDate
              Fertiliser
              Manager Fertilise at sowing: same as Incomplete.OCP Agronomy.Minnipa_2015_Ex3.Minnipa_2015_Ex3.Minnipa_OCP_2015_Ex3.paddock.Fertilise at sowing
              Irrigation
              SurfaceOrganicMatter: InitialResidueName=wheat; InitialResidueType=wheat; InitialResidueMass=6000; InitialStandingFraction=0; InitialCPR=0; InitialCNR=80
              Plant canola: ResourceName=Canola
              Soil: SoilType=SNSW; Site=Minnipa; NearestTown=Minnipa; Region=West Coast; State=South Australia; Country=Australia; ApsoilNumber=909; Latitude=-32.831; Longitude=135.146; LocationAccuracy=Regional soil type; DataSource=Collected by Brett Cocks (CES) for NVT.
                Physical: same as Incomplete.OCP Agronomy.Minnipa_2014_Ex1.Minnipa_2014_Ex1.Minnipa_OCP_2014.paddock.soil.Physical
                WaterBalance SoilWater: same as Incomplete.OCP Agronomy.Minnipa_2015_Ex3.Minnipa_2015_Ex3.Minnipa_OCP_2015_Ex3.paddock.soil.SoilWater
                Organic: same as Incomplete.OCP Agronomy.Minnipa_2014_Ex1.Minnipa_2014_Ex1.Minnipa_OCP_2014.paddock.soil.Organic
                Chemical: PHUnits=Water
                  Thickness  PH   EC
                  150        8.3  0.2
                  150        8.6  0.1
                  300        8.9  0.1
                  300        8.9  0.3
                  300        8.9  0.6
                Water: Thickness=[100, 200, 300, 300, 100, 200]; InitialValues=[0.0287, 0.0813, 0.1183, 0.1354, 0.1334, 0.1334]; FilledFromTop=false
                Nutrient
                Solute NO3: Thickness=[150, 150, 300, 300, 300]; InitialValues=[15.1153, 6.4284, 11.2281, 8.6849, 4.0323]; InitialValuesUnits=ppm; WaterTableConcentration=0; D0=0; DepthConstant=0; MaxDepthSoluteAccessible=0; RunoffEffectivenessAtMovingSolute=0; MaxEffectiveRunoff=0
                Solute NH4: Thickness=[150, 150, 300, 300, 300]; InitialValues=[1.4412, 1.3975, 0.2699, 2.7295, 0.6667]; InitialValuesUnits=ppm; WaterTableConcentration=0; D0=0; DepthConstant=0; MaxDepthSoluteAccessible=0; RunoffEffectivenessAtMovingSolute=0; MaxEffectiveRunoff=0
                Solute Urea: same as Incomplete.OCP Agronomy.Minnipa_2014_Ex1.Minnipa_2014_Ex1.Minnipa_OCP_2014.paddock.soil.Urea
                SoilTemperature Temperature
              MicroClimate: a_interception=0; b_interception=1; c_interception=0; d_interception=0; SoilHeatFluxFraction=0; MinimumHeightDiffForNewLayer=0; NightInterceptionFraction=0; ReferenceHeight=2
              Report DailyReport: same as Incomplete.OCP Agronomy.AlmaPark_2015_Ex2a.AlmaPark_2015_Ex2a.AlmaPark2015_Ex2a_base.paddock.DailyReport
              Report HarvestReport
              Report DailyBiomass: same as Incomplete.DP Agronomy.WaggaCR2008.WaggaWagga2008CR.Paddock.DailyBiomass
              Report SowingReport: EventNames=[Canola].Sowing
                VariableNames:
                  [Clock].Today
                  [Canola].SowingData.Cultivar
                  [IWeather].Latitude
                  [IWeather].Longitude
      Folder Pampas_2016_Exp
        Experiment Pampas_2016_Exp
          Factors
            Permutation
              Factor TOS_index
                CompositeFactor 2: Specifications=[Sowing].Script.SowDate = 29-Apr
                CompositeFactor 3: Specifications=[Sowing].Script.SowDate = 13-May
              Factor Cv
                Specification=[Sowing].Script.CultivarName = 43C80_CL,44Y89_CL,45Y86_CL,45Y88_CL,Archer,Hyola575_CL
              Factor Popn: Specification=[Sowing].Script.Population =  45
              Factor Fert: Specification=[codes].Script.fert_treat = nil
              Factor Irrig: Specification=[codes].Script.irrig_treat = nil
          Simulation Pampas_OCP_2016
            Clock: Start=2016-03-28; End=2016-12-31
            Summary summaryfile
            Weather: FileName=met/41250_CombGSE.met
            SoilArbitrator
            MicroClimate: a_interception=0; b_interception=1; c_interception=0; d_interception=0; SoilHeatFluxFraction=0; MinimumHeightDiffForNewLayer=0; NightInterceptionFraction=0; ReferenceHeight=2
            Zone paddock: Area=1; Slope=0; AspectAngle=0; Altitude=50
              Folder manager
                Manager Reset on date
                  ResetDate = 29-Apr
                  ResetWater = Yes
                  ResetN = Yes
                  ResetSOM = No
                  script: same as in Incomplete.OCP Agronomy.Hart_2014_Ex1.Hart_2014_Ex1.Hart_OCP_2014.paddock.manager.Reset on date
                Manager Sowing: same as Incomplete.OCP Agronomy.Hart_2016_Ex1b.Hart_2016_Ex1b.Hart_2016_Ex1_Base.paddock.manager.Sowing
                Manager codes
                  location = Pampas
                  TOS_index = 1
                  fert_treat =
                  irrig_treat = nil
                  trial_code = Pampas_2016_10018
                  script: same as in Incomplete.OCP Agronomy.Condo_2015_Ex1a.Condo_2015_Ex1a.condo_OCP_2015_Ex1a.paddock.manager.codes
                Manager HarvestAfterDate
                  HarvestDate = 27-Oct
                  script: same as in Validation.Growth Experiments.Kojonup.Kojonup2013.Kojonup2013Base.paddock.HarvestAfterDate
              Fertiliser
              Irrigation
              SurfaceOrganicMatter: InitialResidueName=wheat; InitialResidueType=wheat; InitialResidueMass=6000; InitialStandingFraction=0; InitialCPR=0; InitialCNR=80
              Plant canola: ResourceName=Canola
              Soil Anchorfield_006: ASCOrder=Vertosol; ASCSubOrder=Black; SoilType=Clay; Site=Brookstead; NearestTown=Brookstead, Q 4352; Region=Darling Downs and Granite Belt; State=Queensland; Country=Australia; NaturalVegetation=Queensland bluegrass; ApsoilNumber=6; Latitude=-27.733; Longitude=151.333; LocationAccuracy=+/- 20m; DataSource=CSIRO Sustainable Ecosystems, Toowoomba
                Physical
                  Thickness  BD    AirDry  LL15  DUL   SAT
                  150        1.05  0.08    0.25  0.52  0.57
                  150        1.16  0.08    0.24  0.48  0.53
                  300        1.19  0.09    0.27  0.47  0.52
                  300        1.18  0.09    0.27  0.47  0.52
                  300        1.24  0.1     0.3   0.45  0.5
                  300        1.31  0.103   0.31  0.42  0.47
                  300        1.35  0.12    0.36  0.41  0.46
                  SoilCrop BarleySoil: LL=[0.25, 0.24, 0.27, 0.27, 0.3, 0.31, 0.36]; KL=[0.07, 0.07, 0.07, 0.05, 0.05, 0.03, 0.02]; XF=[1, 1, 1, 1, 1, 1, 1]
                  SoilCrop CanolaSoil: LL=[0.25, 0.24, 0.27, 0.27, 0.3, 0.31, 0.36]; KL=[0.06, 0.06, 0.06, 0.04, 0.04, 0.02, 0.01]; XF=[1, 1, 1, 1, 1, 1, 1]
                  SoilCrop ChickpeaSoil: LL=[0.25, 0.24, 0.27, 0.27, 0.3, 0.31, 0.36]; KL=[0.06, 0.06, 0.06, 0.06, 0.06, 0.06, 0.06]; XF=[1, 1, 1, 1, 1, 1, 1]
                  SoilCrop CottonSoil: LL=[0.25, 0.27, 0.31, 0.31, 0.31, 0.31, 0.31]; KL=[0.1, 0.1, 0.1, 0.1, 0.09, 0.07, 0.05]; XF=[1, 1, 1, 1, 1, 1, 1]
                    LL source: Field measured and checked for sensibility
                  SoilCrop FababeanSoil: LL=[0.25, 0.24, 0.27, 0.27, 0.3, 0.31, 0.36]; KL=[0.06, 0.06, 0.06, 0.06, 0.06, 0.06, 0.06]; XF=[1, 1, 1, 1, 1, 1, 1]
                  SoilCrop FieldpeaSoil: LL=[0.25, 0.24, 0.27, 0.27, 0.3, 0.31, 0.36]; KL=[0.06, 0.06, 0.06, 0.06, 0.06, 0.06, 0.06]; XF=[1, 1, 1, 1, 1, 1, 1]
                  SoilCrop SorghumSoil: LL=[0.25, 0.27, 0.33, 0.32, 0.33, 0.34, 0.36]; KL=[0.07, 0.07, 0.07, 0.05, 0.05, 0.04, 0.03]; XF=[1, 1, 1, 1, 1, 1, 1]
                    LL source: Field measured and checked for sensibility
                  SoilCrop WheatSoil: LL=[0.25, 0.24, 0.27, 0.27, 0.3, 0.31, 0.36]; KL=[0.06, 0.06, 0.06, 0.04, 0.04, 0.02, 0.01]; XF=[1, 1, 1, 1, 1, 1, 1]
                WaterBalance SoilWater: same as Incomplete.OCP Agronomy.Breeza_2014_Ex1.Breeza_2014_Ex1.Breeza_2014_Ex1_Base.paddock.Grey-Black Vertosol (Breeza No123).SoilWater
                Organic: FOMCNRatio=40; CarbonUnits=Total
                  Thickness  Carbon  SoilCNRatio  FBiom  FInert  FOM
                  150        1.742   12           0.04   0.4     347.129
                  150        1.092   12           0.02   0.6     270.3444
                  300        0.45    12           0.02   0.8     163.9721
                  300        0.3     12           0.02   1       99.4541
                  300        0.2     12           0.01   1       60.322
                  300        0.16    12           0.01   1       36.5871
                  300        0.17    12           0.01   1       22.1912
                Chemical: Thickness=[150, 150, 300, 300, 300, 300, 300]; PH=[6.32, 6.385, 6.575, 7.22, 7.505, 7.725, 7.685]; PHUnits=Water
                  PH source: Estimated based on local knowledge
                Water: Thickness=[100, 200, 300, 300, 300, 300, 300]; InitialValues=[0.26, 0.427, 0.419, 0.349, 0.332, 0.357, 0.39]; FilledFromTop=false
                Nutrient
                Solute NO3: Thickness=[150, 150, 300, 300, 300, 300, 300]; InitialValues=[22.6833, 19.85, 16.9, 16.2, 14.95, 9.95, 3.2]; InitialValuesUnits=ppm; WaterTableConcentration=0; D0=0; DepthConstant=0; MaxDepthSoluteAccessible=0; RunoffEffectivenessAtMovingSolute=0; MaxEffectiveRunoff=0
                Solute NH4: Thickness=[150, 150, 300, 300, 300, 300, 300]; InitialValues=[2.0833, 1.25, 1.25, 1, 1, 0, 0]; InitialValuesUnits=ppm; WaterTableConcentration=0; D0=0; DepthConstant=0; MaxDepthSoluteAccessible=0; RunoffEffectivenessAtMovingSolute=0; MaxEffectiveRunoff=0
                Solute Urea: same as Validation.Phenology Experiments.OCP Phenology.Gatton2015.Gatton2015Base.Paddock.soil.Urea
                SoilTemperature Temperature
              Report DailyReport: same as Incomplete.OCP Agronomy.AlmaPark_2015_Ex2a.AlmaPark_2015_Ex2a.AlmaPark2015_Ex2a_base.paddock.DailyReport
              Report HarvestReport
              Report DailyBiomass: same as Incomplete.DP Agronomy.WaggaCR2008.WaggaWagga2008CR.Paddock.DailyBiomass
              Report SowingReport: EventNames=[Canola].Sowing
                VariableNames:
                  [Clock].Today
                  [Canola].SowingData.Cultivar
                  [IWeather].Latitude
                  [IWeather].Longitude
      Folder Tamworth_2015_Ex2a
        Experiment Tamworth_2015_Ex2a
          Factors
            Permutation
              Factor TOS_index
                CompositeFactor 1
                  Specifications:
                    [Sowing].Script.SowDate = 13-Apr
                    [FertiliseMany].Script.FertiliserDates = 13-Apr,1-Jul
                CompositeFactor 2
                  Specifications:
                    [Sowing].Script.SowDate = 14-May
                    [FertiliseMany].Script.FertiliserDates = 14-May,1-Jul
              Factor Cv: Specification=[Sowing].Script.CultivarName = 45Y88_CL,Hyola575_CL
              Factor Popn: Specification=[Sowing].Script.Population =  15,45
              Factor Fert
                CompositeFactor split: Specifications=[FertiliseMany].Script.Amount = 35,139
                CompositeFactor UpFront: Specifications=[Fertilise at sowing1].Script.Amount = 174
              Factor Irrig: Specification=[codes].Script.irrig_treat = nil
          Simulation Tamworth_OCP_2015_Ex2a
            Clock: Start=2015-03-01; End=2015-12-01
            Summary summaryfile
            Weather: FileName=met/55325_CombGSE.met
            SoilArbitrator
            Zone paddock: Area=1; Slope=0; AspectAngle=0; Altitude=50
              Folder manager
                Manager Reset on date
                  ResetDate = 1-Apr
                  ResetWater = Yes
                  ResetN = Yes
                  ResetSOM = No
                  script: same as in Incomplete.OCP Agronomy.Hart_2014_Ex1.Hart_2014_Ex1.Hart_OCP_2014.paddock.manager.Reset on date
                Manager Sowing: same as Incomplete.OCP Agronomy.Hart_2016_Ex1b.Hart_2016_Ex1b.Hart_2016_Ex1_Base.paddock.manager.Sowing
                Manager FertiliseMany
                  FertiliserType = UreaGranular
                  FertiliserDates = 14-May, 1-Jul
                  fert_criteria = 1000
                  Amount = 0, 0
                  FertiliserDepths = 50, 0
```csharp
using Models.Soils.Nutrients;
using System;
using Models.Soils;
using Models.Core;
using Models.PMF;
using APSIM.Shared.Utilities;
namespace Models
{
    [Serializable]
    public class Script : Model
    {
        [Link] Clock Clock;
        [Link] Fertiliser Fertiliser;
        [Link] INutrient nutrient;
        [Link] Summary sum;
        
        [Separator("A component to apply fertiliser on one or more dates on every year of the simulation")]

        [Description("Type of fertiliser to apply? ")] 
        [Display(Type = DisplayType.FertiliserType)]public string FertiliserType { get; set; }

        [Description("Enter the two fertilisation dates as dd-mmm with comma separation: ")] 
        public string[] FertiliserDates { get; set; } 

        [Description("Don't add fertiliser if N in top 2 layers exceeds (kg/ha) : ")]
        public double fert_criteria { get; set; }

        [Description("Amounts of fertiliser to be applied (comma separated) (kg /ha)")] 
        public double[] Amount { get; set; }

        [Description("Depths (comma separated) (mm)")] 
        public double[] FertiliserDepths { get; set; }

        [EventSubscribe("DoManagement")]
        private void OnDoManagement(object sender, EventArgs e)
        {
            for (int i = 0; i < FertiliserDates.Length; i++)
            {
                string ddMMM = FertiliserDates[i];
                if (DateUtilities.DatesEqual(ddMMM, Clock.Today))
                {
                    double soil_N = nutrient.NH4.kgha[0] + nutrient.NO3.kgha[0] + nutrient.NH4.kgha[1] + nutrient.NO3.kgha[1];
                    if (soil_N <= fert_criteria) 
                         Fertiliser.Apply(amount: Amount[i], type: FertiliserType, depth: FertiliserDepths[i]);
                    else
                        sum.WriteMessage(this, "No fertilising as top two layers have " + soil_N.ToString() + "kg/ha N", MessageType.Diagnostic);
                }
            }
        }
    }
}
```
                Manager codes
                  location = Tamworth
                  TOS_index = 1
                  irrig_treat = nil
                  trial_code = CSTB15TAMW2
```csharp
using Models.Soils;
using System;
using Models.Core;
using Models.PMF;
namespace Models
{
    [Serializable]
    [System.Xml.Serialization.XmlInclude(typeof(Model))]
    public class Script : Model
    {
        [Link] Clock Clock;

        [Description("location")]
        public string location { get; set; }

        [Description("Time of sowing")]
        public string TOS_index { get; set; }

        [Description("irrig_treat")]
        public string irrig_treat { get; set; }

        [Description("trial_code")]
        public string trial_code { get; set; }

        [EventSubscribe("StartOfSimulation")]
        private void OnSimulationCommencing(object sender, EventArgs e)
        {
            /*
                location = '[location]' !'Condobolin'
irrig_treat = '[irrig_treat]' ! 'dry'
trial_code = '[trial_code]' ! 'CSTB16COND2'
minn_tot = 0
TOS_index = [TOS_index] !'1'
! dens_trt = 45
exp = '2a'
            */
        }
    }
}
```
                Manager HarvestAfterDate
                  HarvestDate = 19-Oct
                  script: same as in Validation.Growth Experiments.Kojonup.Kojonup2013.Kojonup2013Base.paddock.HarvestAfterDate
              Fertiliser
              Manager Fertilise at sowing: same as Incomplete.OCP Agronomy.Longerenong_2017_Ex1a.Longerenong_2017_Ex1a.Longerenong_OCP_2016_Ex1b.paddock.Fertilise at sowing
              Manager Fertilise at sowing1
                Crop = [canola]
                FertiliserType = UreaGranular
                Amount = 0
                FertiliserDepth = 50
                script: same as in Incomplete.OCP Agronomy.Hart_2016_Ex1b.Hart_2016_Ex1b.Hart_2016_Ex1_Base.paddock.Fertilise at sowing
              Irrigation
              SurfaceOrganicMatter: InitialResidueName=wheat; InitialResidueType=wheat; InitialResidueMass=6000; InitialStandingFraction=0; InitialCPR=0; InitialCNR=80
              Plant canola: ResourceName=Canola
              Soil Black Vertosol: ASCOrder=Vertosol; SoilType=SNSW; Site=Kelvin; NearestTown=Kelvin; Region=North West Slopes and Plains; State=New South Wales; Country=Australia; ApsoilNumber=1174; Latitude=-30.847; Longitude=150.3689; LocationAccuracy=+/- 20m; Comments=Chickpea, wheat and sorghum CLL determined to 150 cm depth
                DataSource=Collected by Brett Cocks CSIRO Agriculture Toowoomba. Bill Manning and George Truman NSW North West Local Land Services Gunnedah NSW. For GRDC project Measureing and manageing soil water in Australian Agriculture.
                Physical
                  Thickness  ParticleSizeSand  ParticleSizeSilt  ParticleSizeClay  BD      AirDry  LL15  DUL   SAT
                  100        27.92             30.39             41.69             1.2419  0.0916  0.14  0.3   0.45
                  200        13.71             26.12             60.17             1.4     0.1     0.25  0.36  0.45
                  300        24.77             27.04             48.19             1.5     0.1     0.26  0.38  0.434
                  300        11.34             21.23             67.44             1.6     0.15    0.26  0.37  0.396
                  300        10.99             32.41             56.61             1.6     0.15    0.25  0.36  0.396
                  300        14.2              19.52             66.28             1.6     0.15    0.24  0.36  0.396
                  300        11.17             34.36             54.47             1.6     0.15    0.23  0.35  0.396
                  SoilCrop CanolaSoil: LL=[0.14, 0.25, 0.26, 0.26, 0.25, 0.24, 0.23]; KL=[0.06, 0.06, 0.06, 0.04, 0.04, 0.02, 0.01]; XF=[1, 1, 1, 1, 1, 1, 0]
                WaterBalance SoilWater: SummerDate=1-Nov; SummerU=6; SummerCona=3.5; WinterDate=1-Apr; WinterU=2; WinterCona=2; DiffusConst=40; DiffusSlope=16; Salb=0.12; CN2Bare=73; CNRed=20; CNCov=0.8; PSIDul=-100; Thickness=[100, 200, 300, 300, 300, 300, 300]; SWCON=[0.3, 0.3, 0.3, 0.3, 0.3, 0.3, 0.3]
                Organic: FOMCNRatio=40; CarbonUnits=Total
                  Thickness  Carbon  SoilCNRatio  FBiom  FInert  FOM
                  100        1.157   12           0.04   0.4     366.2474
                  200        0.949   12           0.02   0.5     262.4277
                  300        0.897   12           0.02   0.7     159.1705
                  300        0.806   12           0.02   1       96.5418
                  300        0.65    12           0.01   1       58.5555
                  300        0.364   12           0.01   1       35.5157
                  300        0.208   12           0.01   1       21.5414
                Chemical: PHUnits=Water
                  Thickness  PH   EC     ESP
                  100        7.7  0.36   0.7599
                  200        7.8  0.234  1.538
                  300        8.1  0.253  3.136
                  300        8.3  0.322  6.682
                  300        8.7  0.36   9.7285
                  300        8.9  0.36   11.8429
                  300        8.9  0.396  12.8193
                  EC, CL, PH source: Measured
                  ESP source: C
                Water: Thickness=[100, 200, 300, 300, 300, 300, 300]; InitialValues=[0.166, 0.308, 0.292, 0.288, 0.29, 0.232, 0.232]; FilledFromTop=false
                Nutrient
                Solute NO3: Thickness=[100, 200, 300, 300, 300, 300, 300]; InitialValues=[12, 4, 5, 4, 4, 3, 1]; InitialValuesUnits=ppm; WaterTableConcentration=0; D0=0; DepthConstant=0; MaxDepthSoluteAccessible=0; RunoffEffectivenessAtMovingSolute=0; MaxEffectiveRunoff=0
                Solute NH4: Thickness=[100, 200, 300, 300, 300, 300, 300]; InitialValues=[3, 3, 2, 2, 2, 2, 1]; InitialValuesUnits=ppm; WaterTableConcentration=0; D0=0; DepthConstant=0; MaxDepthSoluteAccessible=0; RunoffEffectivenessAtMovingSolute=0; MaxEffectiveRunoff=0
                Solute Urea: same as Incomplete.Northern NSW and WA.RomaRS.RomaRS98_monty.Paddock.soil.Urea
                SoilTemperature Temperature
              MicroClimate: a_interception=0; b_interception=1; c_interception=0; d_interception=0; SoilHeatFluxFraction=0; MinimumHeightDiffForNewLayer=0; NightInterceptionFraction=0; ReferenceHeight=2
              Report DailyReport: same as Incomplete.OCP Agronomy.AlmaPark_2015_Ex2a.AlmaPark_2015_Ex2a.AlmaPark2015_Ex2a_base.paddock.DailyReport
              Report HarvestReport
              Report DailyBiomass: same as Incomplete.DP Agronomy.WaggaCR2008.WaggaWagga2008CR.Paddock.DailyBiomass
              Report SowingReport: EventNames=[Canola].Sowing
                VariableNames:
                  [Clock].Today
                  [Canola].SowingData.Cultivar
                  [IWeather].Latitude
                  [IWeather].Longitude
      Folder Tamworth_2017_Ex1a
        Experiment Tamworth_2017_Ex1a
          Factors
            Permutation
              Factor TOS_index
                CompositeFactor 1: Specifications=[Sowing].Script.SowDate = 12-Apr
                CompositeFactor 2: Specifications=[Sowing].Script.SowDate = 5-May
              Factor Cv
                Specification=[Sowing].Script.CultivarName = 44Y90_CL,45Y25_RR,Archer,ATR_Bonito,ATR_Stingray,ATR_Wahoo,Hyola600_RR,NS_Diamond
              Factor Popn: Specification=[Sowing].Script.Population =  45
              Factor Fert
                CompositeFactor D5: Specifications=[Fertilise at sowing1].Script.Amount = 100
                CompositeFactor D9
                  Specifications:
                    [Fertilise at sowing1].Script.Amount = 200
                    [FertiliseMany].Script.FertiliserDates = 27-Jun,14-Jul
                    [FertiliseMany].Script.Amount = 80,80
              Factor Irrig: Specification=[codes].Script.irrig_treat = nil
          Simulation Tamworth_OCP_2017_Ex1a
            Clock: Start=2017-03-01; End=2017-12-01
            Summary summaryfile
            Weather: FileName=met/55325_CombGSE.met
            SoilArbitrator
            Zone paddock: Area=1; Slope=0; AspectAngle=0; Altitude=50
              Folder manager
                Manager Reset on date
                  ResetDate = 11-Apr
                  ResetWater = Yes
                  ResetN = Yes
                  ResetSOM = No
                  script: same as in Incomplete.OCP Agronomy.Hart_2014_Ex1.Hart_2014_Ex1.Hart_OCP_2014.paddock.manager.Reset on date
                Manager Sowing: same as Incomplete.OCP Agronomy.Hart_2016_Ex1b.Hart_2016_Ex1b.Hart_2016_Ex1_Base.paddock.manager.Sowing
                Manager FertiliseMany
                  FertiliserType = UreaGranular
                  FertiliserDates = 27_jun, 14-Jul
                  fert_criteria = 1000
                  Amount = 0, 0
                  FertiliserDepths = 50, 50
                  script: same as in Incomplete.OCP Agronomy.Tamworth_2015_Ex2a.Tamworth_2015_Ex2a.Tamworth_OCP_2015_Ex2a.paddock.manager.FertiliseMany
                Manager codes
                  location = Tamworth
                  TOS_index = 1
                  irrig_treat = nil
                  trial_code = CSTB17TAMW2
                  fert_code = D5
                  script: same as in Incomplete.OCP Agronomy.Ganmain_2017_Ex1a.Ganmain_2017_Ex1a.Ganmain_OCP_2017_Ex1a.paddock.manager.codes
                Manager HarvestAfterDate: same as Incomplete.OCP Agronomy.Ganmain_2015_Ex1b.Ganmain_2015_Ex1b.Ganmain_OCP_2015_Ex1b.paddock.manager.HarvestAfterDate
              Fertiliser
              Manager Fertilise at sowing: same as Incomplete.OCP Agronomy.Longerenong_2017_Ex1a.Longerenong_2017_Ex1a.Longerenong_OCP_2016_Ex1b.paddock.Fertilise at sowing
              Manager Fertilise at sowing1: same as Incomplete.OCP Agronomy.Tamworth_2015_Ex2a.Tamworth_2015_Ex2a.Tamworth_OCP_2015_Ex2a.paddock.Fertilise at sowing1
              Irrigation
              SurfaceOrganicMatter: InitialResidueName=wheat; InitialResidueType=wheat; InitialResidueMass=6000; InitialStandingFraction=0; InitialCPR=0; InitialCNR=80
              Plant canola: ResourceName=Canola
              Soil Black Vertosol: ASCOrder=Vertosol; SoilType=SNSW; Site=Kelvin; NearestTown=Kelvin; Region=North West Slopes and Plains; State=New South Wales; Country=Australia; ApsoilNumber=1174; Latitude=-30.847; Longitude=150.3689; LocationAccuracy=+/- 20m; Comments=Chickpea, wheat and sorghum CLL determined to 150 cm depth
                DataSource=Collected by Brett Cocks CSIRO Agriculture Toowoomba. Bill Manning and George Truman NSW North West Local Land Services Gunnedah NSW. For GRDC project Measureing and manageing soil water in Australian Agriculture.
                Physical: same as Incomplete.OCP Agronomy.Tamworth_2015_Ex2a.Tamworth_2015_Ex2a.Tamworth_OCP_2015_Ex2a.paddock.Black Vertosol.Physical
                WaterBalance SoilWater: same as Incomplete.OCP Agronomy.Tamworth_2015_Ex2a.Tamworth_2015_Ex2a.Tamworth_OCP_2015_Ex2a.paddock.Black Vertosol.SoilWater
                Organic: FOMCNRatio=40; CarbonUnits=Total
                  Thickness  Carbon  SoilCNRatio  FBiom  FInert  FOM
                  100        1.729   12           0.04   0.4     366.2474
                  200        1.066   12           0.02   0.5     262.4277
                  300        0.897   12           0.02   0.7     159.1705
                  300        0.806   12           0.02   1       96.5418
                  300        0.65    12           0.01   1       58.5555
                  300        0.364   12           0.01   1       35.5157
                  300        0.208   12           0.01   1       21.5414
                Chemical: PHUnits=Water
                  Thickness  PH      EC     ESP
                  100        7.2     0.36   0.7599
                  200        7.1     0.234  1.538
                  300        7.4581  0.253  3.136
                  300        7.6392  0.322  6.682
                  300        8.0014  0.36   9.7285
                  300        8.1824  0.36   11.8429
                  300        8.1824  0.396  12.8193
                  EC, CL, PH source: Measured
                  ESP source: C
                Water: Thickness=[100, 200, 300, 300, 300, 600]; InitialValues=[0.2416, 0.3, 0.289, 0.247, 0.247, 0.247]; FilledFromTop=false
                Nutrient
                Solute NO3: Thickness=[100, 200, 300, 300, 300, 300, 300]; InitialValues=[11, 6, 2, 1, 1, 1, 1]; InitialValuesUnits=ppm; WaterTableConcentration=0; D0=0; DepthConstant=0; MaxDepthSoluteAccessible=0; RunoffEffectivenessAtMovingSolute=0; MaxEffectiveRunoff=0
                Solute NH4: Thickness=[100, 200, 300, 300, 300, 300, 300]; InitialValues=[4, 2, 3, 3, 2, 1, 1]; InitialValuesUnits=ppm; WaterTableConcentration=0; D0=0; DepthConstant=0; MaxDepthSoluteAccessible=0; RunoffEffectivenessAtMovingSolute=0; MaxEffectiveRunoff=0
                Solute Urea: same as Incomplete.Northern NSW and WA.RomaRS.RomaRS98_monty.Paddock.soil.Urea
                SoilTemperature Temperature
              MicroClimate: a_interception=0; b_interception=1; c_interception=0; d_interception=0; SoilHeatFluxFraction=0; MinimumHeightDiffForNewLayer=0; NightInterceptionFraction=0; ReferenceHeight=2
              Report DailyReport: same as Incomplete.OCP Agronomy.AlmaPark_2015_Ex2a.AlmaPark_2015_Ex2a.AlmaPark2015_Ex2a_base.paddock.DailyReport
              Report HarvestReport
              Report DailyBiomass: same as Incomplete.DP Agronomy.WaggaCR2008.WaggaWagga2008CR.Paddock.DailyBiomass
              Report SowingReport: EventNames=[Canola].Sowing
                VariableNames:
                  [Clock].Today
                  [Canola].SowingData.Cultivar
                  [IWeather].Latitude
                  [IWeather].Longitude
      Folder Tamworth_2018_Ex1a
        Experiment Tamworth_2018_Ex1a
          Factors
            Permutation
              Factor TOS_index
                CompositeFactor 1
                  Specifications:
                    [Sowing].Script.SowDate = 13-Apr
                    [Irrigate].Script.irrigDates = 1-Apr
                    [Irrigate].Script.amount = 72
                CompositeFactor 2
                  Specifications:
                    [Sowing].Script.SowDate = 7-May
                    [Irrigate].Script.irrigDates = 22-Apr
                    [Irrigate].Script.amount = 64
              Factor Cv
                Specification=[Sowing].Script.CultivarName = 44Y90_CL,45Y91_CL,Archer,ATR_Bonito,ATR_Stingray,ATR_Wahoo,NS_Diamond
              Factor Popn: Specification=[Sowing].Script.Population =  45
              Factor Fert
                CompositeFactor D3
                  Specifications:
                    [Fertilise].Script.FertiliserDates = 27-Mar
                    [Fertilise].Script.Amount = 87
                CompositeFactor D9
                  Specifications:
                    [FertiliseMany].Script.FertiliserDates = 27-Mar,2-Jul
                    [FertiliseMany].Script.Amount = 108.5,108.5
              Factor Irrig: Specification=[codes].Script.irrig_treat = nil
              Memo Cultivars
                43Y92_CL, removed because not parameters
          Simulation Tamworth_OCP_2018_Ex1a
            Clock: Start=2018-03-01; End=2018-12-01
            Summary summaryfile
            Weather: FileName=met/55054.met
            Zone paddock: Area=1; Slope=0; AspectAngle=0; Altitude=50
              Folder manager
                Manager Reset on date
                  ResetDate = 25-Mar
                  ResetWater = Yes
                  ResetN = Yes
                  ResetSOM = No
                  script: same as in Incomplete.OCP Agronomy.Hart_2014_Ex1.Hart_2014_Ex1.Hart_OCP_2014.paddock.manager.Reset on date
                Manager Sowing
                  SowDate = 25-Apr
                  CultivarName = Hyola575
                  SowingDepth = 20
                  RowSpacing = 330
                  Population = 45
                  script: same as in Incomplete.OCP Agronomy.Breeza_2014_Ex1.Breeza_2014_Ex1.Breeza_2014_Ex1_Base.paddock.manager.Sowing
                Manager Fertilise
                  FertiliserType = UreaGranular
                  FertiliserDates = 27-Mar
                  fert_criteria = 1000
                  Amount = 0
                  FertiliserDepth = 50
                  script: same as in Incomplete.OCP Agronomy.Hart_2014_Ex1.Hart_2014_Ex1.Hart_OCP_2014.paddock.manager.Fertilise
                Manager FertiliseMany: same as Incomplete.OCP Agronomy.Tamworth_2017_Ex1a.Tamworth_2017_Ex1a.Tamworth_OCP_2017_Ex1a.paddock.manager.FertiliseMany
                Manager codes
                  location = Tamworth
                  TOS_index = 1
                  irrig_treat = nil
                  trial_code = CSTB18TAMW2
                  fert_code = D3
                  script: same as in Incomplete.OCP Agronomy.Ganmain_2017_Ex1a.Ganmain_2017_Ex1a.Ganmain_OCP_2017_Ex1a.paddock.manager.codes
                Manager Irrigate: same as Incomplete.OCP Agronomy.Condo_2017_Ex1c.Condo_2017_Ex1c.condo_OCP_2017_Ex1c.paddock.manager.Irrigate30
                Manager Irrigate1
                  irrigDates = 25-Jun
                  amount = 40
                  script: same as in Validation.Growth Experiments.Wagga.Wagga2008.WaggaWagga2008.Paddock.Irrigate
                Manager HarvestAfterDate: same as Incomplete.OCP Agronomy.Hart_2015_Ex1b.Hart_2015_Ex1b.Hart_OCP_2015.paddock.manager.HarvestAfterDate
              Fertiliser
              Manager Fertilise at sowing
                Crop = [canola]
                FertiliserType = NH4N
                Amount = 3.3
                FertiliserDepth = 50
                script: same as in Incomplete.OCP Agronomy.Hart_2016_Ex1b.Hart_2016_Ex1b.Hart_2016_Ex1_Base.paddock.Fertilise at sowing
              Manager Fertilise at sowing1: same as Incomplete.OCP Agronomy.Tamworth_2015_Ex2a.Tamworth_2015_Ex2a.Tamworth_OCP_2015_Ex2a.paddock.Fertilise at sowing1
              Irrigation
              SurfaceOrganicMatter: InitialResidueName=wheat; InitialResidueType=wheat; InitialResidueMass=6000; InitialStandingFraction=0; InitialCPR=0; InitialCNR=80
              Plant canola: ResourceName=Canola
              Soil Black Vertosol: ASCOrder=Vertosol; SoilType=SNSW; Site=Kelvin; NearestTown=Kelvin; Region=North West Slopes and Plains; State=New South Wales; Country=Australia; ApsoilNumber=1174; Latitude=-30.847; Longitude=150.3689; LocationAccuracy=+/- 20m; Comments=Chickpea, wheat and sorghum CLL determined to 150 cm depth
                DataSource=Collected by Brett Cocks CSIRO Agriculture Toowoomba. Bill Manning and George Truman NSW North West Local Land Services Gunnedah NSW. For GRDC project Measureing and manageing soil water in Australian Agriculture.
                Physical
                  Thickness  ParticleSizeSand  ParticleSizeSilt  ParticleSizeClay  BD      AirDry  LL15  DUL   SAT
                  100        27.92             30.39             41.69             1.2419  0.0916  0.14  0.3   0.45
                  200        13.71             26.12             60.17             1.4     0.1     0.25  0.36  0.45
                  300        24.77             27.04             48.19             1.5     0.1     0.26  0.38  0.433
                  300        11.34             21.23             67.44             1.6     0.15    0.26  0.37  0.395
                  300        10.99             32.41             56.61             1.6     0.15    0.25  0.36  0.395
                  300        14.2              19.52             66.28             1.6     0.15    0.24  0.36  0.395
                  300        11.17             34.36             54.47             1.6     0.15    0.23  0.35  0.395
                  SoilCrop CanolaSoil: LL=[0.14, 0.25, 0.26, 0.26, 0.25, 0.24, 0.23]; KL=[0.06, 0.06, 0.06, 0.04, 0.04, 0.02, 0.01]; XF=[1, 1, 1, 1, 1, 1, 0]
                WaterBalance SoilWater: same as Incomplete.OCP Agronomy.Tamworth_2015_Ex2a.Tamworth_2015_Ex2a.Tamworth_OCP_2015_Ex2a.paddock.Black Vertosol.SoilWater
                Organic: FOMCNRatio=40; CarbonUnits=Total
                  Thickness  Carbon  SoilCNRatio  FBiom  FInert  FOM
                  100        1.846   12           0.04   0.4     366.2474
                  200        1.118   12           0.02   0.5     262.4277
                  300        0.897   12           0.02   0.7     159.1705
                  300        0.806   12           0.02   1       96.5418
                  300        0.65    12           0.01   1       58.5555
                  300        0.364   12           0.01   1       35.5157
                  300        0.208   12           0.01   1       21.5414
                Chemical: PHUnits=Water
                  Thickness  PH      EC     ESP
                  100        6.2     0.36   0.7599
                  200        6.6     0.234  1.538
                  300        7.4581  0.253  3.136
                  300        7.6392  0.322  6.682
                  300        8.0014  0.36   9.7285
                  300        8.1824  0.36   11.8429
                  300        8.1824  0.396  12.8193
                  EC, CL, PH source: Measured
                  ESP source: C
                Water: Thickness=[100, 200, 300, 300, 300, 300]; InitialValues=[0.235, 0.321, 0.288, 0.214, 0.174, 0.174]; FilledFromTop=false
                Nutrient
                Solute NO3: Thickness=[100, 200, 300, 300, 300, 300, 300]; InitialValues=[15, 3, 1, 1, 1, 1, 1]; InitialValuesUnits=ppm; WaterTableConcentration=0; D0=0; DepthConstant=0; MaxDepthSoluteAccessible=0; RunoffEffectivenessAtMovingSolute=0; MaxEffectiveRunoff=0
                Solute NH4: Thickness=[100, 200, 300, 300, 300, 300, 300]; InitialValues=[6, 3, 3, 3, 2, 3, 0.2]; InitialValuesUnits=ppm; WaterTableConcentration=0; D0=0; DepthConstant=0; MaxDepthSoluteAccessible=0; RunoffEffectivenessAtMovingSolute=0; MaxEffectiveRunoff=0
                Solute Urea: same as Incomplete.Northern NSW and WA.RomaRS.RomaRS98_monty.Paddock.soil.Urea
                SoilTemperature Temperature
              MicroClimate: a_interception=0; b_interception=1; c_interception=0; d_interception=0; SoilHeatFluxFraction=0; MinimumHeightDiffForNewLayer=0; NightInterceptionFraction=0; ReferenceHeight=2
              Report DailyReport: same as Incomplete.OCP Agronomy.AlmaPark_2015_Ex2a.AlmaPark_2015_Ex2a.AlmaPark2015_Ex2a_base.paddock.DailyReport
              Report HarvestReport
              Report DailyBiomass: same as Incomplete.DP Agronomy.WaggaCR2008.WaggaWagga2008CR.Paddock.DailyBiomass
              Report SowingReport: EventNames=[Canola].Sowing
                VariableNames:
                  [Clock].Today
                  [Canola].SowingData.Cultivar
                  [IWeather].Latitude
                  [IWeather].Longitude
            SoilArbitrator
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